folder simulations: version=34
  shared
  simulation Butterfly Pea
    metfile met: filename=%apsim%/Examples/MetFiles/Dalby.met
    clock
      start_date = 1/01/1988  # Select the start date of the simulation
      end_date = 21/05/1989  # Select the end date of the simulation
    summaryfile
    area paddock
      Soil 063 Brown Vertosol: Site=Roma Res Stn, Roma; Region=Maranoa
        NearestTown = Roma, Q 4455
        NaturalVegetation = Mitchell grass, scattered Poplar Box
        DataSource = Data provided by B Robinson, S Cawley, G Thomas, extracted from ESD; estimated OC (WB*1.3); estimated pH; unknown EC, Cl
        Water
          Thickness  BD     AirDry  LL15   DUL    SAT
          100        1.290  0.100   0.200  0.400  0.480
          100        1.320  0.198   0.220  0.410  0.470
          200        1.320  0.240   0.240  0.420  0.470
          200        1.330  0.260   0.260  0.420  0.470
          100        1.390  0.280   0.280  0.400  0.450
          SoilCrop Butterflypea: LL=[0.200, 0.220, 0.240, 0.260, 0.280]; KL=[0.080, 0.080, 0.080, 0.080, 0.050]; XF=[1, 1, 1, 1, 1]
        SoilWater: SummerCona=3.5; SummerU=6; SummerDate=1-Nov; WinterCona=3.5; WinterU=6; WinterDate=1-Apr; DiffusConst=40; DiffusSlope=16; Salb=0.13; CN2Bare=73; CNRed=20; CNCov=0.8; Thickness=[100, 100, 200, 200, 100]; SWCON=[0.300, 0.300, 0.300, 0.300, 0.300]
        SoilOrganicMatter: RootCN=40; RootWt=200; SoilCN=12.5; EnrACoeff=7.4; EnrBCoeff=0.2
          Thickness  OC     FBiom  FInert
          100        1.190  0.035  0.400
          100        1.010  0.020  0.600
          200        0.450  0.015  0.800
          200        0.300  0.015  0.900
          100        0.200  0.010  0.950
        Analysis
          Thickness  EC  PH     CL
          100        0   8.200  0
          100        0   8.500  0
          200        0   8.600  0
          200        0   8.600  0
          100        0   7.400  0
        Sample Initial nitrogen
          Thickness  NO3    NH4
          100        6.500  0.600
          100        2.100  0.100
          200        2.100  0.100
          200        1.700  0.100
          100        1.700  0.100
        Sample Initial water: Thickness=[100, 100, 200, 200, 100]; SW=[0.380, 0.260, 0.250, 0.262, 0.280]
      surfaceom SurfaceOrganicMatter
        PoolName = wheat  # Organic Matter pool name
        type = wheat  # Organic Matter type
        mass = 1000.  # Initial surface residue (kg/ha)
        cnr = 80.0  # C:N ratio of initial residue
        standing_fraction = 0.0  # Fraction of residue standing
      fertiliser
      butterflypea
      folder Manager folder
        manager Sowing rule
          # Sowing criteria
          date1 = 31-jan  # Enter sowing window START date (dd-mmm)
          date2 = 31-jan  # Enter sowing window END date (dd-mmm)
          must_sow = yes  # Must sow?
          raincrit = 30  # Amount of rainfall
          rainnumdays = 3  # Number of days of rainfall
          esw_amount = 200  # Enter minimum allowable available soil water (mm)
          # Sowing parameters
          crop = butterflypea  # Enter name of crop to sow
          density = 20  # Enter sowing density (plants/m2)
          depth = 30  # Enter sowing depth (mm)
          cultivar = milgarra  # Enter cultivar
          row_spacing = 300  # Enter row spacing (mm)
          on start_of_day:
```
      if (paddock_is_fallow() = 1) then
         if (date_within('[date1], [date2]') = 1) then
            if (rain[[rainnumdays]] >= [raincrit] AND esw >= [esw_amount]) OR
                ('[must_sow]' = 'yes' AND today = date('[date2]'))) THEN
               [crop] sow Population =[density], sowing_depth = [depth], cultivar = [cultivar], row_spacing = [row_spacing]
            endif
            if today = date('[date2]') then
               ChooseNextCrop = 'yes'
            endif
         endif
      endif
```
      outputfile: filename=Butterfly Pea.out; title=Butterfly Pea
        variables My Variables
          variable:
            dd/mm/yyyy as Date  # Date (dd/mm/yyyy)
            butterflypea.DaysAfterSowing  # Days after Sowing
            butterflypea.LAI  # Leaf area index
            butterflypea.Biomass  # Biomass
            butterflypea.LeafLiveN  # N in leaf
            butterflypea.n_fixed_tops  # N fixation
            butterflypea.RootLiveN  # N in roots
            butterflypea.WaterStressPhoto  # Soil water stress for photosynthesis
            rain  # Rainfall (mm)
            radn  # Solar Radiation (MJ/m2/day)
            butterflypea.WaterStressPheno  # Soil water stress for phenological development
            butterflypea.WaterStressFixation  # Soil water stress for N fixation
            butterflypea.WaterStressExpansion  # Soil water stress for leaf expansion
            butterflypea.StageName  # phenology stage
        events My Variables Events: event=Daily  # End of day
