folder Cotton Simulations: version=36; creator=Apsim 7.8-r3861
  simulation Continuous Dryland Cotton
    metfile met: filename=%apsim%\Examples\MetFiles\WeeWaa1889_2012.met
    clock
      start_date = 01/06/2000  # Enter the start date of the simulation
      end_date = 31/08/2012  # Enter the end date of the simulation
    summaryfile
    area paddock
      Soil: SoilType=Black Vertosol; LocalName=Waco; Site=Jimbour; NearestTown=Jimbour, Q 4352; Region=South East Queensland; NaturalVegetation=Grassland, mainly Qld bluegrass; Latitude=0; Longitude=0
        InitialWater Initial water: FractionFull=0.2; PercentMethod=FilledFromTop; RelativeTo=ll15
        Water
          Thickness  BD    AirDry  LL15  DUL   SAT
          150        1.02  0.15    0.29  0.54  0.59
          150        1.03  0.26    0.29  0.53  0.58
          300        1.02  0.29    0.29  0.54  0.59
          300        1.02  0.29    0.29  0.54  0.58
          300        1.06  0.3     0.3   0.52  0.57
          300        1.11  0.31    0.31  0.5   0.55
          300        1.12  0.32    0.32  0.5   0.55
          300        1.15  0.33    0.33  0.48  0.53
          300        1.18  0.34    0.34  0.47  0.52
          300        1.2   0.35    0.35  0.46  0.51
          300        1.25  0.36    0.36  0.44  0.49
          SoilCrop Barley
            LL=[0.29, 0.29, 0.32, 0.38, 0.39, 0.39, 0.41, 0.48, 0.47, 0.46, 0.44]
            KL=[0.1, 0.1, 0.08, 0.06, 0.04, 0.02, 0.01, 0, 0, 0, 0]
            XF=[1, 1, 1, 1, 1, 1, 1, 0, 0, 0, 0]
          SoilCrop Chickpea
            LL=[0.29, 0.29, 0.36, 0.43, 0.51, 0.5, 0.5, 0.48, 0.47, 0.46, 0.44]
            KL=[0.1, 0.1, 0.08, 0.06, 0.04, 0.02, 0.01, 0, 0, 0, 0]
            XF=[1, 1, 1, 1, 1, 1, 1, 0, 0, 0, 0]
          SoilCrop Lucerne
            LL=[0.29, 0.29, 0.29, 0.29, 0.3, 0.31, 0.32, 0.33, 0.34, 0.35, 0.36]
            KL=[0.1, 0.1, 0.1, 0.1, 0.09, 0.09, 0.09, 0.09, 0.09, 0.09, 0.09]
            XF=[1, 1, 1, 1, 1, 1, 1, 1, 1, 1, 1]
          SoilCrop Maize
            LL=[0.29, 0.29, 0.34, 0.34, 0.37, 0.4, 0.42, 0.48, 0.47, 0.46, 0.44]
            KL=[0.1, 0.1, 0.1, 0.08, 0.06, 0.04, 0.02, 0, 0, 0, 0]
            XF=[1, 1, 1, 1, 1, 1, 1, 0, 0, 0, 0]
          SoilCrop Perennial Grass
            LL=[0.29, 0.29, 0.39, 0.41, 0.4, 0.4, 0.41, 0.41, 0.4, 0.4, 0.42]
            KL=[0.1, 0.1, 0.1, 0.1, 0.09, 0.07, 0.05, 0, 0, 0, 0]
            XF=[1, 1, 1, 1, 1, 1, 1, 0, 0, 0, 0]
          SoilCrop Sorghum
            LL=[0.29, 0.29, 0.35, 0.38, 0.4, 0.4, 0.4, 0.48, 0.47, 0.46, 0.44]
            KL=[0.1, 0.1, 0.1, 0.08, 0.06, 0.04, 0.02, 0, 0, 0, 0]
            XF=[1, 1, 1, 1, 1, 1, 1, 0, 0, 0, 0]
          SoilCrop Wheat
            LL=[0.29, 0.29, 0.32, 0.32, 0.35, 0.38, 0.41, 0.48, 0.47, 0.46, 0.44]
            KL=[0.1, 0.1, 0.08, 0.06, 0.04, 0.02, 0.01, 0, 0, 0, 0]
            XF=[1, 1, 1, 1, 1, 1, 1, 0, 0, 0, 0]
        SoilWater: SummerCona=3.5; SummerU=6; SummerDate=1-Nov; WinterCona=3.5; WinterU=6; WinterDate=1-Apr; DiffusConst=40; DiffusSlope=16; Salb=0.13; CN2Bare=73; CNRed=20; CNCov=0.8; Slope=0; DischargeWidth=0; CatchmentArea=0; MaxPond=0; Thickness=[150, 150, 300, 300, 300, 300, 300, 300, 300, 300, 300]; SWCON=[0.3, 0.3, 0.3, 0.3, 0.3, 0.3, 0.3, 0.3, 0.3, 0.3, 0.3]
        SoilOrganicMatter: RootCN=40; RootWt=200; SoilCN=12.5; EnrACoeff=7.4; EnrBCoeff=0.2; OCUnits=Total
          Thickness  OC    FBiom  FInert
          150        1.04  0.025  0.4
          150        0.89  0.02   0.6
          300        0.89  0.015  0.8
          300        0.89  0.01   0.9
          300        0.77  0.01   0.95
          300        0.45  0.01   0.95
          300        0.27  0.01   0.95
          300        0.22  0.01   0.95
          300        0.16  0.01   0.95
          300        0.13  0.01   0.95
          300        0.12  0.01   0.95
        Analysis: PHUnits=Water; BoronUnits=HotWater
          Thickness  EC    PH
          150        0.2   8.4
          150        0.25  8.8
          300        0.31  9
          300        0.4   9.2
          300        0.59  9.2
          300        0.84  9.1
          300        0.93  9
          300        1.01  9
          300        1.06  8.9
          300        1.05  8.9
          300        1.01  8.9
        Sample Initial nitrogen: NO3Units=kgha; NH4Units=kgha; SWUnits=Volumetric; OCUnits=Total
          Thickness  NO3      NH4
          150        9.9496   0.916477
          150        3.24605  0.154501
          300        6.42906  0.306002
          300        5.20506  0.306002
          300        5.40918  0.318002
          300        5.66433  0.333002
          300        5.71536  0.336002
          300        5.86845  0.345003
          300        6.02154  0.354003
          300        6.1236   0.360003
          300        6.37875  0.375003
      surfaceom SurfaceOrganicMatter
        PoolName = cotton  # Organic Matter pool name
        type = cotton  # Organic Matter type
        mass = 1000  # Initial surface residue (kg/ha)
        cnr = 80  # C:N ratio of initial residue
        standing_fraction = 0  # Fraction of residue standing
      fertiliser
      Cotton2 Cotton
        initsection
          crop_type = cotton
          leaf_res_n_conc = 0.02
          hucut = 40  # oC
          baset = 12  # oC
          open_def = 60  # %
          a_root_leaf = 1.01
          a_stem_leaf = 1.25
          e_par = 2.5  # g/MJ
          specific_lw = 58  # g/m^2
          t_opt = 25  # oC
          t_base = 8  # oC
          wt_area_max = 150
          embryo = 0.75  # g
          f_leaf = 0.6
          f_stem = 0.15
          f_root = 0.25
          elevation_default = 200  # m
          wlog_assimilate_red = 0.2
          wlog_carcap_red = 0.2
          watlog_c = 0.87
          watlog_n = 0.87
          wlog_carcap_red_stress = 0.01
          smi_affect_wlog = 0.75
          days_relief_wlog = 7  # days
          frost_kill_immediate = 2  # oC
          rtdep_max = 130  # cm
          harvest_n_frac = 0.85
          cutout_smi_crit = 0.75
          cutout_smi_days = 5  # days
          cutout_smi_site_red = 0.1
          epcoef1 = 3.051
          epcoef2 = 2.436
          epcoef_smi_crit = 0.5
          fbwstr_low = 0
          fbwstr_high = 0.5
          fbwstr_a = 1
          fbnstr_low = 0
          fbnstr_high = 0.5
          fbnstr_a = 1
          relp_smi_crit = 0.5
          relp_intercept = 0.25
          relp_slope = 0.864
          relp_low = 0
          relp_high = 1
          relp_a = 0.5
          vsnstr_low = 0
          vsnstr_high = 0.9
          vsnstr_a = 1
          flfsmi_low = 0
          flfsmi_high = 0.5
          flfsmi_a = 1
          vlnstr_low = 0
          vlnstr_high = 0.9
          vlnstr_a = 1
          fw_low = 0
          fw_high = 0.25
          fw_a = 1
          adjust_low = 0
          adjust_high = 5
          adjust_a = 1
          fwstrs_low = 0
          fwstrs_high = 0.5
          fwstrs_a = 4
          smi_delay_crit = 0.25
          cold_shock_delay_crit = 11  # oC
          cold_shock_delay = 5.2  # dd
          fert_crit = 1  # kg/ha
          fert_detect = 10  # kg/ha
          days_since_fert_max = 100  # days
          cultivar_default = S71BR
          cotton_co2 = 400  # ppm
          rootExpansionDelay = 33
          useDDsumTo1stSq = false
          init cultivars: array=T
            element
              cultivar = _Default_S71BR
              percent_l = 40
              scboll = 5
              respcon = 0.01593
              sqcon = 0.0217
              fcutout = 0.5411
              flai = 0.52
              DDISQ = 402
              TIPOUT = 52
              FRUDD = [50, 161, 307, 338, 484, 630, 848, 1071]
              BLTME = [0, 0, 0, 0.07, 0.21, 0.33, 0.55, 1]
              WT = [0.0104, 0.0272, 0.1441, 0.0988, 0.5042, 0.9617, 1, 0.5785]
              dlds_max = 0.12
              rate_emergence = 1
              popcon = 0.03633
              fburr = 1.23
              ACOTYL = 525
              RLAI = 0.01
              BckGndRetn = 0.9
            element
              cultivar = S71
              percent_l = 42
              scboll = 5.2
              respcon = 0.01593
              sqcon = 0.0217
              fcutout = 0.5411
              flai = 0.52
              DDISQ = 402
              TIPOUT = 52
              FRUDD = [50, 161, 307, 338, 484, 630, 848, 1071]
              BLTME = [0, 0, 0, 0.07, 0.21, 0.33, 0.55, 1]
              WT = [0.0104, 0.0272, 0.1441, 0.0988, 0.5042, 0.9617, 1, 0.5785]
              dlds_max = 0.12
              rate_emergence = 1
              popcon = 0.03633
              fburr = 1.23
              ACOTYL = 525
              RLAI = 0.01
              BckGndRetn = 0.8
            element
              cultivar = S71BR
              percent_l = 40
              scboll = 5
              respcon = 0.01593
              sqcon = 0.0217
              fcutout = 0.5411
              flai = 0.52
              DDISQ = 402
              TIPOUT = 52
              FRUDD = [50, 161, 307, 338, 484, 630, 848, 1071]
              BLTME = [0, 0, 0, 0.07, 0.21, 0.33, 0.55, 1]
              WT = [0.0104, 0.0272, 0.1441, 0.0988, 0.5042, 0.9617, 1, 0.5785]
              dlds_max = 0.12
              rate_emergence = 1
              popcon = 0.03633
              fburr = 1.23
              ACOTYL = 525
              RLAI = 0.01
              BckGndRetn = 0.9
            element
              cultivar = Siok
              percent_l = 42
              scboll = 4.5
              respcon = 0.01593
              sqcon = 0.0228
              fcutout = 0.5411
              flai = 0.52
              DDISQ = 420
              TIPOUT = 52
              FRUDD = [50, 180, 350, 380, 520, 660, 870, 1100]
              BLTME = [0, 0, 0, 0.07, 0.21, 0.33, 0.55, 1]
              WT = [0.0104, 0.0272, 0.1441, 0.0988, 0.5042, 0.9617, 1, 0.5785]
              dlds_max = 0.12
              rate_emergence = 1
              popcon = 0.03633
              fburr = 1.23
              ACOTYL = 525
              RLAI = 0.01
              BckGndRetn = 0.9
            element
              cultivar = Sica
              percent_l = 40
              scboll = 5.5
              respcon = 0.02306
              sqcon = 0.0206
              fcutout = 0.4789
              flai = 0.87
              DDISQ = 420
              TIPOUT = 52
              FRUDD = [50, 180, 350, 380, 520, 660, 870, 1100]
              BLTME = [0, 0, 0, 0.07, 0.21, 0.33, 0.55, 1]
              WT = [0.0104, 0.0272, 0.1441, 0.0988, 0.5042, 0.9617, 1, 0.5785]
              dlds_max = 0.12
              rate_emergence = 1
              popcon = 0.03633
              fburr = 1.23
              ACOTYL = 525
              RLAI = 0.01
              BckGndRetn = 0.9
          init cultivars: same as Continuous Dryland Cotton.paddock.Cotton.initsection.cultivars
      folder Manager folder
        manager Sowing fertiliser
          # When should fertiliser be applied
          modulename = Cotton  # On which module should the event come from
          eventname = sowing  # On which event should fertiliser be applied
          # Fertiliser application details
          fertmodule = fertiliser  # Module used to apply the fertiliser
          fert_amount_sow = 150  # Amount of starter fertiliser at sowing (kg/ha)
          fert_type_sow = urea_N  # Sowing fertiliser type
          on [modulename].[eventname]:
```
        [fertmodule] apply amount = [fert_amount_sow] (kg/ha), depth = 50 (mm), type = [fert_type_sow]
```
        manager Cotton sowing rule
          # Sowing criteria
          date1 = 1-oct  # Enter sowing window START date (dd-mmm)
          date2 = 10-nov  # Enter sowing window END date (dd-mmm)
          must_sow = yes  # Must sow?
          raincrit = 30  # Amount of rainfall
          rainnumdays = 3  # Number of days of rainfall
          esw_amount = 0  # Enter minimum allowable available soil water (mm)
          # Sowing parameters
          crop = cotton  # Enter name of crop to sow
          density = 10  # Enter sowing density (plants/m in row)
          depth = 50  # Enter sowing depth (mm)
          cultivar = S71BR  # Enter cultivar
          row_spacing = 1000  # Enter row spacing (mm)
          skiprow = 1
          on start_of_day:
```
      if (paddock_is_fallow() = 1 and FallowIn <> 'yes' and (NextCrop = 0 or NextCrop = '[crop]')) then
         if (date_within('[date1], [date2]') = 1) then
            if (rain[[rainnumdays]] >= [raincrit] AND esw >= [esw_amount]) OR
                ('[must_sow]' = 'yes' AND today = date('[date2]'))) THEN
               ChooseNextCrop = 'yes'   ! for rotations
               [crop] sow plants_pm =[density], sowing_depth = [depth], cultivar = [cultivar], row_spacing = [row_spacing], skiprow = [skiprow]
            endif
            if today = date('[date2]') then
               ChooseNextCrop = 'yes'
            endif
         endif
      endif
```
        manager Harvesting rule
          # Harvesting criteria
          crop = Cotton  # Enter name of crop to harvest when ripe
          on end_of_day:
```
           if ('[crop]' = 'cotton') then

               !!  cotton defoliation
                if ([crop].stageName = 'mature'  and  [crop].defol_das = 0) then
                    [crop] defoliate
                endif
          
                !! cotton harvest
                if ([crop].stageName = 'harvest_ripe' or [crop].PlantStatus = 'dead') then
                   !!report_harvest do_output
                   [crop] harvest
                   [crop] end_crop
                endif

           endif
```
        manager Fertilise on days after sowing - top up
          # When should fertiliser be applied
          modulename = Cotton  # On which crop is fertiliser being applied
          fert_das = 60  # Enter fertiliser days after sowing
          fert_criteria = 250  # Amount of N required in top 3 layers (kg/ha)
          # Fertiliser application details
          fertmodule = fertiliser  # Module used to apply the fertiliser
          fert_type = urea_N  # Fertiliser type
          on start_of_day:
```
         if ([modulename].DaysAfterSowing = [fert_das]) then
            N_deficit = [fert_criteria] - (no3(1) + nh4(1) + no3(2) + nh4(2) + no3(3) + nh4(3))
            '[fertmodule]' apply amount = N_deficit (kg/ha), depth = 50 (mm), type = [fert_type] ()
         endif
```
      outputfile: filename=Continuous Dryland Cotton.out; title=Continuous Dryland Cotton
        variables
          variables: dd/mm/yyyy as Date, dw_total, NUptake, yield, bolls_sc, lai_max, esw, InCropRain
        events Reporting Frequency: event=harvesting
      tracker: variable=sum of rain on end_day from sowing to now as InCropRain
  simulation Continuous Irrigated Cotton - deficit rule
    metfile met: filename=%apsim%\Examples\MetFiles\WeeWaa1889_2012.met
    clock
      start_date = 01/06/2000  # Enter the start date of the simulation
      end_date = 31/08/2012  # Enter the end date of the simulation
    summaryfile
    area paddock
      Soil: same as Continuous Dryland Cotton.paddock.Soil
      surfaceom SurfaceOrganicMatter
        PoolName = cotton  # Organic Matter pool name
        type = cotton  # Organic Matter type
        mass = 1000  # Initial surface residue (kg/ha)
        cnr = 80  # C:N ratio of initial residue
        standing_fraction = 0  # Fraction of residue standing
      fertiliser
      irrigation
        automatic_irrigation = on
        asw_depth = 1200  # Depth to which ASW is calculated. (mm)
        crit_fr_asw = .4  # Fraction of ASW below which irrigation is applied (0-1.0)
        irrigation_efficiency = .8  # Efficiency of the irrigation. (0-1.0)
        irrigation_allocation = off  # Allocation limits
        allocation = 0  # Allocation in mm
        default_no3_conc = 0.0  # Nitrate concentration (ppm N)
        default_nh4_conc = 0.0  # Ammonium concentration (ppm N)
        default_cl_conc = 0.0  # Chloride concentration (ppm Cl)
      Cotton2 Cotton
        initsection
          crop_type = cotton
          leaf_res_n_conc = 0.02
          hucut = 40  # oC
          baset = 12  # oC
          ul1 = 1.4
          cona = 0.35
          open_def = 60  # %
          a_root_leaf = 1.01
          a_stem_leaf = 1.25
          e_par = 2.5  # g/MJ
          specific_lw = 58  # g/m^2
          t_opt = 25  # oC
          t_base = 8  # oC
          wt_area_max = 150
          embryo = 0.75  # g
          f_leaf = 0.6
          f_stem = 0.15
          f_root = 0.25
          elevation_default = 200  # m
          wlog_assimilate_red = 0.2
          wlog_carcap_red = 0.2
          watlog_c = 0.87
          watlog_n = 0.87
          wlog_carcap_red_stress = 0.01
          smi_affect_wlog = 0.75
          days_relief_wlog = 7  # days
          frost_kill_immediate = 2  # oC
          rtdep_max = 130  # cm
          harvest_n_frac = 0.85
          cutout_smi_crit = 0.75
          cutout_smi_days = 5  # days
          cutout_smi_site_red = 0.1
          epcoef1 = 3.051
          epcoef2 = 2.436
          epcoef_smi_crit = 0.5
          fbwstr_low = 0
          fbwstr_high = 0.5
          fbwstr_a = 1
          fbnstr_low = 0
          fbnstr_high = 0.5
          fbnstr_a = 1
          relp_smi_crit = 0.5
          relp_intercept = 0.25
          relp_slope = 0.864
          relp_low = 0
          relp_high = 1
          relp_a = 0.5
          vsnstr_low = 0
          vsnstr_high = 0.9
          vsnstr_a = 1
          flfsmi_low = 0
          flfsmi_high = 0.5
          flfsmi_a = 1
          vlnstr_low = 0
          vlnstr_high = 0.9
          vlnstr_a = 1
          fw_low = 0
          fw_high = 0.25
          fw_a = 1
          adjust_low = 0
          adjust_high = 5
          adjust_a = 1
          fwstrs_low = 0
          fwstrs_high = 0.5
          fwstrs_a = 4
          smi_delay_crit = 0.25
          cold_shock_delay_crit = 11  # oC
          cold_shock_delay = 5.2  # dd
          fert_crit = 1  # kg/ha
          fert_detect = 10  # kg/ha
          days_since_fert_max = 100  # days
          percent_l = 42  # %
          scboll = 4.7  # g
          respcon = 0.01593
          sqcon = 0.0217
          fcutout = 0.5411
          flai = 0.52
          ddisq = 402
          popcon = 0.03633
          acotyl = 525  # mm^2
          rlai = 0.01
          fburr = 1.23
          dlds_max = 0.12
          rate_emergence = 1  # mm/dd
          Background_retention = 0.8
          cultivar_default = S71BR
          plants_pm_default = 10
          sowing_depth_default = 50  # mm
          row_spacing_default = 1000  # mm
          skiprow_default = 0
          co2 = 350  # ppm
          init cultivars: same as Continuous Dryland Cotton.paddock.Cotton.initsection.cultivars
      folder Manager folder
        manager Sowing fertiliser: same as Continuous Dryland Cotton.paddock.Manager folder.Sowing fertiliser
        manager Cotton sowing rule
          # Sowing criteria
          date1 = 15-oct  # Enter sowing window START date (dd-mmm)
          date2 = 15-oct  # Enter sowing window END date (dd-mmm)
          must_sow = yes  # Must sow?
          raincrit = 30  # Amount of rainfall
          rainnumdays = 3  # Number of days of rainfall
          esw_amount = 0  # Enter minimum allowable available soil water (mm)
          # Sowing parameters
          crop = cotton  # Enter name of crop to sow
          density = 12  # Enter sowing density (plants/m in row)
          depth = 50  # Enter sowing depth (mm)
          cultivar = S71BR  # Enter cultivar
          row_spacing = 1000  # Enter row spacing (mm)
          skiprow = 0
          on start_of_day:
          script: same as in Continuous Dryland Cotton.paddock.Manager folder.Cotton sowing rule
        manager Harvesting rule
          # Harvesting criteria
          crop = Cotton  # Enter name of crop to harvest when ripe
          on end_of_day:
          script: same as in Continuous Dryland Cotton.paddock.Manager folder.Harvesting rule
        manager Fertilise on days after sowing - top up: same as Continuous Dryland Cotton.paddock.Manager folder.Fertilise on days after sowing - top up
        manager2 Irrigate on event
          amount = 100  # Amount of irrigation to apply (mm)
          eff = 0.8  # Irrigation efficiency (0-1)
          # Event details
          ModuleName = Cotton  # On which module should the event come from
          EventName = sowing  # On which event should fertiliser be applied(see the list by module in Reporting Frequency for possible events)
```csharp
using System;
using ModelFramework;

public class Script 
{      
   [Link] Irrigation Irrigation; 
   [Param] string ModuleName;    //the module that the event will come from
   [Param] string EventName;     //the event to look for
   [Param] double amount;        //amount of irrigation to apply (mm)
   [Param] double eff;           //irrigation efficiency
     
   // The following event handler will be called each day at the end of the day
   //[ModuleName] and [EventName] will be replaced by the values in the properties window before the script is run
   [EventHandler("[ModuleName].[EventName]")] public void Irrigate()
   {
      IrrigationApplicationType data = new IrrigationApplicationType();
      data.Amount = (int)amount;
      Irrigation.Set("irrigation_efficiency", eff);
      Irrigation.Apply(data);
      Console.WriteLine("Irrigating with " + amount + "mm due to " + ModuleName + "." + EventName + " event."); //write the event to the summary file
   }  
}
```
      outputfile: filename=Continuous Irrigated Cotton - deficit rule.out; title=Continuous Irrigated Cotton - deficit rule
        variables
          variables: dd/mm/yyyy as Date, dw_total, NUptake, yield, bolls_sc, lai_max, esw as PlantExtractableWater
        events Reporting Frequency: event=harvesting
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