simulations: version=15
  simulation Effluent-irrigated Eucalypt Forest
    clock
      start_date = 1/01/1980  # Enter the start date of the simulation
      end_date = 31/12/1989  # Enter the end date of the simulation
    summaryfile: filename=Eucalypt Forest Simulation.sum
    metfile met: filename=%apsim%\Examples\MetFiles\goond.met
    area Block
      registrations global
      micromet
        soilalbedo = 0.23
        a_interception = 0
        b_interception = 0
        c_interception = 0.1
        d_interception = 0
      soil: Site=Hypothetical; LocalName=Uniform; SoilType=Loam; Cona=3.5; DiffusConst=88; DiffusSlope=35.4; U=4; Salb=0.13; Cn2Bare=65; CnRed=20; CnCov=0.8; CnCanopyFact=1; RootCn=60; RootWt=1000; SoilCn=20; EnrACoeff=7.4; EnrBCoeff=0.2
        profile
          layer:
            thickness  bd   ll15  airdry  dul  sat  sw       swcon  oc   ph  fbiom  finert  no3  nh4  ec   ll egrandis  kl egrandis  xf egrandis
            150        1.2  0.1   0.07    0.2  0.3  9999.99  0.3    1    6   0.02   0.6     1    0.1  0.2  0.1          0.07         1
            150        1.2  0.1   0.07    0.2  0.3  9999.99  0.3    0.9  6   0.02   0.6     1    0.1  0.2  0.1          0.07         1
            300        1.2  0.1   0.07    0.2  0.3  9999.99  0.3    0.9  6   0.02   0.8     1    0.1  0.3  0.1          0.07         1
            300        1.2  0.1   0.07    0.2  0.3  9999.99  0.3    0.9  6   0.01   0.9     1    0.1  0.4  0.1          0.06         1
            300        1.2  0.1   0.07    0.2  0.3  9999.99  0.3    0.8  6   0.01   0.95    1    0.1  0.6  0.1          0.04         1
            300        1.2  0.1   0.07    0.2  0.3  9999.99  0.3    0.4  6   0.01   0.95    1    0.1  0.8  0.1          0.03         1
            300        1.2  0.1   0.07    0.2  0.3  9999.99  0.3    0.3  6   0.01   0.95    1    0.1  0.9  0.1          0.03         1
            300        1.2  0.1   0.07    0.2  0.3  9999.99  0.3    0.2  6   0.01   0.95    1    0.1  1    0.1          0.03         1
            300        1.2  0.1   0.07    0.2  0.3  9999.99  0.3    0.2  6   0.01   0.95    1    0.1  1.1  0.1          0.02         1
            300        1.2  0.1   0.07    0.2  0.3  9999.99  0.3    0.1  6   0.01   0.95    1    0.1  1    0.1          0.02         1
            300        1.2  0.1   0.07    0.2  0.3  9999.99  0.3    0.1  6   0.01   0.95    1    0.1  1    0.1          0.02         1
        InitWater
          percentmethod: percent=0.5; distributed=filled from top
        InitNitrogen
          profile
            layer:
              no3  nh4    thickness
              1    0.100  150
              1    0.100  150
              1    0.100  300
              1    0.100  300
              1    0.100  300
              1    0.100  300
              1    0.100  300
              1    0.100  300
              1    0.100  300
              1    0.100  300
              1    0.100  300
      cl
        d0 = 108  # Cl diffusivity in water (mm2/d)
        layers = 10 20 30 50 100 100 100 100 80 50 10  # Cl in each layer (kg/ha)
      surfaceom LitterLayer
        PoolName = egrandis
        type = grandis
        mass = 1000
        cnr = 80
        standing_fraction = 0
      fertiliser
      irrigation
        automatic_irrigation = on
        asw_depth = 600  # Depth to which ASW is calculated. (mm)
        crit_fr_asw = 0.5  # Fraction of ASW below which irrigation is applied (0-1.0)
        irrigation_efficiency = 1  # Efficiency of the irrigation. (0-1.0)
        irrigation_allocation = off  # Allocation limits
        allocation = 0  # Allocation in ML
        default_no3_conc = 10  # Nitrate concentration (ppm N)
        default_nh4_conc = 10  # Ammonium concentration (ppm N)
        default_cl_conc = 300  # Chloride concentration (ppm Cl)
        default_no3_conc = 0  # Nitrate concentration (ppm N)
        default_nh4_conc = 0  # Ammonium concentration (ppm N)
        default_cl_conc = 0  # Chloride concentration (ppm Cl)
      egrandis
      folder Manager folder
        manager Planting rule
          category =  # Sowing criteria
          date1 = 15-mar  # Enter planting date (dd-mmm)
          category =  # Sowing parameters
          crop = egrandis  # Enter name of growth module to sow
          density = 1111  # Enter sowing density (plants/ha)
          on start_of_day:
```
         if (date('[date1]') = today) and [crop].plant_status = 'out' then
               [crop]  establish plants =[density], init_section = seedling
         endif
```
        manager Establishment fertiliser
          category =  # When should fertiliser be applied
          modulename = egrandis  # For which module is fertiliser applied
          eventname = establishing  # On which event should fertiliser be applied
          category =  # Fertiliser application details
          fertmodule = fertiliser  # Module used to apply the fertiliser
          fert_amount_sow = 150  # Amount of starter fertiliser at sowing (kg/ha)
          fert_type_sow = urea_N  # Sowing fertiliser type
          on [modulename].[eventname]:
```
        [fertmodule] apply amount = [fert_amount_sow] (kg/ha), depth = 50 (mm), type = [fert_type_sow]
```
      outputfile
        variables
          variables: dd/mm/yyyy as Date, esw, lai, adm_green, fw, fn, plants, no3(), nh4(), cl(), drain, flow_no3(11) as no3_leached, irrigation, irrigation_no3
        events Reporting Frequency: event=daily
