folder Simulations: version=15
  simulation Maize P
    clock
      start_date = 1/09/1988  # Enter the start date of the simulation
      end_date = 31/12/1989  # Enter the end date of the simulation
    summaryfile: filename=Continuous Maize Simulation.sum
    metfile met: filename=%apsim%\Examples\MetFiles\dalby.met
    area paddock
      registrations global
      soil: Cona=2.5; U=9; CN2Bare=75; Salb=0.13; DiffusConst=88; DiffusSlope=35.4; CNRed=20; CNCov=0.8; RootCN=45; RootWT=1000; SoilCN=14.5; EnrACoeff=7.4; EnrBCoeff=0.2; RootCP=200; RateDissolRock=0.2; RateLossAvail=0.3
        profile
          layer:
            thickness  ll15  airdry  dul   sat   swcon  bd    ll sorg  kl sorg  xf sorg  ll cowpea  kl cowpea  xf cowpea  ll maize  kl maize  xf maize  ll mucuna  kl mucuna  xf mucuna  ll peanut  kl peanut  xf peanut  ll pigeonp  kl pigeonp  xf pigeonp  ll soybean  kl soybean  xf soybean  ph   oc    fbiom  finert  LabileP  Sorption  BandedP  RockP
            100        0.11  0.04    0.22  0.3   0.5    1.35  0.11     0.07     1        0.11       0.08       1          0.11      0.08      1         0.11       0.08       1          0.11       0.08       1          0.11        0.08        1           0.11        0.08        1           6    1.2   0.02   0.6     5        50        0        0
            100        0.14  0.14    0.25  0.3   0.5    1.35  0.14     0.07     1        0.14       0.08       1          0.14      0.08      1         0.14       0.08       1          0.14       0.08       1          0.14        0.08        1           0.14        0.08        1           6    1     0.01   0.65    1        100       0        0
            100        0.16  0.15    0.27  0.32  0.5    1.35  0.16     0.07     1        0.16       0.08       1          0.16      0.08      1         0.16       0.08       1          0.16       0.08       1          0.16        0.08        1           0.16        0.08        1           6    0.86  0.01   0.7     1        200       0        0
            200        0.17  0.16    0.28  0.33  0.5    1.4   0.17     0.07     1        0.17       0.08       1          0.17      0.08      1         0.17       0.08       1          0.17       0.08       1          0.17        0.08        1           0.17        0.08        1           6.2  0.83  0.01   0.75    1        200       0        0
            200        0.19  0.18    0.3   0.34  0.5    1.4   0.19     0.07     1        0.19       0.06       1          0.19      0.06      1         0.19       0.06       1          0.19       0.06       1          0.19        0.06        1           0.19        0.06        1           6.5  0.58  0.01   0.8     1        200       0        0
            200        0.2   0.18    0.3   0.35  0.5    1.4   0.2      0.07     1        0.2        0.04       1          0.2       0.04      1         0.2        0.04       1          0.2        0.04       1          0.2         0.04        1           0.2         0.04        1           6.7  0.54  0.01   0.85    1        200       0        0
            200        0.2   0.18    0.31  0.36  0.5    1.4   0.2      0.04     1        0.2        0.03       1          0.2       0.03      1         0.2        0.03       1          0.2        0.03       1          0.2         0.03        1           0.2         0.03        1           6.8  0.47  0.01   0.93    1        200       0        0
            200        0.2   0.18    0.32  0.37  0.5    1.4   0.2      0.04     1        0.2        0.02       1          0.2       0.02      1         0.2        0.02       1          0.2        0.02       1          0.2         0.02        1           0.2         0.02        1           6.8  0.5   0.01   0.93    1        200       0        0
            200        0.2   0.18    0.31  0.37  0.5    1.4   0.2      0.04     1        0.2        0.01       1          0.2       0.01      1         0.2        0.01       1          0.2        0.01       1          0.2         0.01        1           0.2         0.01        1           6.8  0.5   0.01   0.93    1        200       0        0
            200        0.2   0.18    0.31  0.37  0.5    1.4   0.2      0.04     1        0.2        0.01       1          0.2       0.01      1         0.2        0.01       1          0.2        0.01       1          0.2         0.01        1           0.2         0.01        1           6.8  0.5   0.01   0.93    1        200       0        0
        InitNitrogen
          profile
            layer:
              no3    nh4    thickness
              0.237  0.194  100
              0.712  0.484  100
              0.712  0.290  100
              0.554  0.290  200
              0.395  0.290  200
              0.395  0.290  200
              0.237  0.290  200
              0.237  0.290  200
              0.158  0.290  200
              0.079  0.290  200
        InitWater
          PercentMethod: Percent=0.00; Distributed=Filled from top
      surfaceom surface organic matter
        PoolName = wheat  # Organic Matter pool name
        type = wheat  # Organic Matter type
        mass = 0  # Initial surface residue (kg/ha)
        cnr = 80  # C:N ratio of initial residue
        standing_fraction = 0  # Fraction of residue standing
      fertiliser
      phos Phosphorus
      maize
      folder Manager folder
        manager Sow using a variable rule
          category =  # Sowing criteria
          date1 = 1-oct  # Enter sowing window START date (dd-mmm)
          date2 = 1-feb  # Enter sowing window END date (dd-mmm)
          must_sow = no  # Must sow?
          raincrit = 30  # Amount of rainfall
          rainnumdays = 7  # Number of days of rainfall
          esw_amount = 50  # Enter minimum allowable available soil water (mm)
          category =  # Sowing parameters
          crop = maize  # Enter name of crop to sow
          density = 6  # Enter sowing density (plants/m2)
          depth = 30  # Enter sowing depth (mm)
          cultivar = dekalb_xl82  # Enter cultivar
          class = plant  # Enter crop growth class
          row_spacing = 750  # Enter row spacing (mm)
          on start_of_day:
```
      if (paddock_is_fallow() = 1 and FallowIn <> 'yes' and (NextCrop = 0 or NextCrop = '[crop]')) then
         if (date_within('[date1], [date2]') = 1) then
            if (rain[[rainnumdays]] >= [raincrit] AND esw >= [esw_amount]) OR
                ('[must_sow]' = 'yes' AND today = date('[date2]'))) THEN
               ChooseNextCrop = 'yes'   ! for rotations
               [crop] sow plants =[density], sowing_depth = [depth], cultivar = [cultivar], row_spacing = [row_spacing], crop_class = [class]
            endif
            if today = date('[date2]') then
               ChooseNextCrop = 'yes'
            endif
         endif
      endif
```
        manager Fertilise N at sowing
          category =  # When should fertiliser be applied
          modulename = maize  # On which module should the event come from
          eventname = sowing  # On which event should fertiliser be applied
          category =  # Fertiliser application details
          fertmodule = Fertiliser  # Module used to apply the fertiliser
          fert_amount_sow = 50  # Amount of starter fertiliser at sowing (kg/ha)
          fert_type_sow = urea_N  # Sowing fertiliser type
          on [modulename].[eventname]:
```
        [fertmodule] apply amount = [fert_amount_sow] (kg/ha), depth = 50 (mm), type = [fert_type_sow]
```
        manager Fertilise with Phosphorus at sowing
          category =  # When should fertiliser be applied
          modulename = maize  # On which module should the event come from
          eventname = sowing  # On which event should fertiliser be applied
          category =  # Fertiliser application details
          fertmodule = fertiliser  # Module used to apply the fertiliser
          fert_amount_sow = 150  # Amount of starter fertiliser at sowing (kg/ha)
          fert_type_sow = broadcast_p  # Sowing fertiliser type
          on [modulename].[eventname]:
          script: same as in Maize P.paddock.Manager folder.Fertilise N at sowing
        manager Harvesting rule
          category =  # Harvesting criteria
          crop = maize  # Enter name of crop to harvest when ripe
          on end_of_day:
```
           if ('[crop]' = 'cotton') then
              if ([crop].ozcot_status > 0) then
                  [crop] harvest
              endif
           elseif ([crop].StageName = 'harvest_ripe' or [crop].plant_status = 'dead') then
              [crop]  harvest
              [crop]  end_crop
           endif
```
      outputfile: filename=Continuous Maize Simulation.out
        variables My Variables
          variables: dd/mm/yyyy as Date, esw, day, year, yield, stover, biomass, lai, pfact_photo, nfact_photo, swdef_photo
        events My Variables Events: event=Daily
