folder Simulations: version=28
  simulation Rice
    metfile met: filename=%apsim%\Examples\MetFiles\bhola.met
    clock
      start_date = 1/10/1990  # Select the start date of the simulation
      end_date = 28/03/1991  # Select the end date of the simulation
    summaryfile
    area paddock
      folder Manager folder
        manager Rice sowing rule
          on start_of_day:
```
if (day = 288) then
  rice sow cultivar = experimental, establishment = direct-seed, nplds = 180 (p/m2)
endif
```
          on end_of_day:
```
if (rice.plant_status = 'dead') then
  rice end_crop
endif
```
      micromet
        soilalbedo = 0.23
        a_interception = 0
        b_interception = 0
        c_interception = 0
        d_interception = 0
      irrigation
        automatic_irrigation = on
        asw_depth = 600  # Depth to which ASW is calculated. (mm)
        crit_fr_asw = 0.5  # Fraction of ASW below which irrigation is applied (0-1.0)
        irrigation_efficiency = 1  # Efficiency of the irrigation. (0-1.0)
        default_no3_conc = 0.0  # Nitrate concentration (ppm N)
        default_nh4_conc = 0.0  # Ammonium concentration (ppm N)
        default_cl_conc = 0.0  # Chloride concentration (ppm Cl)
      soil: Site=Generic; Region=South East Queensland; State=Queensland; Longitude=999999
        SoilType = Black Vertosol  # Classification
        NearestTown = Generic
        Latitude = 999999  # Latitude (WGS84)
        LocationAccuracy = Regional Soil Type
        Comment = estimated cotton LL  # Comments
        InitWater Initial water
          percentmethod: percent=1; distributed=filled from top
        Water
          Layer:
            Thickness (mm)  BD (g/cc)  AirDry (mm/mm)  LL15 (mm/mm)  DUL (mm/mm)  SAT (mm/mm)
            150             1.02       0.145           0.29          0.54         0.59
            150             1.03       0.232           0.29          0.53         0.58
            300             1.02       0.29            0.29          0.54         0.59
            300             1.02       0.29            0.29          0.54         0.58
            300             1.06       0.29            0.29          0.52         0.57
            300             1.11       0.29            0.29          0.5          0.55
            300             1.12       0.29            0.29          0.5          0.55
            300             1.15       0.29            0.29          0.48         0.53
            300             1.18       0.29            0.29          0.47         0.52
            300             1.2        0.29            0.29          0.46         0.51
            300             1.25       0.29            0.29          0.44         0.49
          SoilCrop wheat
            Layer:
              Thickness (mm)  LL (mm/mm)  KL (/day)  XF (0-1)
              150             0.29        0.06       1
              150             0.29        0.06       1
              300             0.32        0.06       1
              300             0.32        0.04       1
              300             0.35        0.04       1
              300             0.38        0.02       0.42
              300             0.41        0.02       0.37
              300             0.48        0          0
              300             0.47        0          0
              300             0.46        0          0
              300             0.44        0          0
          SoilCrop barley
            Layer:
              Thickness (mm)  LL (mm/mm)  KL (/day)  XF (0-1)
              150             0.29        0.07       1
              150             0.29        0.07       1
              300             0.32        0.07       1
              300             0.38        0.05       1
              300             0.39        0.05       1
              300             0.39        0.03       0.42
              300             0.41        0.02       0.37
              300             0.48        0          0
              300             0.47        0          0
              300             0.46        0          0
              300             0.44        0          0
          SoilCrop canola
            Layer:
              Thickness (mm)  LL (mm/mm)  KL (/day)  XF (0-1)
              150             0.29        0.06       1
              150             0.29        0.06       1
              300             0.32        0.06       1
              300             0.32        0.04       1
              300             0.35        0.04       1
              300             0.38        0.02       0.42
              300             0.41        0.01       0.37
              300             0.48        0          0
              300             0.47        0          0
              300             0.46        0          0
              300             0.44        0          0
          SoilCrop chickpea
            Layer:
              Thickness (mm)  LL (mm/mm)  KL (/day)  XF (0-1)
              150             0.29        0.06       1
              150             0.29        0.06       1
              300             0.36        0.06       1
              300             0.43        0.06       1
              300             0.51        0.06       1
              300             0.5         0.06       0.42
              300             0.5         0.06       0.37
              300             0.48        0          0
              300             0.47        0          0
              300             0.46        0          0
              300             0.44        0          0
          SoilCrop cotton
            Layer:
              Thickness (mm)  LL (mm/mm)  KL (/day)  XF (0-1)
              150             0.29        0.1        1
              150             0.29        0.1        1
              300             0.35        0.1        1
              300             0.36        0.1        1
              300             0.38        0.09       1
              300             0.39        0.07       0.42
              300             0.39        0.05       0.37
              300             0.48        0          0
              300             0.47        0          0
              300             0.46        0          0
              300             0.44        0          0
          SoilCrop sorghum
            Layer:
              Thickness (mm)  LL (mm/mm)  KL (/day)  XF (0-1)
              150             0.29        0.07       1
              150             0.29        0.07       1
              300             0.35        0.07       1
              300             0.38        0.05       1
              300             0.4         0.05       1
              300             0.4         0.04       0.42
              300             0.4         0.03       0.37
              300             0.48        0          0
              300             0.47        0          0
              300             0.46        0          0
              300             0.44        0          0
          SoilCrop mungbean
            Layer:
              Thickness (mm)  LL (mm/mm)  KL (/day)  XF (0-1)
              150             0.29        0.06       1
              150             0.29        0.06       1
              300             0.32        0.06       1
              300             0.32        0.04       1
              300             0.35        0.04       1
              300             0.38        0.01       0.42
              300             0.41        0.01       0.37
              300             0.48        0          0
              300             0.47        0          0
              300             0.46        0          0
              300             0.44        0          0
          SoilCrop sunflower
            Layer:
              Thickness (mm)  LL (mm/mm)  KL (/day)  XF (0-1)
              150             0.29        0.1        1
              150             0.29        0.1        1
              300             0.32        0.08       1
              300             0.32        0.06       1
              300             0.35        0.04       1
              300             0.38        0.02       0.42
              300             0.41        0.01       0.37
              300             0.48        0          0
              300             0.47        0          0
              300             0.46        0          0
              300             0.44        0          0
          SoilCrop fababean
            Layer:
              Thickness (mm)  LL (mm/mm)  KL (/day)  XF (0-1)
              150             0.29        0.08       1
              150             0.29        0.08       1
              300             0.32        0.08       1
              300             0.32        0.08       1
              300             0.35        0.06       1
              300             0.38        0.04       0.42
              300             0.41        0.03       0.37
              300             0.48        0          0
              300             0.47        0          0
              300             0.46        0          0
              300             0.44        0          0
          SoilCrop lucerne
            Layer:
              Thickness (mm)  LL (mm/mm)  KL (/day)  XF (0-1)
              150             0.29        0.1        1
              150             0.29        0.1        1
              300             0.29        0.1        1
              300             0.29        0.1        1
              300             0.3         0.09       1
              300             0.31        0.09       0.42
              300             0.32        0.09       0.37
              300             0.33        0.09       0.33
              300             0.34        0.09       0.31
              300             0.35        0.09       0.31
              300             0.36        0.09       0.33
          SoilCrop maize
            Layer:
              Thickness (mm)  LL (mm/mm)  KL (/day)  XF (0-1)
              150             0.29        0.06       1
              150             0.29        0.06       1
              300             0.34        0.06       1
              300             0.34        0.04       1
              300             0.37        0.04       1
              300             0.4         0.02       0.42
              300             0.42        0.01       0.37
              300             0.48        0          0
              300             0.47        0          0
              300             0.46        0          0
              300             0.44        0          0
          SoilCrop perennial grass
            Layer:
              Thickness (mm)  LL (mm/mm)  KL (/day)  XF (0-1)
              150             0.29        0.1        1
              150             0.29        0.1        1
              300             0.39        0.1        1
              300             0.41        0.1        1
              300             0.4         0.09       1
              300             0.4         0.07       0.42
              300             0.41        0.05       0.37
              300             0.41        0          0
              300             0.4         0          0
              300             0.4         0          0
              300             0.42        0          0
          SoilCrop cowpea: same as Rice.paddock.Soil.Water.canola
          SoilCrop navybean: same as Rice.paddock.Soil.Water.mungbean
          SoilCrop peanut: same as Rice.paddock.Soil.Water.mungbean
          SoilCrop pigeonpea
            Layer:
              Thickness (mm)  LL (mm/mm)  KL (/day)  XF (0-1)
              150             0.29        0.06       1
              150             0.29        0.06       1
              300             0.32        0.06       1
              300             0.32        0.05       1
              300             0.35        0.04       1
              300             0.38        0.02       0.42
              300             0.41        0.01       0.37
              300             0.48        0          0
              300             0.47        0          0
              300             0.46        0          0
              300             0.44        0          0
          SoilCrop soybean: same as Rice.paddock.Soil.Water.canola
          SoilCrop stylo: same as Rice.paddock.Soil.Water.sunflower
          SoilCrop sugar: same as Rice.paddock.Soil.Water.sunflower
          SoilCrop lablab: same as Rice.paddock.Soil.Water.sunflower
        SoilWat: SummerCona=3.5; SummerU=6; SummerDate=1-Nov; WinterCona=2.5; WinterU=4; WinterDate=1-apr; DiffusConst=40; DiffusSlope=16; Salb=0.12; CN2Bare=73; CNRed=20; CNCov=0.8
          Layer:
            Thickness (mm)  SWCON (0-1)
            150             0.3
            150             0.3
            300             0.3
            300             0.3
            300             0.3
            300             0.3
            300             0.3
            300             0.3
            300             0.3
            300             0.3
            300             0.3
        SoilOrganicMatter: RootCN=40; RootWT=1000; SoilCN=12; EnrACoeff=7.4; EnrBCoeff=0.2
          Layer:
            Thickness (mm)  OC (Total %)  FBiom (0-1)  FInert (0-1)
            150             1.04          0.04         0.4
            150             0.89          0.02         0.6
            300             0.89          0.02         0.8
            300             0.89          0.02         1
            300             0.77          0.01         1
            300             0.45          0.01         1
            300             0.27          0.01         1
            300             0.22          0.01         1
            300             0.16          0.01         1
            300             0.13          0.01         1
            300             0.12          0.01         1
        Analysis
          Layer:
            Thickness (mm)  EC (1:5 dS/m)  PH (1:5 water)
            150             0.2            8.4
            150             0.3            8.8
            300             0.3            9
            300             0.4            9.2
            300             0.6            9.2
            300             0.8            9.1
            300             0.9            9
            300             1              9
            300             1.1            8.9
            300             1.1            8.9
            300             1              8.9
        Sample Initial nitrogen
          Layer:
            Thickness (mm)  NO3 (ppm)  NH4 (ppm)
            150             6.503      0.599004
            150             2.101      0.100001
            300             2.101      0.100001
            300             1.701      0.100001
            300             1.701      0.100001
            300             1.701      0.100001
            300             1.701      0.100001
            300             1.701      0.100001
            300             1.701      0.100001
            300             1.701      0.100001
            300             1.701      0.100001
      rice
      outputfile: filename=Rice.out; title=Rice
        variables
          variables: dd/mm/yyyy as Date, ancr, anlv, anso, cover_green, cover_tot, crop_type, cropsta, dae, dtga, dvr, dvs, eff, etae, etd, etrd, fnlv, gcr, height, hu, ldstrs, lestrs, lrstrs, nacr, nflv, pcew, plant_status, rlai, rnstrs, ssga, tnsoil, trc, wagt, wlvd, wlvg, wso, wst, zrt
        events Reporting Frequency: event=Daily
  simulation Ponding Simulation
    metfile met: filename=%apsim%\Examples\MetFiles\bhola.met
    clock
      start_date = 1/01/1990  # Select the start date of the simulation
      end_date = 30/06/1991  # Select the end date of the simulation
    summaryfile
    area paddock
      outputfile: filename=Ponding Simulation.out; title=Ponding Simulation
        variables
          variables: dd/mmm/yyyy as Date, Watering.pond_depth, irrigation, wagt
        events Reporting Frequency: event=Daily
      soil: Site=Jerilderie; Region=Riverina; State=New South Wales; Longitude=145.72891
        SoilType = Wunnamurra Clay  # Classification
        NearestTown = Jerilderie
        Latitude = -35.35664  # Latitude (WGS84)
        LocationAccuracy = Regional Soil Type
        DataSource = From Maize Man with permission from Liz Humphries, CSIRO L&W using some grower data (2005)
        InitNitrogen Initial nitrogen
          PercentMethod: Percent=0
        InitWater Initial water
          PercentMethod: Percent=0
        Water
          Layer:
            Thickness (mm)  BD (g/cc)  AirDry (mm/mm)  LL15 (mm/mm)  DUL (mm/mm)  SAT (mm/mm)
            150             1.3        0.095           0.19          0.41         0.49
            150             1.3        0.184           0.23          0.44         0.49
            300             1.4        0.27            0.27          0.44         0.45
            300             1.3        0.27            0.27          0.46         0.49
            300             1.3        0.27            0.27          0.46         0.49
            300             1.2        0.27            0.27          0.46         0.52
            300             1.2        0.27            0.27          0.46         0.52
          SoilCrop wheat
            Layer:
              Thickness (mm)  LL (mm/mm)  KL (/day)  XF (0-1)
              150             0.19        0.06       1
              150             0.23        0.06       1
              300             0.27        0.04       1
              300             0.28        0.04       1
              300             0.3         0.03       1
              300             0.32        0.02       1
              300             0.35        0.02       1
        SoilWat: SummerCona=3.5; SummerU=6; SummerDate=1-Nov; WinterCona=2; WinterU=2; WinterDate=1-apr; DiffusConst=40; DiffusSlope=16; Salb=0.13; CN2Bare=73; CNRed=20; CNCov=0.8
          Layer:
            Thickness (mm)  SWCON (0-1)  MWCON (0-1)
            150             0.3          1
            150             0.3          1
            300             0.2          1
            300             0.2          0
            300             0.2          1
            300             0.3          1
            300             0.3          1
        SoilOrganicMatter: RootCN=45; RootWT=1500; SoilCN=12.5; EnrACoeff=7.4; EnrBCoeff=0.2
          Layer:
            Thickness (mm)  OC (Total %)  FBiom (0-1)  FInert (0-1)
            150             1.75          0.02         0.4
            150             1.4           0.02         0.6
            300             0.6           0.01         0.8
            300             0.3           0.01         0.9
            300             0.1           0.01         1
            300             0.1           0.01         1
            300             0.1           0.01         1
        Analysis
          Layer:
            Thickness (mm)  EC (1:5 dS/m)  PH (1:5 water)  CL (mg/kg)  ESP (%)
            150             0.1            7.2             0.1         1
            150             0.2            7.9             0.1         2
            300             0.3            8.8             0.1         4
            300             0.3            9               0.1         8
            300             0.4            8.9             0.1         16
            300             0.5            8.9             0.1         32
            300             0.6            8.9             0.1         32
        Sample Soil sample
          Layer:
            {Thickness (mm)=30000, NO3 (ppm)=0, NH4 (ppm)=0, SW (mm/mm)=0}
      irrigation
        automatic_irrigation = off
        asw_depth = 600  # Depth to which ASW is calculated. (mm)
        crit_fr_asw = 0.5  # Fraction of ASW below which irrigation is applied (0-1.0)
        irrigation_efficiency = 1  # Efficiency of the irrigation. (0-1.0)
        default_no3_conc = 0.0  # Nitrate concentration (ppm N)
        default_nh4_conc = 0.0  # Ammonium concentration (ppm N)
        default_cl_conc = 0.0  # Chloride concentration (ppm Cl)
      manager Watering
        on init:
```
max_pond = 0.0
pond_depth = 0.0
top_dress = 0
```
        on start_of_day:
```
!

if day = 1 then 
'Soil Water' set max_pond = 50
endif


if rice.plant_status = 'alive' and pond_depth < 50 then
irrig_amount = 50-pond_depth
Irrigation apply amount = irrig_amount
tot_irrig = tot_irrig + irrig_amount
!fertiliser apply amount = 10, type=urea_n
endif

if (day = 288) then
  rice sow cultivar = riverina, establishment = direct-seed, nplds = 180 (p/m2)
fertiliser apply amount = 200, type=urea_n
endif

if rice.dvs >0.3 and top_dress = 0 then
  fertiliser apply amount = 800, type = no3_n
  top_dress = 1
endif

!if (day = 288) then
!  rice sow cultivar = riverina, establishment = transplant, sbdur = 50, nplh = 10 , nh = 2, nplsb = 100
!endif

if (rice.plant_status = 'dead') then
  rice end_crop
  tot_irrig = 0
  top_dress = 0
endif
```
        on end_of_day:
```
pond_depth = pond
```
      fertiliser
      rice
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