folder Simulations: version=15
  simulation Upland Aus
    metfile met: filename=%apsim%\Examples\MetFiles\bhola.met
    climatechange
      maxtmodifier = 0  # Change in maximum temperature in degrees celsius
      mintmodifier = 0  # Change in minimum temperature in degrees celsius
      rainmodifier = 1  # Relative change in rainfall
      radiationmodifier = 1.5  # Relative change in radiation
      co2 = 350  # Atmospheric C02 concentration (ppm)
    clock
      start_date = 1/01/1988  # Select the start date of the simulation
      end_date = 30/6/1989  # Select the end date of the simulation
    summaryfile: filename=Blank Simulation.sum
    area paddock
      registrations global
      folder Manager folder
        manager Rice sowing rule
          on init:
```
!Inital variables
Irrigation_amount = 0
evap_amount = 0
```
          on start_of_day:
```
!Upland Aus                                      
                                      ! plant 25th Mar (Mar-July)
if (day = 84) then
    rice sow cultivar = local, establishment = direct-seed, nplds = 180 (p/m2)
endif
```
          on end_of_day:
```
if (rice.plant_status = 'dead') then
  rice end_crop
  Irrigation_amount = 0                                                   !reset  counters
  evap_amount = 0
                                                                                           !remove stubble
  SurfaceOM tillage type = burn, remove = 0.95
endif

                                                                                          
                                                                                           !counters
 Irrigation_amount = Irrigation_amount + irrig_tot
 evap_amount = evap_amount + es
```
        manager Fertilise_sowing
          category =  # When should fertiliser be applied
          fert_date = 15-aug  # Enter fertiliser date (dd-mmm)
          fert_criteria = 1000  # Don't add fertiliser if N in top 2 layers exceeds (kg/ha)
          category =  # Fertiliser application details
          fertmodule = Fertiliser  # Module used to apply the fertiliser
          fert_amount = 0  # Amount of fertiliser to apply (kg/ha)
          fert_type = urea_N  # Fertiliser type
          on start_of_day:
```
         if (today = date('[fert_date]') then
            N_topsoil = no3(1) + nh4(1) + no3(2) + nh4(2)
            if (N_topsoil < [fert_criteria]) then
               [fertmodule] apply amount = [fert_amount] (kg/ha), depth = 50 (mm), type = [fert_type] ()
            endif
         endif
```
        manager First_Fertilise_DAS
          category =  # When should fertiliser be applied
          fert_date = 05-Apr  # Enter fertiliser date (dd-mmm)
          fert_criteria = 1000  # Don't add fertiliser if N in top 2 layers exceeds (kg/ha)
          category =  # Fertiliser application details
          fertmodule = Fertiliser  # Module used to apply the fertiliser
          fert_amount = 15  # Amount of fertiliser to apply (kg/ha)
          fert_type = urea_N  # Fertiliser type
          on start_of_day:
          script: same as in Upland Aus.paddock.Manager folder.Fertilise_sowing
        manager Second_Fertilise_DAS
          category =  # When should fertiliser be applied
          fert_date = 25-Apr  # Enter fertiliser date (dd-mmm)
          fert_criteria = 1000  # Don't add fertiliser if N in top 2 layers exceeds (kg/ha)
          category =  # Fertiliser application details
          fertmodule = Fertiliser  # Module used to apply the fertiliser
          fert_amount = 20  # Amount of fertiliser to apply (kg/ha)
          fert_type = urea_N  # Fertiliser type
          on start_of_day:
          script: same as in Upland Aus.paddock.Manager folder.Fertilise_sowing
        manager Third_Fertilise_DAS
          category =  # When should fertiliser be applied
          fert_date = 10-May  # Enter fertiliser date (dd-mmm)
          fert_criteria = 1000  # Don't add fertiliser if N in top 2 layers exceeds (kg/ha)
          category =  # Fertiliser application details
          fertmodule = Fertiliser  # Module used to apply the fertiliser
          fert_amount = 40  # Amount of fertiliser to apply (kg/ha)
          fert_type = urea_N  # Fertiliser type
          on start_of_day:
          script: same as in Upland Aus.paddock.Manager folder.Fertilise_sowing
      irrigation
        automatic_irrigation = on
        asw_depth = 300  # Depth to which ASW is calculated. (mm)
        crit_fr_asw = 0.6  # Fraction of ASW below which irrigation is applied (0-1.0)
        irrigation_efficiency = 1  # Efficiency of the irrigation. (0-1.0)
        default_no3_conc = 0  # Nitrate concentration (ppm N)
        default_nh4_conc = 0  # Ammonium concentration (ppm N)
        default_cl_conc = 0  # Chloride concentration (ppm Cl)
      surfaceom
        PoolName = wheat_stubble  # Organic Matter pool name
        type = wheat  # Organic Matter type
        mass = 1000  # Initial surface residue (kg/ha)
        cnr = 80  # C:N ratio of initial residue
        standing_fraction = 0  # Fraction of residue standing
      fertiliser
      rice
        eo_source = eo
      soil BholaSouthBalia06: state=Bangladesh; region=Bhola; nearesttown=Bhola; site=Sth Balia; Latitude=999999; Longitude=90.633614; Salb=0.14; DiffusConst=450; DiffusSlope=188; CN2Bare=84; CNRed=20; CNCov=0.8; RootCN=40; RootWT=1500; SoilCN=12.5; EnrACoeff=7.4; EnrBCoeff=0.2; U=4; Cona=2.5
        comment=2006/07 field measured DUL using wettest profile from pre-season measurements, estimated CLL
        profile
          layer:
            thickness  bd     ll15  airdry  dul    sat    swcon  fbiom  finert  oc    ec  ph   cl  mwcon  ll wheat  kl wheat  xf wheat  ll wheat_old  kl wheat_old  xf wheat_old  ll mungbean  kl mungbean  xf mungbean
            150        1.458  0.18  0.18    0.345  0.42   0.1    0.04   0.4     1.5   0   6.5  0   1      0.18      0.06      1         0.206         0.06          1             0.18         0.06         1
            150        1.348  0.19  0.19    0.311  0.461  0.1    0.02   0.6     1.2   0   7    0   1      0.19      0.06      1         0.191         0.06          1             0.19         0.06         1
            300        1.413  0.2   0.19    0.387  0.437  0.1    0.02   0.8     0.75  0   7.4  0   1      0.22      0.06      1         0.263         0.04          1             0.22         0.06         1
            300        1.4    0.25  0.2     0.392  0.442  0.1    0.02   0.9     0.38  0   8.1  0   1      0.27      0.06      1         0.306         0.04          1             0.27         0.06         1
            300        1.36   0.27  0.25    0.407  0.457  0.1    0.01   1       0.23  0   8.3  0   1      0.3       0.03      1         0.33          0.03          1             0.407        0.03         0
            300        1.32   0.3   0.28    0.407  0.457  0.1    0.01   1       0.15  0   8.5  0   1      0.35      0.02      0         0.35          0.02          1             0.407        0.02         0
            300        1.32   0.34  0.3     0.407  0.457  0.1    0.01   1       0.15  0   8.5  0   1      0.407     0.02      0         0.407         0.02          0             0.407        0.02         0
            500        1.32   0.38  0.34    0.41   0.457  0.1    0.01   1       0.15  0   8.5  0   1      0.41      0.02      0         0.41          0.06          1             0.41         0.02         0
            500        1.32   0.38  0.36    0.41   0.457  0      0.01   1       0.15  0   8.5  0   0      0.41      0.02      0         0.41          0.06          1             0.41         0.02         0
        InitWater: RelativeTo=wheat
          profile
            layer:
              thickness  sw
              150        0.34
              150        0.284
              300        0.382
              300        0.426
              300        0.422
              300        0.451
              300        0.425
              500        0.425
              500        0.425
        InitNitrogen
          profile
            layer:
              thickness  no3       nh4
              150        0.399957  0.600183
              150        0.599955  0.100016
              300        0.599952  0.100016
              300        0.299999  0.100016
              300        0.70001   0.100016
              300        0.399987  0.100016
              300        0.1       0.1
              500        0.1       0.1
              500        0.1       0.1
      outputfile Output
        variables
          variables: dd/mm/yyyy as Date, year, crop_type, DaysAfterSowing, dae as Rice.DaysAfterSowing, cropsta, wagt, wso, rlai, zrt, ldstrs, lestrs, lrstrs, ancr, irrigation_amount as irrig, evap_amount, biomass, yield, TopsTotalN, esw, tnsoil as N_avail_4_rice, NO3(), surfaceom_wt, water_table
        events Reporting Frequency: event=daily
        SplitReport Yield
        SplitReport Biomass
        SplitReport Water
        SplitReport Nitrogen
        SplitReport Stress
        SplitReport Irrigation
        SplitReport Residue
  simulation Paddy Transplanted Aman
    metfile met: filename=%apsim%\Examples\MetFiles\bhola.met
    climatechange
      maxtmodifier = 0  # Change in maximum temperature in degrees celsius
      mintmodifier = 0  # Change in minimum temperature in degrees celsius
      rainmodifier = 1  # Relative change in rainfall
      radiationmodifier = 1.5  # Relative change in radiation
      co2 = 350  # Atmospheric C02 concentration (ppm)
    clock
      start_date = 1/01/1988  # Select the start date of the simulation
      end_date = 30/6/1989  # Select the end date of the simulation
    summaryfile: filename=Blank Simulation.sum
    area paddock
      registrations global
      folder Manager folder
        manager Rice sowing rule
          on init:
```
!Inital variables
Irrigation_amount = 0
evap_amount = 0
```
          on start_of_day:
```
!Transplanted Aman                                    
                                      ! plant 1st Aug (July-Dec)
! Transplant
if (day = 213) then                                                                    !sbdur= duration of seedbed
                                                                                                    !nplh= number of plants on hills
                                                                                                    !nh= number of hills
    rice sow cultivar = BR23, establishment = transplant, sbdur = 44, nplh = 4 , nh = 28, nplsb = 112
endif
```
          on end_of_day:
          script: same as in Upland Aus.paddock.Manager folder.Rice sowing rule
        manager Fertilise_sowing: same as Upland Aus.paddock.Manager folder.Fertilise_sowing
        manager First_Fertilise_DAS
          category =  # When should fertiliser be applied
          fert_date = 15-aug  # Enter fertiliser date (dd-mmm)
          fert_criteria = 1000  # Don't add fertiliser if N in top 2 layers exceeds (kg/ha)
          category =  # Fertiliser application details
          fertmodule = Fertiliser  # Module used to apply the fertiliser
          fert_amount = 25  # Amount of fertiliser to apply (kg/ha)
          fert_type = urea_N  # Fertiliser type
          on start_of_day:
          script: same as in Upland Aus.paddock.Manager folder.Fertilise_sowing
        manager Second_Fertilise_DAS
          category =  # When should fertiliser be applied
          fert_date = 30-aug  # Enter fertiliser date (dd-mmm)
          fert_criteria = 1000  # Don't add fertiliser if N in top 2 layers exceeds (kg/ha)
          category =  # Fertiliser application details
          fertmodule = Fertiliser  # Module used to apply the fertiliser
          fert_amount = 30  # Amount of fertiliser to apply (kg/ha)
          fert_type = urea_N  # Fertiliser type
          on start_of_day:
          script: same as in Upland Aus.paddock.Manager folder.Fertilise_sowing
        manager Third_Fertilise_DAS
          category =  # When should fertiliser be applied
          fert_date = 15-sep  # Enter fertiliser date (dd-mmm)
          fert_criteria = 1000  # Don't add fertiliser if N in top 2 layers exceeds (kg/ha)
          category =  # Fertiliser application details
          fertmodule = Fertiliser  # Module used to apply the fertiliser
          fert_amount = 50  # Amount of fertiliser to apply (kg/ha)
          fert_type = urea_N  # Fertiliser type
          on start_of_day:
          script: same as in Upland Aus.paddock.Manager folder.Fertilise_sowing
      irrigation
        automatic_irrigation = on
        asw_depth = 500  # Depth to which ASW is calculated. (mm)
        crit_fr_asw = 0.6  # Fraction of ASW below which irrigation is applied (0-1.0)
        irrigation_efficiency = 1  # Efficiency of the irrigation. (0-1.0)
        default_no3_conc = 0.0  # Nitrate concentration (ppm N)
        default_nh4_conc = 0.0  # Ammonium concentration (ppm N)
        default_cl_conc = 0.0  # Chloride concentration (ppm Cl)
      surfaceom
        PoolName = wheat_stubble  # Organic Matter pool name
        type = wheat  # Organic Matter type
        mass = 1000  # Initial surface residue (kg/ha)
        cnr = 80  # C:N ratio of initial residue
        standing_fraction = 0  # Fraction of residue standing
      fertiliser
      rice
        eo_source = eo
      soil BholaSouthBalia06: same as Upland Aus.paddock.BholaSouthBalia06
      outputfile Output
        variables
          variables: dd/mm/yyyy as Date, year, crop_type, DaysAfterSowing, dae as Rice.DaysAfterSowing, cropsta, wagt, wso, rlai, zrt, ldstrs, lestrs, lrstrs, ancr, irrigation_amount as irrig, evap_amount, biomass, yield, TopsTotalN, esw, tnsoil as N_avail_4_rice, NO3(), surfaceom_wt, water_table
        events Reporting Frequency: event=daily
        SplitReport Yield
        SplitReport Biomass
        SplitReport Water
        SplitReport Nitrogen
        SplitReport Stress
        SplitReport Irrigation
        SplitReport Residue
  simulation Paddy Transplated Rotation
    metfile met: filename=%apsim%\Examples\MetFiles\bhola.met
    climatechange
      maxtmodifier = 0  # Change in maximum temperature in degrees celsius
      mintmodifier = 0  # Change in minimum temperature in degrees celsius
      rainmodifier = 1  # Relative change in rainfall
      radiationmodifier = 1.5  # Relative change in radiation
      co2 = 350  # Atmospheric C02 concentration (ppm)
    clock
      start_date = 1/01/1988  # Select the start date of the simulation
      end_date = 30/6/1989  # Select the end date of the simulation
    summaryfile: filename=Blank Simulation.sum
    area paddock
      registrations global
      folder Manager folder
        manager Rice sowing rule
          on init:
```
!Inital variables
Irrigation_amount = 0
evap_amount = 0
```
          on start_of_day:
```
!Transplanted Aus                                     
                                      ! plant 25th Apr (Apr-Aug)
! Transplant
if (day = 91) then                                                                    !sbdur= duration of seedbed
                                                                                                    !nplh= number of plants on hills
                                                                                                    !nh= number of hills
          rice sow cultivar = BR3, establishment = transplant, sbdur = 45, nplh = 25 , nh = 7, nplsb = 180
endif

!Transplanted Aman                                    
                                      ! plant 20th Aug (July-Dec)
! Transplant
if (day = 213) then                                                                    !sbdur= duration of seedbed
                                                                                                    !nplh= number of plants on hills
                                                                                                    !nh= number of hills
      rice sow cultivar = BR23, establishment = transplant, sbdur = 44, nplh = 4 , nh = 28, nplsb = 112
endif
```
          on end_of_day:
          script: same as in Upland Aus.paddock.Manager folder.Rice sowing rule
        manager Fertilise_sowing: same as Upland Aus.paddock.Manager folder.Fertilise_sowing
        manager First_Fertilise_DAS
          category =  # When should fertiliser be applied
          fert_date = 05-may  # Enter fertiliser date (dd-mmm)
          fert_criteria = 1000  # Don't add fertiliser if N in top 2 layers exceeds (kg/ha)
          category =  # Fertiliser application details
          fertmodule = Fertiliser  # Module used to apply the fertiliser
          fert_amount = 25  # Amount of fertiliser to apply (kg/ha)
          fert_type = urea_N  # Fertiliser type
          on start_of_day:
          script: same as in Upland Aus.paddock.Manager folder.Fertilise_sowing
        manager Second_Fertilise_DAS
          category =  # When should fertiliser be applied
          fert_date = 22-may  # Enter fertiliser date (dd-mmm)
          fert_criteria = 1000  # Don't add fertiliser if N in top 2 layers exceeds (kg/ha)
          category =  # Fertiliser application details
          fertmodule = Fertiliser  # Module used to apply the fertiliser
          fert_amount = 30  # Amount of fertiliser to apply (kg/ha)
          fert_type = urea_N  # Fertiliser type
          on start_of_day:
          script: same as in Upland Aus.paddock.Manager folder.Fertilise_sowing
        manager Third_Fertilise_DAS
          category =  # When should fertiliser be applied
          fert_date = 6-jun  # Enter fertiliser date (dd-mmm)
          fert_criteria = 1000  # Don't add fertiliser if N in top 2 layers exceeds (kg/ha)
          category =  # Fertiliser application details
          fertmodule = Fertiliser  # Module used to apply the fertiliser
          fert_amount = 50  # Amount of fertiliser to apply (kg/ha)
          fert_type = urea_N  # Fertiliser type
          on start_of_day:
          script: same as in Upland Aus.paddock.Manager folder.Fertilise_sowing
      irrigation
        automatic_irrigation = on
        asw_depth = 300  # Depth to which ASW is calculated. (mm)
        crit_fr_asw = 0.6  # Fraction of ASW below which irrigation is applied (0-1.0)
        irrigation_efficiency = 1  # Efficiency of the irrigation. (0-1.0)
        default_no3_conc = 0.0  # Nitrate concentration (ppm N)
        default_nh4_conc = 0.0  # Ammonium concentration (ppm N)
        default_cl_conc = 0.0  # Chloride concentration (ppm Cl)
      surfaceom
        PoolName = wheat_stubble  # Organic Matter pool name
        type = wheat  # Organic Matter type
        mass = 1000  # Initial surface residue (kg/ha)
        cnr = 80  # C:N ratio of initial residue
        standing_fraction = 0  # Fraction of residue standing
      fertiliser
      rice
        eo_source = eo
      soil BholaSouthBalia06: same as Upland Aus.paddock.BholaSouthBalia06
      outputfile Output
        variables
          variables: dd/mm/yyyy as Date, year, crop_type, DaysAfterSowing, dae as Rice.DaysAfterSowing, cropsta, wagt, wso, rlai, zrt, ldstrs, lestrs, lrstrs, ancr, irrigation_amount as irrig, evap_amount, biomass, yield, TopsTotalN, esw, tnsoil as N_avail_4_rice, NO3(), surfaceom_wt, water_table
        events Reporting Frequency: event=daily
        SplitReport Yield
        SplitReport Biomass
        SplitReport Water
        SplitReport Nitrogen
        SplitReport Stress
        SplitReport Irrigation
        SplitReport Residue
