folder simulations: version=32
  simulation Wether Lucerne Supplement
    metfile met: filename=%Apsim%/Examples/MetFiles/Goond.met
    clock
      start_date = 1/01/1940  # Select the start date of the simulation
      end_date = 30/12/1945  # Select the end date of the simulation
    summaryfile
    area paddock
      soil: WaterFormat=VolumetricPercent; Site=Generic; Region=South East Queensland
        Comment = estimated cotton LL  # Comments
        SoilType = Black Vertosol  # Soil description
        Water
          Layer:
            Thickness (mm)  BD (g/cc)  AirDry (mm/mm)  LL15 (mm/mm)  DUL (mm/mm)  SAT (mm/mm)
            150             1.02       0.14            0.29          0.54         0.59
            150             1.03       0.26            0.29          0.53         0.58
            300             1.02       0.29            0.29          0.54         0.59
            300             1.02       0.29            0.29          0.54         0.58
            300             1.06       0.3             0.3           0.52         0.57
            300             1.11       0.31            0.31          0.5          0.55
            300             1.12       0.32            0.32          0.5          0.55
            300             1.15       0.33            0.33          0.48         0.53
            300             1.18       0.34            0.34          0.47         0.52
            300             1.2        0.35            0.35          0.46         0.51
            300             1.25       0.36            0.36          0.44         0.49
          SoilCrop wheat
            Layer:
              Thickness (mm)  LL (mm/mm)  KL (/day)  XF (0-1)
              150             0.29        0.1        1
              150             0.29        0.1        1
              300             0.32        0.08       1
              300             0.32        0.06       1
              300             0.35        0.04       1
              300             0.38        0.02       1
              300             0.41        0.01       1
              300             0.48        0          0
              300             0.47        0          0
              300             0.46        0          0
              300             0.44        0          0
          SoilCrop barley
            Layer:
              Thickness (mm)  LL (mm/mm)  KL (/day)  XF (0-1)
              150             0.29        0.1        1
              150             0.29        0.1        1
              300             0.32        0.08       1
              300             0.38        0.06       1
              300             0.39        0.04       1
              300             0.39        0.02       1
              300             0.41        0.01       1
              300             0.48        0          0
              300             0.47        0          0
              300             0.46        0          0
              300             0.44        0          0
          SoilCrop canola: same as Wether Lucerne Supplement.paddock.Soil.Water.wheat
          SoilCrop Chickpea
            Layer:
              Thickness (mm)  LL (mm/mm)  KL (/day)  XF (0-1)
              150             0.29        0.1        1
              150             0.29        0.1        1
              300             0.36        0.08       1
              300             0.43        0.06       1
              300             0.51        0.04       1
              300             0.5         0.02       1
              300             0.5         0.01       1
              300             0.48        0          0
              300             0.47        0          0
              300             0.46        0          0
              300             0.44        0          0
          SoilCrop Lucerne
            Layer:
              Thickness (mm)  LL (mm/mm)  KL (/day)  XF (0-1)
              150             0.29        0.1        1
              150             0.29        0.1        1
              300             0.29        0.1        1
              300             0.29        0.1        1
              300             0.3         0.09       1
              300             0.31        0.09       1
              300             0.32        0.09       1
              300             0.33        0.09       1
              300             0.34        0.09       1
              300             0.35        0.09       1
              300             0.36        0.09       1
          SoilCrop Maize
            Layer:
              Thickness (mm)  LL (mm/mm)  KL (/day)  XF (0-1)
              150             0.29        0.1        1
              150             0.29        0.1        1
              300             0.34        0.1        1
              300             0.34        0.08       1
              300             0.37        0.06       1
              300             0.4         0.04       1
              300             0.42        0.02       1
              300             0.48        0          0
              300             0.47        0          0
              300             0.46        0          0
              300             0.44        0          0
          SoilCrop Perennial Grass
            Layer:
              Thickness (mm)  LL (mm/mm)  KL (/day)  XF (0-1)
              150             0.29        0.1        1
              150             0.29        0.1        1
              300             0.39        0.1        1
              300             0.41        0.1        1
              300             0.4         0.09       1
              300             0.4         0.07       1
              300             0.41        0.05       1
              300             0.41        0          0
              300             0.4         0          0
              300             0.4         0          0
              300             0.42        0          0
          SoilCrop Sorghum
            Layer:
              Thickness (mm)  LL (mm/mm)  KL (/day)  XF (0-1)
              150             0.29        0.1        1
              150             0.29        0.1        1
              300             0.35        0.1        1
              300             0.38        0.08       1
              300             0.4         0.06       1
              300             0.4         0.04       1
              300             0.4         0.02       1
              300             0.48        0          0
              300             0.47        0          0
              300             0.46        0          0
              300             0.44        0          0
          SoilCrop Cowpea: same as Wether Lucerne Supplement.paddock.Soil.Water.wheat
          SoilCrop Fababean: same as Wether Lucerne Supplement.paddock.Soil.Water.wheat
          SoilCrop Mungbean: same as Wether Lucerne Supplement.paddock.Soil.Water.wheat
          SoilCrop Navybean: same as Wether Lucerne Supplement.paddock.Soil.Water.wheat
          SoilCrop Peanut: same as Wether Lucerne Supplement.paddock.Soil.Water.wheat
          SoilCrop Pigeonpea: same as Wether Lucerne Supplement.paddock.Soil.Water.wheat
          SoilCrop Soybean: same as Wether Lucerne Supplement.paddock.Soil.Water.wheat
          SoilCrop Stylo: same as Wether Lucerne Supplement.paddock.Soil.Water.wheat
          SoilCrop Sugar: same as Wether Lucerne Supplement.paddock.Soil.Water.wheat
          SoilCrop Sunflower: same as Wether Lucerne Supplement.paddock.Soil.Water.wheat
          SoilCrop Lablab: same as Wether Lucerne Supplement.paddock.Soil.Water.wheat
          SoilCrop Cotton
            Layer:
              Thickness (mm)  LL (mm/mm)  KL (/day)  XF (0-1)
              150             0.29        0.1        1
              150             0.29        0.1        1
              300             0.35        0.1        1
              300             0.36        0.08       1
              300             0.38        0.06       1
              300             0.39        0.04       1
              300             0.39        0.02       1
              300             0.48        0          0
              300             0.47        0          0
              300             0.46        0          0
              300             0.44        0          0
        SoilWat: SummerCona=3.5; SummerU=6; SummerDate=1-Nov; WinterCona=3.5; WinterU=6; WinterDate=1-Apr; DiffusConst=40; DiffusSlope=16; Salb=0.13; CN2Bare=73; CNRed=20; CNCov=0.8
          Layer:
            Thickness (mm)  SWCON (0-1)
            150             0.3
            150             0.3
            300             0.3
            300             0.3
            300             0.3
            300             0.3
            300             0.3
            300             0.3
            300             0.3
            300             0.3
            300             0.3
        SoilOrganicMatter: RootCN=40; RootWT=200; SoilCN=12.5; EnrACoeff=7.4; EnrBCoeff=0.2
          Layer:
            Thickness (mm)  OC (Total %)  FBiom (0-1)  FInert (0-1)
            150             1.04          0.025        0.4
            150             0.89          0.02         0.6
            300             0.89          0.015        0.8
            300             0.89          0.01         0.9
            300             0.77          0.01         0.95
            300             0.45          0.01         0.95
            300             0.27          0.01         0.95
            300             0.22          0.01         0.95
            300             0.16          0.01         0.95
            300             0.13          0.01         0.95
            300             0.12          0.01         0.95
        Analysis
          Layer:
            Thickness (mm)  EC (1:5 dS/m)  PH (1:5 water)
            150             0.2            8.4
            150             0.25           8.8
            300             0.31           9
            300             0.4            9.2
            300             0.59           9.2
            300             0.84           9.1
            300             0.93           9
            300             1.01           9
            300             1.06           8.9
            300             1.05           8.9
            300             1.01           8.9
        Sample Initial nitrogen
          Layer:
            Thickness (mm)  NO3 (ppm)  NH4 (ppm)
            150             6.50005    0.600073
            150             2.10002    0.100012
            300             2.10002    0.100012
            300             1.70001    0.100012
            300             1.70001    0.100012
            300             1.70001    0.100012
            300             1.70001    0.100012
            300             1.70001    0.100012
            300             1.70001    0.100012
            300             1.70001    0.100012
            300             1.70001    0.100012
        Sample Initial water
          Layer:
            Thickness (mm)  SW (mm/mm)
            150             0.540
            150             0.530
            300             0.540
            300             0.540
            300             0.520
            300             0.500
            300             0.500
            300             0.480
            300             0.470
            300             0.460
            300             0.440
      surfaceom SurfaceOrganicMatter
        PoolName = wheat_stubble  # Organic Matter pool name
        type = wheat  # Organic Matter type
        mass = 1000  # Initial surface residue (kg/ha)
        cnr = 80  # C:N ratio of initial residue
        standing_fraction = 0  # Fraction of residue standing
      lucerne
      supplement
        spoilage_time = 0
      stock
        fraction_faeces_added = 0.5
        fraction_urine_added = 0.5
        herbage1 = lucerne  # First plant herbage source
      folder Manager folder
        manager Sow on a fixed date
          # Sowing criteria
          date = 1/07/1940  # Enter sowing date (dd-mmm)
          # Sowing parameters
          crop = lucerne  # Enter name of crop to sow
          density = 100  # Enter sowing density (plants/m2)
          depth = 50  # Enter sowing depth (mm)
          cultivar = sceptre  # Enter cultivar
          row_spacing = 500  # Enter row spacing (mm)
          on start_of_day:
```
        if (today = date('[date]') then
              [crop] sow Population =[density], sowing_depth = [depth], cultivar = [cultivar], row_spacing = [row_spacing]
         endif
```
        manager Buy sheep on feed-on-offer
          # Buy properties
          stockmodule = stock  # Name of stock module
          genotype = suffolk  # Select Genotype
          herbage_module = lucerne  # Module supplying herbage
          buy_feed_on_offer = 200  # Feed on offer (kg/ha)
          buy_number = 15  # Number of stock
          sex = wether  # Select sex
          buy_age = 12  # Age (months)
          buy_weight = 45  # Weight (kg)
          on init:
```
               sheep_presence = 'off'
```
          on start_of_day:
```
        if ([herbage_module].biomass >= [buy_feed_on_offer] AND sheep_presence = 'off') then
           [stockmodule]scienceconverter buystock number = [buy_number] (-), genotype = '[genotype]', sex = [sex], age = [buy_age] (months), weight = [buy_weight] (kg)
           sheep_presence = 'on'
         endif
```
        manager Buy supplement on a fixed date
          # Buy properties
          supplementmodule = supplement  # Name of supplement module
          buy_date = 1-jan  # Date (dd-mmm)
          buy_name = 'lupins'  # Name of the supplement to purchase
          buy_amount = 1000  # Fresh weight of supplement to purchase (kg)
          on start_of_day:
```
        if (today = date('[buy_date]') then
           [supplementmodule]scienceconverter buysupplement supplement = [buy_name] (-), amount = [buy_amount] (kg)
         endif
```
        manager Feed supplement on animal condition loss
          # Feed properties
          supplementmodule = supplement  # Name of supplement module
          days = 5  # Number of days to sum condition change
          crit_condition_change = 0  # Critical condition change needed to start feeding (kg/head)
          max_feed_rate = 1  # Maximum rate of feeding in kg FW/day; 1.0 is sensible for sheep
          feed_name = 'lupins'  # Name of the supplement to purchase
          on init:
```
         FALSE = 0
         TRUE = 1
         feeding = FALSE
         feed_rate = 0.0     ! Rate of feeding in kg FW/day
         crit_cs = 0.0
         feed_rate_factor = 0.2
         est_lag_days = 10.0 / feed_rate_factor
         initial_feed_rate = 0.0
        yest_cond_score_all = 0.0
```
          on start_of_day:
```
         dlt_cond_score = cond_score_all - yest_cond_score_all
         yest_cond_score_all = cond_score_all
            if (feeding = TRUE AND cond_score_all = 0.0) then
               crit_cs = 0.0
               feeding = FALSE
            endif

            if (dlt_cond_score[[days]] < [crit_condition_change] AND crit_cs <= 0.0) then
               crit_cs = cond_score_all
            endif
            if ((feeding = FALSE) AND (cond_score_all < crit_cs)) then
               feeding = TRUE
               feed_rate = initial_feed_rate
            else
               ! leave feeding as is
            endif

            if (feeding = TRUE) then
               feed_rate = feed_rate - feed_rate_factor * (cond_score_all + dlt_cond_score*est_lag_days - crit_cs)
               if (feed_rate > [max_feed_rate]) then
                  feed_rate = [max_feed_rate]
               elseif (feed_rate < 0.0) then
                  feed_rate = 0.0
               endif
               if (feed_rate > 0) then
                   feed_amount = feed_rate * number_all
                   [supplementmodule]scienceconverter feedsupplement  supplement = [feed_name], amount = feed_amount
               else
                  feed_rate = 0.0
               endif
            else
               feed_rate = 0.0
            endif
```
        manager Sell sheep on weight
          # Sell properties
          stockmodule = stock  # Name of stock module
          sell_on_weight_gain = 50  # Weight (gaining)
          sell_on_weight_loss = 40  # Weight (losing)
          sell_number = 15  # Number of stock
          on start_of_day:
```
        if ((stock.weight >= [sell_on_weight_gain] OR stock.weight <= [sell_on_weight_loss]) AND sheep_presence = 'on') then
           [stockmodule]scienceconverter sellstock number = [sell_number] (-)
           sheep_presence = 'off'
        endif
```
      accum Accumulate: variable=dlt_cond_score[20]  # variable
      outputfile: filename=Wether Lucerne Supplement.out; title=Wether Lucerne Supplement
        variables My Variables
          variable:
            dd/mmm/yyyy as Date2  # Date (dd/mmm/yyyy)
            year  # Year
            dm_feed_on_offer()  # Dry matter of feed on offer (kg/ha)
            dm_feed_removed()  # Dry matter of feed removed (kg/ha)
            stock.age
            stock.wt_change
            stock.weight
            stock.sex
            stock.past_intake
            stock.number
            stock.cond_score_all
            stock.past_intake_all
            stock.supp_intake_all
            stock.fleece_wt_all
            stock.fibre_diam_all
            lucerne.biomass  # Biomass
            lucerne.stage  # Plant stage
            lucerne.lai  # Leaf area index
        events My Variables Events: event=daily
