folder simulations: version=24
  simulation test1
    clock
      start_date = 01/07/1988  # Enter the start date of the simulation
      end_date = 30/07/1989  # Enter the end date of the simulation
    metfile met: filename=%apsim%\Examples\MetFiles\WinchmoreMet.met
    summaryfile: filename=AgPasture Simulation.sum
    outputfile DDRules Outputs
      variables
        variables: dd/mm/yyyy as Date, DM_Eaten, DM_Eaten_Pasture, DM_Eaten_Supplement, DM_Eaten_Cow, DM_Eaten_Pasture_Cow, DM_Eaten_Supplement_Cow, MilkProduction, PeakStockingRate, StockingRate, DM_Eaten_Pdks, PWO, PaddockStatus, ME_Demand_Maintance, ME_Demand_Lactation, ME_Demand_Pregnancy, ME_Demand_WeightChange, ME_Demand_Walking, Cow_LWt, Cow_BC, Cow_MilkSolids, ME_Demand_WeightChange_Cow, Cow_BC, ME_Demand_Maintance_Cow, ME_Eaten_Cow, ME_Eaten_Pasture_Cow, ME_Eaten_Supplement_Cow, SilageCut, SilageCut_kgha, TotalFeedDemand, RemainingFeedDemand, TotalCows
      events Reporting Frequency: event=Daily
    outputfile Cow Model
      variables
        variables: dd/mm/yyyy as Date, ME_Demand_Maintance_Cow, ME_Demand_Lactation_Cow, ME_Demand_Pregnancy_Cow, ME_Demand_WeightChange_Cow, ME_Demand_Walking_Cow, WinterOffDryStock, Cow_IsDry, PeakStockingRate, StockingRate
      events Reporting Frequency: event=Daily
    DDRules
    area paddock01
      AgPasture ryegrass_clover
        Nspecies = 2  # Number of species
        thisCropName = ryegrass_clover  # Crop name shown as on the simulation tree
        cropName = ryegrass whiteclover  # Species names
        micrometType = grass grass  # crop type for MicroMet
        isAnnual = 0 0  # Annual species? no=0, yes=1
        isLegume = 0 1  # Legume species? no=0, yes=1
        photoPath = 3 3  # C3 or C4 species? C3=3, C4=4
        rootDepth = 900  300
        growthTmin = 3 3  # Minimum temperature for growth
        growthTmax = 32 32  # Maximum temperature for growth
        growthTopt = 20 20  # Optimum temperature for growth
        growthTq = 2 2  # Curvture of growth response to temperature
        massFluxTmin = 2 2  # Minimum temperature for mass flux
        massFluxTopt = 20 20  # Optimum temperature for mass flux
        massFluxW0 = 2 2  # Scale factor for response of mass flux to soil moisture
        massFluxWopt = 0.5 0.5  # Optimum soil moisture for mass flux
        heatOnsetT = 28 28  # Heat effects- Onset temperature
        heatFullT = 35 35  # Heat effects- Full temperature
        heatSumT = 30 30  # Heat effects- Temperature sum for recovery
        coldOnsetT = 0 0  # Cold effects- Onset temperature
        coldFullT = -3 -3  # Cold effects- Full temperature
        coldSumT = 20 20  # Cold effects- Temperature sum for recovery
        Pm = 1 1  # Reference CO2 assimilation rate (mg CO2/m2.s)
        maintRespiration = 3 3  # Maintenance respiration coefficient (%)
        growthEfficiency = 0.75 0.75
        SLA = 20 20  # Specific leaf area
        lightExtCoeff = 0.5 0.8  # Light extinction coefficient
        stockParameter = 0.05 0.05  # Stock influence parameter
        maxRootFraction = 0.25 0.25  # Maximum biomass fraction allocated to root
        leafRate = 3 3  # Reference leaf appearance rate without stress
        fLeaf = 0.7 0.7  # Reference growth partition to leaves
        fStolon = 0 0.2  # Reference growth partition to stolon
        digestLive = 0.6 0.6  # Digestibility of live plant material
        digestDead = 0.2 0.2  # Digestibility of dead plant material
        dmtotal = 1800 350  # Initial shoot dry matter (kg/ha)
        dmlitter = 250 50  # Initial litter dry matter (kg/ha)
        dmgreenmin = 500 80  # Minimum green dry matter (kg/ha)
        NcleafOpt = 4 4.5  # N concentration - leaf optimum
        NcleafMax = 5 5.5  # N concentration - leaf luxary
        NcleafMin = 1.2 2.0  # N concentration - leaf scenescent
        NcstemFr = 0.5 0.5  # Stem N concentration as fraction of leaf N concentration
        NcstolFr = 0 0.5  # Stolon N concentration as fraction of leaf N concentration
        NcrootFr = 0.5 0.5  # Root N concentration as fraction of leaf N concentration
        NMinFix = 0 0.2  # Minimum N fixation (when soil N is sufficient)
        NMaxFix = 0 0.6  # Maximum N fixation (when soil N is unavailable)
        CO2PmaxScale = 700 700  # CO2 - Scale factor for CO2 effect on photosynthesis
        CO2NScale = 600 600  # CO2 - Scale factor for CO2 effects on plant N concentration
        CO2NMin = 0.7 0.7  # CO2 - Minimum fraction that plant N concentration may reduce to uder elevated CO2
        CO2NCurvature = 2 2  # CO2 - Curvature factor of CO2 effect on plant N concentration
        Frgr = 1 1  # Relative growth factor
        rlvp = 1 0.2 0.1 0.05 0 0 0 0  # Root distribution of swards (relative to each soil layer)
      micromet
        soilalbedo = 0.23
        a_interception = 0
        b_interception = 0
        c_interception = 0
        d_interception = 0
      fertiliser
      surfaceom Surface Organic Matter
        PoolName = AgPasture  # Organic Matter pool name
        type = grass  # Organic Matter type
        mass = 1000  # Initial surface residue (kg/ha)
        cnr = 15  # C:N ratio of initial residue
        standing_fraction = 0  # Fraction of residue standing
      irrigation
        automatic_irrigation = on
        asw_depth = 600  # Depth to which ASW is calculated. (mm)
        crit_fr_asw = 0.5  # Fraction of ASW below which irrigation is applied (0-1.0)
        irrigation_efficiency = 1  # Efficiency of the irrigation. (0-1.0)
        irrigation_allocation = off  # Allocation limits
        allocation = 0  # Allocation in mm
        default_no3_conc = 0  # Nitrate concentration (ppm N)
        default_nh4_conc = 0  # Ammonium concentration (ppm N)
        default_cl_conc = 0  # Chloride concentration (ppm Cl)
      outputfile
        variables
          variables: dd/mmm/yyyy as Date, HerbageGrowthWt, SpeciesLiveWt, LAI_total, LeafLiveWt, leafgreenwt, surfaceom_wt, surfaceom_n, surfaceom_c, AboveGroundWt, AboveGroundLiveWt, AboveGroundDeadWt, GLFwater, cover_green, AboveGroundNPct
        events Reporting Frequency: event=end_day
      soil Canterbury_M: Country=New Zealand; State=Canterbury; Region=Plains; SoilType=NZ_sedementary
        DataSource=Generic profile descriptions provided by Trevor Webb and data for functional horizions based on SWAMP project results
        Comments=Bulk density values were measured on the fine earth fraction so values entered into apsim soil are adjusted down to account for stone content (assuming stones are inert from all soil process so their mass and volume is removed from model paramaters).  SAT, DUL, LL15 and Air dry have been adjusted down to account for stone content.  OC has not been adjusted so the model will get the correct carbon and N amounts using the adjusted BD.
        Water
          Layer:
            Thickness (mm)  BD (g/cc)  SAT (mm/mm)  DUL (mm/mm)  LL15 (mm/mm)  Airdry (mm/mm)  KS (mm/day)
            250             1.3105     0.456165     0.3735       0.1535        0.07675         4832.04
            300             1.524      0.39432      0.332        0.201         0.201           389.229
            300             1.65       0.358515     0.3375       0.201         0.201           16.3619
            300             0.39       0.12         0.039        0.012         0.012           16800
            350             0.39       0.12         0.039        0.012         0.012           16800
          SoilCrop Barley
            Layer:
              Thickness (mm)  LL (mm/mm)  kl (/day)  xf (0-1)
              250             0.1535      0.15       1
              300             0.201       0.1        1
              300             0.201       0.1        0.301194
              300             0.012       0.05       1
              350             0.012       0.05       1
          SoilCrop Canola
            Layer:
              Thickness (mm)  LL (mm/mm)  kl (/day)  xf (0-1)
              250             0.1535      0.15       1
              300             0.201       0.1        0.825307
              300             0.201       0.1        0.120996
              300             0.012       0.05       1
              350             0.012       0.05       1
          SoilCrop Cloverseed
            Layer:
              Thickness (mm)  LL (mm/mm)  kl (/day)  xf (0-1)
              250             0.1535      0.15       1
              300             0.201       0.1        1
              300             0.201       0.1        0.153816
              300             0.012       0.05       1
              350             0.012       0.05       1
          SoilCrop Fieldpea
            Layer:
              Thickness (mm)  LL (mm/mm)  kl (/day)  xf (0-1)
              250             0.1535      0.15       1
              300             0.201       0.1        0.449329
              300             0.201       0.1        0.090718
              300             0.012       0.05       1
              350             0.012       0.05       1
          SoilCrop Fababean: same as test1.paddock01.Canterbury_M.Water.Canola
          SoilCrop kale: same as test1.paddock01.Canterbury_M.Water.Canola
          SoilCrop ItallianRyegrass: same as test1.paddock01.Canterbury_M.Water.Canola
          SoilCrop Lucerne: same as test1.paddock01.Canterbury_M.Water.Barley
          SoilCrop Maize: same as test1.paddock01.Canterbury_M.Water.Canola
          SoilCrop Oats: same as test1.paddock01.Canterbury_M.Water.Cloverseed
          SoilCrop Potato: same as test1.paddock01.Canterbury_M.Water.Fieldpea
          SoilCrop Grassseed: same as test1.paddock01.Canterbury_M.Water.Canola
          SoilCrop Triticale: same as test1.paddock01.Canterbury_M.Water.Cloverseed
          SoilCrop Wheat: same as test1.paddock01.Canterbury_M.Water.Cloverseed
          SoilCrop ryegrass_clover: same as test1.paddock01.Canterbury_M.Water.Canola
          SoilCrop ryegrass: same as test1.paddock01.Canterbury_M.Water.Canola
          SoilCrop whiteclover: same as test1.paddock01.Canterbury_M.Water.Fieldpea
        Lab
          Layer:
            Rocks (%)  Thickness (mm)  PH (1:5 water)  CEC (cmol+/kg)  ParticleSizeSand (%)  ParticleSizeSilt (%)  ParticleSizeClay (%)
            0          250             6               13              14.5                  65.5                  20
            0          300             6               9               18                    58                    24
            0          300             6               9               14                    63                    23
            70         300             6               5               37.7916               57.0964               5.112
            70         350             6               5               37.7916               57.0964               5.112
        SoilWat: SummerU=9; SummerCona=4.4; WinterU=6; WinterCona=3; SummerDate=1-Oct; WinterDate=1-Apr; Salb=0.13; DiffusConst=88; DiffusSlope=35; Cn2Bare=73; CnRed=20; CnCov=0.8
          Layer:
            SWCON (0-1)  Thickness (mm)
            0.496442     250
            0.365575     300
            0.0968316    300
            0.650598     300
            0.650598     350
        SoilOrganicMatter: RootCn=40; RootWt=1000; SoilCn=11; EnrACoeff=7.4; EnrBCoeff=0.2
          Layer:
            FBIOM (0-1)  Thickness (mm)  FINERT (0-1)  OC (Total %)
            0.0288947    250             0.449328      2.36763
            0.0136287    300             0.758676      0.493357
            0.0105998    300             0.901885      0.226613
            0.0100992    300             0.960109      0.202414
            0.0100141    350             0.984954      0.200179
        InitWater
          percentmethod: percent=1; distributed=filled from top
        Sample Initial nitrogen
          Layer:
            Depth (cm)  NO3 (kg/ha)  NH4 (kg/ha)
            0-8         25           1
            8-13        20           1
            13-33       15           1
            33-100      10           1
    area paddock02 -> /simulations/test1/paddock01
    area paddock03 -> /simulations/test1/paddock01
    area paddock04 -> /simulations/test1/paddock01
    area paddock05 -> /simulations/test1/paddock01
    manager Dairy Farm Settings
      on init:
```
DDRules.PeakStockingRate = 2.5
DDRules.WinterOffDryStock = 0
DDRules.FarmArea = 5
```
      on start_of_day:
```
PaddockGrazable(1) = 0
PaddockGrazable(2) = 0
```
    manager Conservation Settings
      #
      start_date = 1-sep  # Enter start date (dd-mmm)
      finish_date = 1-apr  # Enter finish date (dd-mmm)
      trigger_mass = 3500  # Close paddock if pasture mass exceeds (kg/ha)
      residual = 1800  # Pasture residual after cut (kgDM/ha)
      silage_store = yes  # Store conserved feed for later use
      energy_content = 10.5  # Energy content of conversed feed (ME/kgDM)
      silage_on_hand = 250  # Feed stored on farm at start of simulation (kgDM/ha)
      cutting_waste = 5
      on init:
```
ConservationStart = '[start_date]'
ConservationFinish = '[finish_date]'
ConservationTrigger = [trigger_mass]
ConservationResidual = [residual]
SilageCutWastage = cutting_waste

if '[silage_store]' = 'yes' then
   SilageStoreEnable = 1
   SilageME = [energy_content]
   SilageStore = [silage_on_hand]
else
   SilageStoreEnable = 0
   SilageStore = 0
endif
```
    outputfile DDRules Conservation
      variables
        variables: dd/mm/yyyy as Date, SilageCut, SilageCut_kgha, SilageStore, SilageStoreEnable
      events Reporting Frequency: event=Daily
    outputfile Supplements
      variables
        variables: dd/mm/yyyy as Date, SupplementME, SupplementN, SupplementDigestability, SilageME, SilageN, SilageDigestability, SupplementWastage, SilageWastage, SilageCut, SilageStore, SilageCut_kgha, SilageStore_kgha
      events Reporting Frequency: event=Daily
    manager Wintering Off
      #
      start_date = 1-november  # Enter start date (dd-mmm)
      finish_date = 1-december  # Enter finish date (dd-mmm)
      proportion = 0.5  # Proportion of herd wintered off-farm (0-1)
      on init:
```
DCWO = '[start_date]'
DSWO = '[finish_date]'
PWO = [Proportion]
```
    outputfile Removal
      variables
        variables: dd/mm/yyyy as Date, PeakStockingRate, TotalCows, DM_Eaten_Pdks, DM_Eaten_Pdks_Ha, GrazingResidual, GrazingInterval
      events Reporting Frequency: event=Daily
    manager Grazing Settings Test
      #
      irrigate_date = 05-jul  # Enter irrigation date (dd-mmm)
      #
      residual = 1600  # Grazing Residual [kgDM/ha]
      length = 25  # Rotation Length [days]
      on start_of_day:
```
if (today = date('[irrigate_date]')) then
   DDRules.GrazingResidual = [residual]
   DDRules.GrazingInterval = [length]
endif
```
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