folder simulations: version=18
  simulation GattonOct08
    metfile met: filename=Gatton0809.met
    clock
      start_date = 1/10/2008  # Enter the start date of the simulation
      end_date = 30/05/2009  # Enter the end date of the simulation
    summaryfile: filename=Continuous Wheat Simulation.sum
    area paddock
      soil: Site=Jimbour; Region=South East Queensland; LocalName=Waco; SoilType=Black Vertosol; NearestTown=Jimbour, Q 4352; NaturalVegetation=Grassland, mainly Qld bluegrass; Cona=3.5; DiffusConst=40; DiffusSlope=16; U=6; Salb=0.13; Cn2Bare=73; CnRed=20; CnCov=0.8; CnCanopyFact=1; RootCn=40; RootWt=200; SoilCn=12.5; EnrACoeff=7.4; EnrBCoeff=0.2
        profile
          layer:
            thickness  bd    ll15  airdry  dul   sat   sw       swcon  oc    ph   fbiom  finert  no3  nh4  ec    ll frenchbean  kl frenchbean  xf frenchbean
            150        1.02  0.29  0.15    0.54  0.59  9999.99  0.3    1.04  8.4  0.025  0.4     6.5  0.6  0.2   0.29           0.06           1
            150        1.03  0.29  0.26    0.53  0.58  9999.99  0.3    0.89  8.8  0.02   0.6     2.1  0.1  0.25  0.29           0.06           1
            300        1.02  0.29  0.29    0.54  0.59  9999.99  0.3    0.89  9    0.015  0.8     2.1  0.1  0.31  0.29           0.06           1
            300        1.02  0.29  0.29    0.54  0.58  9999.99  0.3    0.89  9.2  0.01   0.9     1.7  0.1  0.4   0.29           0.06           1
            300        1.06  0.3   0.3     0.52  0.57  9999.99  0.3    0.77  9.2  0.01   0.95    1.7  0.1  0.59  0.3            0.06           1
            300        1.11  0.31  0.31    0.5   0.55  9999.99  0.3    0.45  9.1  0.01   0.95    1.7  0.1  0.84  0.31           0.06           1
            300        1.12  0.32  0.32    0.5   0.55  9999.99  0.3    0.27  9    0.01   0.95    1.7  0.1  0.93  0.32           0.06           1
            300        1.15  0.33  0.33    0.48  0.53  9999.99  0.3    0.22  9    0.01   0.95    1.7  0.1  1.01  0.33           0.06           1
            300        1.18  0.34  0.34    0.47  0.52  9999.99  0.3    0.16  8.9  0.01   0.95    1.7  0.1  1.06  0.34           0.06           1
            300        1.2   0.35  0.35    0.46  0.51  9999.99  0.3    0.13  8.9  0.01   0.95    1.7  0.1  1.05  0.35           0.06           1
            300        1.25  0.36  0.36    0.44  0.49  9999.99  0.3    0.12  8.9  0.01   0.95    1.7  0.1  1.01  0.36           0.06           1
        InitWater
          percentmethod: percent=1; distributed=filled from top
        InitNitrogen
          profile
            layer:
              no3    nh4       thickness
              6.503  0.599004  150
              2.101  0.100001  150
              2.101  0.100001  300
              1.701  0.100001  300
              1.701  0.100001  300
              1.701  0.100001  300
              1.701  0.100001  300
              1.701  0.100001  300
              1.701  0.100001  300
              1.701  0.100001  300
              1.701  0.100001  300
      surfaceom surface organic matter
        PoolName = wheat  # Organic Matter pool name
        type = wheat  # Organic Matter type
        mass = 1000  # Initial surface residue (kg/ha)
        cnr = 80  # C:N ratio of initial residue
        standing_fraction = 0  # Fraction of residue standing
      fertiliser
      folder Manager folder
        manager Sow on a fixed date
          category =  # Sowing criteria
          date = 1-oct  # Enter sowing date (dd-mmm)
          category =  # Sowing parameters
          crop = frenchbean  # Enter name of crop to sow
          density = 27  # Enter sowing density (plants/m2)
          depth = 50  # Enter sowing depth (mm)
          cultivar = simba  # Enter cultivar
          row_spacing = 750  # Enter row spacing (mm)
          class = frenchbean  # Enter Crop Class
          on start_of_day:
```
      if (today = date('[date]') then
                    [crop] sow population =[density], depth = [depth], cultivar = [cultivar], MaxCover = 1.0, BudNumber = 1, row_spacing = [row_spacing], crop_class = [class]
        endif
```
        manager Sowing fertiliser
          category =  # When should fertiliser be applied
          modulename = frenchbean  # On which module should the event come from
          eventname = sowing  # On which event should fertiliser be applied
          category =  # Fertiliser application details
          fertmodule = fertiliser  # Module used to apply the fertiliser
          fert_amount_sow = 200  # Amount of starter fertiliser at sowing (kg/ha)
          fert_type_sow = urea_N  # Sowing fertiliser type
          on [modulename].[eventname]:
```
        [fertmodule] apply amount = [fert_amount_sow] (kg/ha), depth = 50 (mm), type = [fert_type_sow]
```
        manager Harvesting rule
          category =  # Harvesting criteria
          crop = frenchbean  # Enter name of crop to harvest when ripe
          on end_of_day:
```
           if [crop].PhenologyCurrentPhaseName = 'HarvestRipe' then

              [crop]  harvest
              [crop]  EndCrop
           endif
```
      micromet
        soilalbedo = 0.23
        a_interception = 0
        b_interception = 0
        c_interception = 0
        d_interception = 0
      outputfile
        variables
          variables: dd/mm/yyyy as Date, esw, LeafLAI, LeafNodeNo, LeafTotalNo, LeafGreenNo, LeafFullyExpandedNodeNo, LeafDeadNodeNo, AboveGroundDM, LeafWaterDemand, LeafTranspiration, LeafFW, LeafPhotosynthesisFt, LeafLiveWt2, StemLiveWt, cover_green, PodLiveWt, LeafLiveWt
        events Reporting Frequency: event=end_step
      frenchbean
      irrigation
        automatic_irrigation = on
        asw_depth = 600  # Depth to which ASW is calculated. (mm)
        crit_fr_asw = 0.8  # Fraction of ASW below which irrigation is applied (0-1.0)
        irrigation_efficiency = 1  # Efficiency of the irrigation. (0-1.0)
        irrigation_allocation = off  # Allocation limits
        allocation = 0  # Allocation in ML
        default_no3_conc = 0  # Nitrate concentration (ppm N)
        default_nh4_conc = 0  # Ammonium concentration (ppm N)
        default_cl_conc = 0  # Chloride concentration (ppm Cl)
        default_no3_conc = 0  # Nitrate concentration (ppm N)
        default_nh4_conc = 0  # Ammonium concentration (ppm N)
        default_cl_conc = 0  # Chloride concentration (ppm Cl)
  simulation GattonDec08 -> /simulations/GattonOct08
    area paddock -> /simulations/GattonOct08/paddock
      folder Manager folder -> /simulations/GattonOct08/paddock/Manager folder
        manager Sow on a fixed date
          category =  # Sowing criteria
          date = 16-dec  # Enter sowing date (dd-mmm)
          category =  # Sowing parameters
          crop = frenchbean  # Enter name of crop to sow
          density = 27  # Enter sowing density (plants/m2)
          depth = 50  # Enter sowing depth (mm)
          cultivar = simba  # Enter cultivar
          row_spacing = 750  # Enter row spacing (mm)
          class = frenchbean  # Enter Crop Class
          on start_of_day:
          script: same as in GattonOct08.paddock.Manager folder.Sow on a fixed date
  simulation GattonJan09 -> /simulations/GattonOct08
    area paddock -> /simulations/GattonOct08/paddock
      folder Manager folder -> /simulations/GattonOct08/paddock/Manager folder
        manager Sow on a fixed date
          category =  # Sowing criteria
          date = 5-jan  # Enter sowing date (dd-mmm)
          category =  # Sowing parameters
          crop = frenchbean  # Enter name of crop to sow
          density = 27  # Enter sowing density (plants/m2)
          depth = 50  # Enter sowing depth (mm)
          cultivar = simba  # Enter cultivar
          row_spacing = 750  # Enter row spacing (mm)
          class = frenchbean  # Enter Crop Class
          on start_of_day:
          script: same as in GattonOct08.paddock.Manager folder.Sow on a fixed date
  simulation GattonROS4 -> /simulations/GattonOct08
    area paddock -> /simulations/GattonOct08/paddock
      folder Manager folder -> /simulations/GattonOct08/paddock/Manager folder
        manager Sow on a fixed date
          category =  # Sowing criteria
          date = 25-feb  # Enter sowing date (dd-mmm)
          category =  # Sowing parameters
          crop = frenchbean  # Enter name of crop to sow
          density = 27  # Enter sowing density (plants/m2)
          depth = 50  # Enter sowing depth (mm)
          cultivar = simba  # Enter cultivar
          row_spacing = 750  # Enter row spacing (mm)
          class = frenchbean  # Enter Crop Class
          on start_of_day:
          script: same as in GattonOct08.paddock.Manager folder.Sow on a fixed date
  simulation Dummy -> /simulations/GattonOct08
    area paddock -> /simulations/GattonOct08/paddock
      folder Manager folder -> /simulations/GattonOct08/paddock/Manager folder
        manager Sow on a fixed date
          category =  # Sowing criteria
          date = 15-apr  # Enter sowing date (dd-mmm)
          category =  # Sowing parameters
          crop = frenchbean  # Enter name of crop to sow
          density = 27  # Enter sowing density (plants/m2)
          depth = 50  # Enter sowing depth (mm)
          cultivar = simba  # Enter cultivar
          row_spacing = 750  # Enter row spacing (mm)
          class = frenchbean  # Enter Crop Class
          on start_of_day:
          script: same as in GattonOct08.paddock.Manager folder.Sow on a fixed date
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