folder simulations: version=17
  simulation Wheat N Balance
    metfile met: filename=C:\apsim\Examples\MetFiles\Dalby.met
    clock
      start_date = 1/01/1988  # Enter the start date of the simulation
      end_date = 31/12/1989  # Enter the end date of the simulation
    summaryfile: filename=Continuous Wheat Simulation.sum
    area paddock
      registrations global
      soil: Site=Jimbour; Region=South East Queensland; LocalName=Waco; SoilType=Black Vertosol; NearestTown=Jimbour, Q 4352; NaturalVegetation=Grassland, mainly Qld bluegrass; Cona=3.5; DiffusConst=40; DiffusSlope=16; U=6; Salb=0.13; Cn2Bare=73; CnRed=20; CnCov=0.8; CnCanopyFact=1; RootCn=40; RootWt=200; SoilCn=12.5; EnrACoeff=7.4; EnrBCoeff=0.2
        profile
          layer:
            thickness  bd    ll15  airdry  dul   sat   sw       swcon  oc    ph   fbiom  finert  no3  nh4  ec    ll Barley  kl Barley  xf Barley  ll Chickpea  kl Chickpea  xf Chickpea  ll Lucerne  kl Lucerne  xf Lucerne  ll Maize  kl Maize  xf Maize  ll Perennial Grass  kl Perennial Grass  xf Perennial Grass  ll Sorghum  kl Sorghum  xf Sorghum  ll Wheat  kl Wheat  xf Wheat
            150        1.02  0.29  0.15    0.54  0.59  9999.99  0.3    1.04  8.4  0.025  0.4     6.5  0.6  0.2   0.29       0.1        1          0.29         0.1          1            0.29        0.1         1           0.29      0.1       1         0.29                0.1                 1                   0.29        0.1         1           0.29      0.1       1
            150        1.03  0.29  0.26    0.53  0.58  9999.99  0.3    0.89  8.8  0.02   0.6     2.1  0.1  0.25  0.29       0.1        1          0.29         0.1          1            0.29        0.1         1           0.29      0.1       1         0.29                0.1                 1                   0.29        0.1         1           0.29      0.1       1
            300        1.02  0.29  0.29    0.54  0.59  9999.99  0.3    0.89  9    0.015  0.8     2.1  0.1  0.31  0.32       0.08       1          0.36         0.08         1            0.29        0.1         1           0.34      0.1       1         0.39                0.1                 1                   0.35        0.1         1           0.32      0.08      1
            300        1.02  0.29  0.29    0.54  0.58  9999.99  0.3    0.89  9.2  0.01   0.9     1.7  0.1  0.4   0.38       0.06       1          0.43         0.06         1            0.29        0.1         1           0.34      0.08      1         0.41                0.1                 1                   0.38        0.08        1           0.32      0.06      1
            300        1.06  0.3   0.3     0.52  0.57  9999.99  0.3    0.77  9.2  0.01   0.95    1.7  0.1  0.59  0.39       0.04       1          0.51         0.04         1            0.3         0.09        1           0.37      0.06      1         0.4                 0.09                1                   0.4         0.06        1           0.35      0.04      1
            300        1.11  0.31  0.31    0.5   0.55  9999.99  0.3    0.45  9.1  0.01   0.95    1.7  0.1  0.84  0.39       0.02       1          0.5          0.02         1            0.31        0.09        1           0.4       0.04      1         0.4                 0.07                1                   0.4         0.04        1           0.38      0.02      1
            300        1.12  0.32  0.32    0.5   0.55  9999.99  0.3    0.27  9    0.01   0.95    1.7  0.1  0.93  0.41       0.01       1          0.5          0.01         1            0.32        0.09        1           0.42      0.02      1         0.41                0.05                1                   0.4         0.02        1           0.41      0.01      1
            300        1.15  0.33  0.33    0.48  0.53  9999.99  0.3    0.22  9    0.01   0.95    1.7  0.1  1.01  0.48       0          0          0.48         0            0            0.33        0.09        1           0.48      0         0         0.41                0                   0                   0.48        0           0           0.48      0         0
            300        1.18  0.34  0.34    0.47  0.52  9999.99  0.3    0.16  8.9  0.01   0.95    1.7  0.1  1.06  0.47       0          0          0.47         0            0            0.34        0.09        1           0.47      0         0         0.4                 0                   0                   0.47        0           0           0.47      0         0
            300        1.2   0.35  0.35    0.46  0.51  9999.99  0.3    0.13  8.9  0.01   0.95    1.7  0.1  1.05  0.46       0          0          0.46         0            0            0.35        0.09        1           0.46      0         0         0.4                 0                   0                   0.46        0           0           0.46      0         0
            300        1.25  0.36  0.36    0.44  0.49  9999.99  0.3    0.12  8.9  0.01   0.95    1.7  0.1  1.01  0.44       0          0          0.44         0            0            0.36        0.09        1           0.44      0         0         0.42                0                   0                   0.44        0           0           0.44      0         0
        InitWater
          percentmethod: percent=1; distributed=filled from top
        InitNitrogen
          profile
            layer:
              no3    nh4       thickness
              6.503  0.599004  150
              2.101  0.100001  150
              2.101  0.100001  300
              1.701  0.100001  300
              1.701  0.100001  300
              1.701  0.100001  300
              1.701  0.100001  300
              1.701  0.100001  300
              1.701  0.100001  300
              1.701  0.100001  300
              1.701  0.100001  300
      surfaceom surface organic matter
        PoolName = wheat  # Organic Matter pool name
        type = wheat  # Organic Matter type
        mass = 1000  # Initial surface residue (kg/ha)
        cnr = 80  # C:N ratio of initial residue
        standing_fraction = 0  # Fraction of residue standing
      fertiliser
      wheat
      folder Manager folder
        manager Sowing rule
          category =  # Sowing criteria
          date1 = 15-may  # Enter sowing window START date (dd-mmm)
          date2 = 10-jul  # Enter sowing window END date (dd-mmm)
          must_sow = no  # Must sow?
          raincrit = 10  # Amount of rainfall
          rainnumdays = 7  # Number of days of rainfall
          esw_amount = 80  # Enter minimum allowable available soil water (mm)
          category =  # Sowing parameters
          crop = wheat  # Enter name of crop to sow
          density = 100  # Enter sowing density (plants/m2)
          depth = 30  # Enter sowing depth (mm)
          cultivar = hartog  # Enter cultivar
          class = plant  # Enter crop growth class
          row_spacing = 250  # Enter row spacing (mm)
          on start_of_day:
```
      if (paddock_is_fallow() = 1 and FallowIn <> 'yes' and (NextCrop = 0 or NextCrop = '[crop]')) then
         if (date_within('[date1], [date2]') = 1) then
            if (rain[[rainnumdays]] >= [raincrit] AND esw >= [esw_amount]) OR
                ('[must_sow]' = 'yes' AND today = date('[date2]'))) THEN
               ChooseNextCrop = 'yes'   ! for rotations
               [crop] sow plants =[density], sowing_depth = [depth], cultivar = [cultivar], row_spacing = [row_spacing], crop_class = [class]
            endif
            if today = date('[date2]') then
               ChooseNextCrop = 'yes'
            endif
         endif
      endif
```
          on init:
```
            nextcrop = 0
            fallowin = 0
```
        manager Sowing fertiliser
          category =  # When should fertiliser be applied
          modulename = wheat  # On which module should the event come from
          eventname = sowing  # On which event should fertiliser be applied
          category =  # Fertiliser application details
          fertmodule = fertiliser  # Module used to apply the fertiliser
          fert_amount_sow = 200  # Amount of starter fertiliser at sowing (kg/ha)
          fert_type_sow = urea_N  # Sowing fertiliser type
          on [modulename].[eventname]:
```
        [fertmodule] apply amount = [fert_amount_sow] (kg/ha), depth = 50 (mm), type = [fert_type_sow]
```
        manager Harvesting rule
          category =  # Harvesting criteria
          crop = wheat  # Enter name of crop to harvest when ripe
          on process:
```
           if [crop].StageName = 'harvest_ripe' or [crop].plant_status = 'dead' then

              NBalance.LostN = NBalance.LostN + wheat.graingreenn * 10.  ! convert to kg/ha
              [crop]  harvest
              [crop]  end_crop
           endif
```
        manager NBalance
          on init:
```
InitialN = 0
PlantN = 0
SoilN = 0
LostN = 0
AddedN = 0
SoilNChange = 0

Loss = 0
LossDnit  = 0
LossLeach = 0
```
          on start_of_day:
```
if (InitialN = 0) then
   InitialN = nit_tot() + surfaceom_n
endif
```
          on end_of_day:
```
! Demonstration N Balance is approximate only - some values calculated below will actually represent 
! yesterday's values when reported due to order of operations during APSIM run time.
! For a full detailed test of the N Balance use the apsim sysbal module.


PlantN = (wheat.biomass_n + wheat.rootgreenn) * 10. !convert to kg/ha

SoilN = nit_tot() + surfaceom_n

! N removed in grain is accounted for in the harvesting rule
LostN = LostN + dnit() +  flow_no3(11)

Loss = dnit() + flow_no3(11)
LossDnit = dnit() 
LossLeach = flow_no3(11)


AddedN =AddedN + fertiliser

NBalance = SoilN - InitialN + PlantN +  LostN - AddedN
SoilNChange = SoilN - InitialN
```
      outputfile
        variables
          variables: dd/mm/yyyy as Date, esw, biomass, yield, dnit() format 5, nit_tot(), surfaceom_n, leach_no3 format 5, flow_no3(11) format 5, biomass_n, rootgreenn, InitialN, PlantN, SoilN, LostN, AddedN, NBalance, SoilNChange, fertiliser, loss, LossDnit, LossLeach
        events Reporting Frequency: event=end_step
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