folder simulations: version=15
  simulation Wheat
    metfile met: filename=%APSIM%\\Examples\MetFiles\goond.met
    clock
      start_date = 1/01/1988  # Enter the start date of the simulation (dd/mm/yyyy)
      end_date = 31/12/1989  # Enter the end date of the simulation (dd/mm/yyyy)
    summaryfile: filename=Continuous Wheat Simulation.sum
    area paddock
      registrations global
      soil: Site=Jimbour; Region=South East Queensland; LocalName=Waco; SoilType=Black Vertosol; NearestTown=Jimbour, Q 4352; NaturalVegetation=Grassland, mainly Qld bluegrass; Cona=3.5; DiffusConst=40; DiffusSlope=16; U=6; Salb=0.13; Cn2Bare=73; CnRed=20; CnCov=0.8; CnCanopyFact=1; RootCn=40; RootWt=200; SoilCn=12.5; EnrACoeff=7.4; EnrBCoeff=0.2
        profile
          layer:
            thickness  bd    ll15  airdry  dul   sat   sw       swcon  oc    ph   fbiom  finert  no3  nh4  ec    ll Barley  kl Barley  xf Barley  ll Broccoli  kl Broccoli  xf Broccoli  ll Butterflypea  kl Butterflypea  xf Butterflypea  ll Canola  kl Canola  xf Canola  ll Centro  kl Centro  xf Centro  ll Chickpea  kl Chickpea  xf Chickpea  ll Cowpea  kl Cowpea  xf Cowpea  ll Fababean  kl Fababean  xf Fababean  ll Fieldpea  kl Fieldpea  xf Fieldpea  ll Horsegram  kl Horsegram  xf Horsegram  ll LabLab  kl LabLab  xf LabLab  ll Lettuce  kl Lettuce  xf Lettuce  ll Lucerne  kl Lucerne  xf Lucerne  ll Lupin  kl Lupin  xf Lupin  ll Mucuna  kl Mucuna  xf Mucuna  ll Mungbean  kl Mungbean  xf Mungbean  ll Navybean  kl Navybean  xf Navybean  ll Oats  kl Oats  xf Oats  ll Peanut  kl Peanut  xf Peanut  ll Pigeonpea  kl Pigeonpea  xf Pigeonpea  ll Potato  kl Potato  xf Potato  ll Soybean  kl Soybean  xf Soybean  ll Stylo  kl Stylo  xf Stylo  ll SweetCorn  kl SweetCorn  xf SweetCorn  ll SweetSorghum  kl SweetSorghum  xf SweetSorghum  ll Weed  kl Weed  xf Weed  ll Wheat  kl Wheat  xf Wheat
            150        1.02  0.29  0.15    0.54  0.59  9999.99  0.3    1.04  8.4  0.025  0.4     6.5  0.6  0.2   0.29       0.1        1          0.29         0.06         1            0.29             0.06             1                0.29       0.06       1          0.29       0.06       1          0.29         0.1          1            0.29       0.06       1          0.29         0.06         1            0.29         0.06         1            0.29          0.06          1             0.29       0.06       1          0.29        0.06        1           0.29        0.1         1           0.29      0.06      1         0.29       0.06       1          0.29         0.06         1            0.29         0.06         1            0.29     0.1      1        0.29       0.06       1          0.29          0.06          1             0.29       0.06       1          0.29        0.06        1           0.29      0.06      1         0.29          0.06          1             0.29             0.06             1                0.29     0.06     1        0.29      0.1       1
            150        1.03  0.29  0.26    0.53  0.58  9999.99  0.3    0.89  8.8  0.02   0.6     2.1  0.1  0.25  0.29       0.1        1          0.29         0.06         1            0.29             0.06             1                0.29       0.06       1          0.29       0.06       1          0.29         0.1          1            0.29       0.06       1          0.29         0.06         1            0.29         0.06         1            0.29          0.06          1             0.29       0.06       1          0.29        0.06        1           0.29        0.1         1           0.29      0.06      1         0.29       0.06       1          0.29         0.06         1            0.29         0.06         1            0.29     0.1      1        0.29       0.06       1          0.29          0.06          1             0.29       0.06       1          0.29        0.06        1           0.29      0.06      1         0.29          0.06          1             0.29             0.06             1                0.29     0.06     1        0.29      0.1       1
            300        1.02  0.29  0.29    0.54  0.59  9999.99  0.3    0.89  9    0.015  0.8     2.1  0.1  0.31  0.32       0.08       1          0.29         0.06         1            0.29             0.06             1                0.29       0.06       1          0.29       0.06       1          0.36         0.08         1            0.29       0.06       1          0.29         0.06         1            0.29         0.06         1            0.29          0.06          1             0.29       0.06       1          0.29        0.06        1           0.29        0.1         1           0.29      0.06      1         0.29       0.06       1          0.29         0.06         1            0.29         0.06         1            0.32     0.08     1        0.29       0.06       1          0.29          0.06          1             0.29       0.06       1          0.29        0.06        1           0.29      0.06      1         0.29          0.06          1             0.29             0.06             1                0.29     0.06     1        0.32      0.08      1
            300        1.02  0.29  0.29    0.54  0.58  9999.99  0.3    0.89  9.2  0.01   0.9     1.7  0.1  0.4   0.38       0.06       1          0.29         0.06         1            0.29             0.06             1                0.29       0.06       1          0.29       0.06       1          0.43         0.06         1            0.29       0.06       1          0.29         0.06         1            0.29         0.06         1            0.29          0.06          1             0.29       0.06       1          0.29        0.06        1           0.29        0.1         1           0.29      0.06      1         0.29       0.06       1          0.29         0.06         1            0.29         0.06         1            0.32     0.06     1        0.29       0.06       1          0.29          0.06          1             0.29       0.06       1          0.29        0.06        1           0.29      0.06      1         0.29          0.06          1             0.29             0.06             1                0.29     0.06     1        0.32      0.06      1
            300        1.06  0.3   0.3     0.52  0.57  9999.99  0.3    0.77  9.2  0.01   0.95    1.7  0.1  0.59  0.39       0.04       1          0.3          0.06         1            0.3              0.06             1                0.3        0.06       1          0.3        0.06       1          0.51         0.04         1            0.3        0.06       1          0.3          0.06         1            0.3          0.06         1            0.3           0.06          1             0.3        0.06       1          0.3         0.06        1           0.3         0.09        1           0.3       0.06      1         0.3        0.06       1          0.3          0.06         1            0.3          0.06         1            0.35     0.04     1        0.3        0.06       1          0.3           0.06          1             0.3        0.06       1          0.3         0.06        1           0.3       0.06      1         0.3           0.06          1             0.3              0.06             1                0.3      0.06     1        0.35      0.04      1
            300        1.11  0.31  0.31    0.5   0.55  9999.99  0.3    0.45  9.1  0.01   0.95    1.7  0.1  0.84  0.39       0.02       1          0.31         0.06         1            0.31             0.06             1                0.31       0.06       1          0.31       0.06       1          0.5          0.02         1            0.31       0.06       1          0.31         0.06         1            0.31         0.06         1            0.31          0.06          1             0.31       0.06       1          0.31        0.06        1           0.31        0.09        1           0.31      0.06      1         0.31       0.06       1          0.31         0.06         1            0.31         0.06         1            0.38     0.02     1        0.31       0.06       1          0.31          0.06          1             0.31       0.06       1          0.31        0.06        1           0.31      0.06      1         0.31          0.06          1             0.31             0.06             1                0.31     0.06     1        0.38      0.02      1
            300        1.12  0.32  0.32    0.5   0.55  9999.99  0.3    0.27  9    0.01   0.95    1.7  0.1  0.93  0.41       0.01       1          0.32         0.06         1            0.32             0.06             1                0.32       0.06       1          0.32       0.06       1          0.5          0.01         1            0.32       0.06       1          0.32         0.06         1            0.32         0.06         1            0.32          0.06          1             0.32       0.06       1          0.32        0.06        1           0.32        0.09        1           0.32      0.06      1         0.32       0.06       1          0.32         0.06         1            0.32         0.06         1            0.41     0.01     1        0.32       0.06       1          0.32          0.06          1             0.32       0.06       1          0.32        0.06        1           0.32      0.06      1         0.32          0.06          1             0.32             0.06             1                0.32     0.06     1        0.41      0.01      1
            300        1.15  0.33  0.33    0.48  0.53  9999.99  0.3    0.22  9    0.01   0.95    1.7  0.1  1.01  0.48       0          0          0.33         0.06         1            0.33             0.06             1                0.33       0.06       1          0.33       0.06       1          0.48         0            0            0.33       0.06       1          0.33         0.06         1            0.33         0.06         1            0.33          0.06          1             0.33       0.06       1          0.33        0.06        1           0.33        0.09        1           0.33      0.06      1         0.33       0.06       1          0.33         0.06         1            0.33         0.06         1            0.48     0        0        0.33       0.06       1          0.33          0.06          1             0.33       0.06       1          0.33        0.06        1           0.33      0.06      1         0.33          0.06          1             0.33             0.06             1                0.33     0.06     1        0.48      0         0
            300        1.18  0.34  0.34    0.47  0.52  9999.99  0.3    0.16  8.9  0.01   0.95    1.7  0.1  1.06  0.47       0          0          0.34         0.06         1            0.34             0.06             1                0.34       0.06       1          0.34       0.06       1          0.47         0            0            0.34       0.06       1          0.34         0.06         1            0.34         0.06         1            0.34          0.06          1             0.34       0.06       1          0.34        0.06        1           0.34        0.09        1           0.34      0.06      1         0.34       0.06       1          0.34         0.06         1            0.34         0.06         1            0.47     0        0        0.34       0.06       1          0.34          0.06          1             0.34       0.06       1          0.34        0.06        1           0.34      0.06      1         0.34          0.06          1             0.34             0.06             1                0.34     0.06     1        0.47      0         0
            300        1.2   0.35  0.35    0.46  0.51  9999.99  0.3    0.13  8.9  0.01   0.95    1.7  0.1  1.05  0.46       0          0          0.35         0.06         1            0.35             0.06             1                0.35       0.06       1          0.35       0.06       1          0.46         0            0            0.35       0.06       1          0.35         0.06         1            0.35         0.06         1            0.35          0.06          1             0.35       0.06       1          0.35        0.06        1           0.35        0.09        1           0.35      0.06      1         0.35       0.06       1          0.35         0.06         1            0.35         0.06         1            0.46     0        0        0.35       0.06       1          0.35          0.06          1             0.35       0.06       1          0.35        0.06        1           0.35      0.06      1         0.35          0.06          1             0.35             0.06             1                0.35     0.06     1        0.46      0         0
            300        1.25  0.36  0.36    0.44  0.49  9999.99  0.3    0.12  8.9  0.01   0.95    1.7  0.1  1.01  0.44       0          0          0.36         0.06         1            0.36             0.06             1                0.36       0.06       1          0.36       0.06       1          0.44         0            0            0.36       0.06       1          0.36         0.06         1            0.36         0.06         1            0.36          0.06          1             0.36       0.06       1          0.36        0.06        1           0.36        0.09        1           0.36      0.06      1         0.36       0.06       1          0.36         0.06         1            0.36         0.06         1            0.44     0        0        0.36       0.06       1          0.36          0.06          1             0.36       0.06       1          0.36        0.06        1           0.36      0.06      1         0.36          0.06          1             0.36             0.06             1                0.36     0.06     1        0.44      0         0
        InitWater
          percentmethod: percent=1; distributed=filled from top
        InitNitrogen
          profile
            layer:
              no3    nh4       thickness
              6.503  0.599004  150
              2.101  0.100001  150
              2.101  0.100001  300
              1.701  0.100001  300
              1.701  0.100001  300
              1.701  0.100001  300
              1.701  0.100001  300
              1.701  0.100001  300
              1.701  0.100001  300
              1.701  0.100001  300
              1.701  0.100001  300
      surfaceom surface organic matter
        PoolName = wheat  # Organic Matter pool name
        type = wheat  # Organic Matter type
        mass = 1000  # Initial surface residue (kg/ha)
        cnr = 80  # C:N ratio of initial residue
        standing_fraction = 0  # Fraction of residue standing
      fertiliser
      wheat
      folder Manager folder
        manager Sow on a fixed date
          category =  # Sowing criteria
          date = 1-jun  # Enter sowing date (dd-mmm)
          category =  # Sowing parameters
          crop = wheat  # Enter name of crop to sow
          density = 10  # Enter sowing density (plants/m2)
          depth = 50  # Enter sowing depth (mm)
          cultivar = hartog  # Enter cultivar
          class = plant  # Enter crop growth class
          row_spacing = 500  # Enter row spacing (mm)
          on start_of_day:
```
        if (today = date('[date]') then
              [crop] sow plants =[density], sowing_depth = [depth], cultivar = [cultivar], row_spacing = [row_spacing], crop_class = [class]
         endif
```
        manager Harvesting rule
          category =  # Harvesting criteria
          crop = wheat  # Enter name of crop to harvest when ripe
          on end_of_day:
```
           if [crop].StageName = 'harvest_ripe' or [crop].plant_status = 'dead' then
              [crop]  harvest
              [crop]  end_crop
           endif
```
      outputfile
        variables
          variables: dd/mm/yyyy as Date, biomass, yield, grain_protein, grain_size, esw, roottotalwt, stemtotalwt, leaftotalwt, podtotalwt, graintotalwt, oiltotalwt, roottotaln, stemtotaln, leaftotaln, podtotaln, graintotaln, lai, swdef_photo, nfact_photo
        events Reporting Frequency: event=Daily
  simulation Barley -> /simulations/Wheat
    area paddock -> /simulations/Wheat/paddock
      folder Manager folder -> /simulations/Wheat/paddock/Manager folder
        manager Sow on a fixed date
          category =  # Sowing criteria
          date = 1-jun  # Enter sowing date (dd-mmm)
          category =  # Sowing parameters
          crop = barley  # Enter name of crop to sow
          density = 10  # Enter sowing density (plants/m2)
          depth = 50  # Enter sowing depth (mm)
          cultivar = schooner  # Enter cultivar
          class = plant  # Enter crop growth class
          row_spacing = 500  # Enter row spacing (mm)
          on start_of_day:
          script: same as in Wheat.paddock.Manager folder.Sow on a fixed date
        manager Harvesting rule
          category =  # Harvesting criteria
          crop = barley  # Enter name of crop to harvest when ripe
          on end_of_day:
          script: same as in Wheat.paddock.Manager folder.Harvesting rule
      barley
  simulation Broccoli -> /simulations/Wheat
    area paddock -> /simulations/Wheat/paddock
      folder Manager folder -> /simulations/Wheat/paddock/Manager folder
        manager Sow on a fixed date
          category =  # Sowing criteria
          date = 11-mar  # Enter sowing date (dd-mmm)
          category =  # Sowing parameters
          crop = broccoli  # Enter name of crop to sow
          density = 6  # Enter sowing density (plants/m2)
          depth = 50  # Enter sowing depth (mm)
          cultivar = fiesta  # Enter cultivar
          class = plant  # Enter crop growth class
          row_spacing = 600  # Enter row spacing (mm)
          on start_of_day:
          script: same as in Wheat.paddock.Manager folder.Sow on a fixed date
        manager Harvest on a Growth Stage
          category =  # Harvesting criteria
          stage = maturity  # Enter stage name
          category =  # Harvesting parameters
          crop = broccoli  # Enter name of crop to sow
          on start_of_day:
```
        if ([crop].StageName = '[stage]') then
                    [crop] harvest
                    [crop] end_crop
        endif
```
      broccoli
  simulation Butterflypea -> /simulations/Wheat
    area paddock -> /simulations/Wheat/paddock
      folder Manager folder -> /simulations/Wheat/paddock/Manager folder
        manager Sowing rule
          category =  # Sowing criteria
          date1 = 31-jan  # Enter sowing window START date (dd-mmm)
          date2 = 31-jan  # Enter sowing window END date (dd-mmm)
          must_sow = yes  # Must sow?
          raincrit = 30  # Amount of rainfall
          rainnumdays = 3  # Number of days of rainfall
          esw_amount = 200  # Enter minimum allowable available soil water (mm)
          category =  # Sowing parameters
          crop = butterflypea  # Enter name of crop to sow
          density = 20  # Enter sowing density (plants/m2)
          depth = 30  # Enter sowing depth (mm)
          cultivar = milgarra  # Enter cultivar
          row_spacing = 300  # Enter row spacing (mm)
          on start_of_day:
```
      if (paddock_is_fallow() = 1) then
         if (date_within('[date1], [date2]') = 1) then
            if (rain[[rainnumdays]] >= [raincrit] AND esw >= [esw_amount]) OR
                ('[must_sow]' = 'yes' AND today = date('[date2]'))) THEN
               [crop] sow plants =[density], sowing_depth = [depth], cultivar = [cultivar], row_spacing = [row_spacing]
            endif
            if today = date('[date2]') then
               ChooseNextCrop = 'yes'
            endif
         endif
      endif
```
      butterflypea
  simulation Canola -> /simulations/Wheat
    area paddock -> /simulations/Wheat/paddock
      folder Manager folder -> /simulations/Wheat/paddock/Manager folder
        manager Sow on a fixed date
          category =  # Sowing criteria
          date = 1-jun  # Enter sowing date (dd-mmm)
          category =  # Sowing parameters
          crop = canola  # Enter name of crop to sow
          density = 10  # Enter sowing density (plants/m2)
          depth = 50  # Enter sowing depth (mm)
          cultivar = rainbow  # Enter cultivar
          class = plant  # Enter crop growth class
          row_spacing = 500  # Enter row spacing (mm)
          on start_of_day:
          script: same as in Wheat.paddock.Manager folder.Sow on a fixed date
        manager Harvesting rule
          category =  # Harvesting criteria
          crop = canola  # Enter name of crop to harvest when ripe
          on end_of_day:
          script: same as in Wheat.paddock.Manager folder.Harvesting rule
      outputfile -> /simulations/Wheat/paddock/outputfile
        variables
          variables: dd/mm/yyyy as Date, biomass, yield, grain_protein, grain_size, esw, lai, oil
      canola
  simulation Centro -> /simulations/Wheat
    area paddock -> /simulations/Wheat/paddock
      folder Manager folder -> /simulations/Wheat/paddock/Manager folder
        manager Sow on a fixed date
          category =  # Sowing criteria
          date = 1-feb  # Enter sowing date (dd-mmm)
          category =  # Sowing parameters
          crop = centro  # Enter name of crop to sow
          density = 10  # Enter sowing density (plants/m2)
          depth = 50  # Enter sowing depth (mm)
          cultivar = cavalcade  # Enter cultivar
          class = plant  # Enter crop growth class
          row_spacing = 500  # Enter row spacing (mm)
          on start_of_day:
          script: same as in Wheat.paddock.Manager folder.Sow on a fixed date
        manager Harvesting rule
          category =  # Harvesting criteria
          crop = centro  # Enter name of crop to harvest when ripe
          on end_of_day:
          script: same as in Wheat.paddock.Manager folder.Harvesting rule
      centro
  simulation Chickpea -> /simulations/Wheat
    area paddock -> /simulations/Wheat/paddock
      folder Manager folder -> /simulations/Wheat/paddock/Manager folder
        manager Sow on a fixed date
          category =  # Sowing criteria
          date = 1-jun  # Enter sowing date (dd-mmm)
          category =  # Sowing parameters
          crop = chickpea  # Enter name of crop to sow
          density = 10  # Enter sowing density (plants/m2)
          depth = 50  # Enter sowing depth (mm)
          cultivar = amethyst  # Enter cultivar
          class = plant  # Enter crop growth class
          row_spacing = 500  # Enter row spacing (mm)
          on start_of_day:
          script: same as in Wheat.paddock.Manager folder.Sow on a fixed date
        manager Harvesting rule
          category =  # Harvesting criteria
          crop = chickpea  # Enter name of crop to harvest when ripe
          on end_of_day:
          script: same as in Wheat.paddock.Manager folder.Harvesting rule
      chickpea
  simulation Cowpea -> /simulations/Wheat
    area paddock -> /simulations/Wheat/paddock
      folder Manager folder -> /simulations/Wheat/paddock/Manager folder
        manager Sow on a fixed date
          category =  # Sowing criteria
          date = 1-dec  # Enter sowing date (dd-mmm)
          category =  # Sowing parameters
          crop = cowpea  # Enter name of crop to sow
          density = 10  # Enter sowing density (plants/m2)
          depth = 50  # Enter sowing depth (mm)
          cultivar = banjo  # Enter cultivar
          class = plant  # Enter crop growth class
          row_spacing = 500  # Enter row spacing (mm)
          on start_of_day:
          script: same as in Wheat.paddock.Manager folder.Sow on a fixed date
        manager Harvesting rule
          category =  # Harvesting criteria
          crop = cowpea  # Enter name of crop to harvest when ripe
          on end_of_day:
          script: same as in Wheat.paddock.Manager folder.Harvesting rule
      cowpea
  simulation Fababean -> /simulations/Wheat
    area paddock -> /simulations/Wheat/paddock
      folder Manager folder -> /simulations/Wheat/paddock/Manager folder
        manager Sow on a fixed date
          category =  # Sowing criteria
          date = 1-jun  # Enter sowing date (dd-mmm)
          category =  # Sowing parameters
          crop = fababean  # Enter name of crop to sow
          density = 10  # Enter sowing density (plants/m2)
          depth = 50  # Enter sowing depth (mm)
          cultivar = fiord  # Enter cultivar
          class = plant  # Enter crop growth class
          row_spacing = 500  # Enter row spacing (mm)
          on start_of_day:
          script: same as in Wheat.paddock.Manager folder.Sow on a fixed date
        manager Harvesting rule
          category =  # Harvesting criteria
          crop = fababean  # Enter name of crop to harvest when ripe
          on end_of_day:
          script: same as in Wheat.paddock.Manager folder.Harvesting rule
      fababean
  simulation Fieldpea -> /simulations/Wheat
    area paddock -> /simulations/Wheat/paddock
      folder Manager folder -> /simulations/Wheat/paddock/Manager folder
        manager Sow on a fixed date
          category =  # Sowing criteria
          date = 1-jun  # Enter sowing date (dd-mmm)
          category =  # Sowing parameters
          crop = fieldpea  # Enter name of crop to sow
          density = 10  # Enter sowing density (plants/m2)
          depth = 50  # Enter sowing depth (mm)
          cultivar = excel  # Enter cultivar
          class = plant  # Enter crop growth class
          row_spacing = 500  # Enter row spacing (mm)
          on start_of_day:
          script: same as in Wheat.paddock.Manager folder.Sow on a fixed date
        manager Harvesting rule
          category =  # Harvesting criteria
          crop = fieldpea  # Enter name of crop to harvest when ripe
          on end_of_day:
          script: same as in Wheat.paddock.Manager folder.Harvesting rule
      fieldpea
  simulation Horsegram -> /simulations/Wheat
    area paddock -> /simulations/Wheat/paddock
      folder Manager folder -> /simulations/Wheat/paddock/Manager folder
        manager Sow on a fixed date
          category =  # Sowing criteria
          date = 1-dec  # Enter sowing date (dd-mmm)
          category =  # Sowing parameters
          crop = horsegram  # Enter name of crop to sow
          density = 10  # Enter sowing density (plants/m2)
          depth = 50  # Enter sowing depth (mm)
          cultivar = co1  # Enter cultivar
          class = plant  # Enter crop growth class
          row_spacing = 500  # Enter row spacing (mm)
          on start_of_day:
          script: same as in Wheat.paddock.Manager folder.Sow on a fixed date
        manager Harvesting rule
          category =  # Harvesting criteria
          crop = horsegram  # Enter name of crop to harvest when ripe
          on end_of_day:
          script: same as in Wheat.paddock.Manager folder.Harvesting rule
      horsegram
  simulation LabLab -> /simulations/Wheat
    area paddock -> /simulations/Wheat/paddock
      folder Manager folder -> /simulations/Wheat/paddock/Manager folder
        manager Sow on a fixed date
          category =  # Sowing criteria
          date = 1-dec  # Enter sowing date (dd-mmm)
          category =  # Sowing parameters
          crop = lablab  # Enter name of crop to sow
          density = 10  # Enter sowing density (plants/m2)
          depth = 50  # Enter sowing depth (mm)
          cultivar = endurance  # Enter cultivar
          class = plant  # Enter crop growth class
          row_spacing = 500  # Enter row spacing (mm)
          on start_of_day:
          script: same as in Wheat.paddock.Manager folder.Sow on a fixed date
        manager Harvesting rule
          category =  # Harvesting criteria
          crop = lablab  # Enter name of crop to harvest when ripe
          on end_of_day:
          script: same as in Wheat.paddock.Manager folder.Harvesting rule
      lablab
  simulation Lettuce -> /simulations/Wheat
    area paddock -> /simulations/Wheat/paddock
      folder Manager folder -> /simulations/Wheat/paddock/Manager folder
        manager Sow on a fixed date
          category =  # Sowing criteria
          date = 1-jun  # Enter sowing date (dd-mmm)
          category =  # Sowing parameters
          crop = lettuce  # Enter name of crop to sow
          density = 6  # Enter sowing density (plants/m2)
          depth = 50  # Enter sowing depth (mm)
          cultivar = Titanic  # Enter cultivar
          class = plant  # Enter crop growth class
          row_spacing = 600  # Enter row spacing (mm)
          on start_of_day:
          script: same as in Wheat.paddock.Manager folder.Sow on a fixed date
        manager Harvest on a Growth Stage
          category =  # Harvesting criteria
          stage = maturity  # Enter stage name
          category =  # Harvesting parameters
          crop = lettuce  # Enter name of crop to sow
          on start_of_day:
```
        if ([crop].StageName = '[stage]') then
                    [crop] harvest
                    [crop] end_crop
        endif
```
      lettuce
  simulation Lucerne -> /simulations/Wheat
    area paddock -> /simulations/Wheat/paddock
      folder Manager folder -> /simulations/Wheat/paddock/Manager folder
        manager Lucerne Ley fixed sow harvest at flowering
          category =  # Sowing criteria
          date = 1-Jan-1988  # Enter sowing date (dd-mmm-yyyy)
          category =  # Sowing parameters
          crop = lucerne  # Enter name of crop to sow
          density = 200  # Enter sowing density (plants/m2)
          depth = 20  # Enter sowing depth (mm)
          cultivar = trifecta  # Enter cultivar
          class = plant  # Enter crop growth class
          row_spacing = 250  # Enter row spacing (mm)
          category =  # Number of years
          leyyears = 3  # Enter numberofyeasr inley
          category =  # Harvesting criteria
          harvest_ht = 50  # Enter the height to harvest the crop
          remove = 0.95  # Fraction of maerial removed leaving the system (balance to residue)
          killdate = 15-Nov-1989  # date lucerne is to be removed
          on start_of_day:
```
       if (today = date('[date]') then
              [crop] sow plants =[density], sowing_depth = [depth], cultivar = [cultivar], row_spacing = [row_spacing], crop_class = [class]
              [crop]LeyYears = [leyyears]
       endif
```
          on end_of_day:
```
             if [crop].StageName = 'flowering'  then
                [crop]  harvest height = [harvest_ht]
              endif
              if today= date('[killdate]') and [crop].plant_status <>'out' then
                   if ( [crop]LeyYears > 0 ) then
                         [crop]LeyYears = [crop]LeyYears - 1
                   else
                              [crop] end_crop
                   endif
              endif
```
        manager Harvesting rule
          category =  # Harvesting criteria
          crop = lucerne  # Enter name of crop to harvest when ripe
          on end_of_day:
          script: same as in Wheat.paddock.Manager folder.Harvesting rule
      lucerne
  simulation Lupin -> /simulations/Wheat
    area paddock -> /simulations/Wheat/paddock
      folder Manager folder -> /simulations/Wheat/paddock/Manager folder
        manager Sow on a fixed date
          category =  # Sowing criteria
          date = 1-jun  # Enter sowing date (dd-mmm)
          category =  # Sowing parameters
          crop = lupin  # Enter name of crop to sow
          density = 10  # Enter sowing density (plants/m2)
          depth = 50  # Enter sowing depth (mm)
          cultivar = merrit  # Enter cultivar
          class = plant  # Enter crop growth class
          row_spacing = 500  # Enter row spacing (mm)
          on start_of_day:
          script: same as in Wheat.paddock.Manager folder.Sow on a fixed date
        manager Harvesting rule
          category =  # Harvesting criteria
          crop = lupin  # Enter name of crop to harvest when ripe
          on end_of_day:
          script: same as in Wheat.paddock.Manager folder.Harvesting rule
      lupin
  simulation Mucuna -> /simulations/Wheat
    area paddock -> /simulations/Wheat/paddock
      folder Manager folder -> /simulations/Wheat/paddock/Manager folder
        manager Sow on a fixed date
          category =  # Sowing criteria
          date = 1-dec  # Enter sowing date (dd-mmm)
          category =  # Sowing parameters
          crop = mucuna  # Enter name of crop to sow
          density = 10  # Enter sowing density (plants/m2)
          depth = 50  # Enter sowing depth (mm)
          cultivar = mucuna_gen  # Enter cultivar
          class = plant  # Enter crop growth class
          row_spacing = 500  # Enter row spacing (mm)
          on start_of_day:
          script: same as in Wheat.paddock.Manager folder.Sow on a fixed date
        manager Harvesting rule
          category =  # Harvesting criteria
          crop = mucuna  # Enter name of crop to harvest when ripe
          on end_of_day:
          script: same as in Wheat.paddock.Manager folder.Harvesting rule
      mucuna
  simulation Mungbean -> /simulations/Wheat
    area paddock -> /simulations/Wheat/paddock
      folder Manager folder -> /simulations/Wheat/paddock/Manager folder
        manager Sow on a fixed date
          category =  # Sowing criteria
          date = 1-dec  # Enter sowing date (dd-mmm)
          category =  # Sowing parameters
          crop = mungbean  # Enter name of crop to sow
          density = 10  # Enter sowing density (plants/m2)
          depth = 50  # Enter sowing depth (mm)
          cultivar = shangtung  # Enter cultivar
          class = plant  # Enter crop growth class
          row_spacing = 500  # Enter row spacing (mm)
          on start_of_day:
          script: same as in Wheat.paddock.Manager folder.Sow on a fixed date
        manager Harvesting rule
          category =  # Harvesting criteria
          crop = mungbean  # Enter name of crop to harvest when ripe
          on end_of_day:
          script: same as in Wheat.paddock.Manager folder.Harvesting rule
      mungbean
  simulation Navybean -> /simulations/Wheat
    area paddock -> /simulations/Wheat/paddock
      folder Manager folder -> /simulations/Wheat/paddock/Manager folder
        manager Sow on a fixed date
          category =  # Sowing criteria
          date = 1-dec  # Enter sowing date (dd-mmm)
          category =  # Sowing parameters
          crop = navybean  # Enter name of crop to sow
          density = 10  # Enter sowing density (plants/m2)
          depth = 50  # Enter sowing depth (mm)
          cultivar = rainbird  # Enter cultivar
          class = plant  # Enter crop growth class
          row_spacing = 500  # Enter row spacing (mm)
          on start_of_day:
          script: same as in Wheat.paddock.Manager folder.Sow on a fixed date
        manager Harvesting rule
          category =  # Harvesting criteria
          crop = navybean  # Enter name of crop to harvest when ripe
          on end_of_day:
          script: same as in Wheat.paddock.Manager folder.Harvesting rule
      navybean
  simulation Oats -> /simulations/Wheat
    area paddock -> /simulations/Wheat/paddock
      folder Manager folder -> /simulations/Wheat/paddock/Manager folder
        manager Sow on a fixed date
          category =  # Sowing criteria
          date = 1-jun  # Enter sowing date (dd-mmm)
          category =  # Sowing parameters
          crop = Oats  # Enter name of crop to sow
          density = 10  # Enter sowing density (plants/m2)
          depth = 50  # Enter sowing depth (mm)
          cultivar = potoroo  # Enter cultivar
          class = plant  # Enter crop growth class
          row_spacing = 500  # Enter row spacing (mm)
          on start_of_day:
          script: same as in Wheat.paddock.Manager folder.Sow on a fixed date
        manager Harvesting rule
          category =  # Harvesting criteria
          crop = oats  # Enter name of crop to harvest when ripe
          on end_of_day:
          script: same as in Wheat.paddock.Manager folder.Harvesting rule
      oats
  simulation Peanut -> /simulations/Wheat
    area paddock -> /simulations/Wheat/paddock
      folder Manager folder -> /simulations/Wheat/paddock/Manager folder
        manager Sow on a fixed date
          category =  # Sowing criteria
          date = 1-oct  # Enter sowing date (dd-mmm)
          category =  # Sowing parameters
          crop = peanut  # Enter name of crop to sow
          density = 10  # Enter sowing density (plants/m2)
          depth = 50  # Enter sowing depth (mm)
          cultivar = mccubbin  # Enter cultivar
          class = plant  # Enter crop growth class
          row_spacing = 500  # Enter row spacing (mm)
          on start_of_day:
          script: same as in Wheat.paddock.Manager folder.Sow on a fixed date
        manager Harvesting rule
          category =  # Harvesting criteria
          crop = peanut  # Enter name of crop to harvest when ripe
          on end_of_day:
          script: same as in Wheat.paddock.Manager folder.Harvesting rule
      peanut
  simulation PigeonPea -> /simulations/Wheat
    area paddock -> /simulations/Wheat/paddock
      pigeonpea
      folder Manager folder -> /simulations/Wheat/paddock/Manager folder
        manager Sow on a fixed date
          category =  # Sowing criteria
          date = 1-dec  # Enter sowing date (dd-mmm)
          category =  # Sowing parameters
          crop = pigeonpea  # Enter name of crop to sow
          density = 10  # Enter sowing density (plants/m2)
          depth = 50  # Enter sowing depth (mm)
          cultivar = medium_duration  # Enter cultivar
          class = plant  # Enter crop growth class
          row_spacing = 500  # Enter row spacing (mm)
          on start_of_day:
          script: same as in Wheat.paddock.Manager folder.Sow on a fixed date
        manager Harvesting rule
          category =  # Harvesting criteria
          crop = pigeonpea  # Enter name of crop to harvest when ripe
          on end_of_day:
          script: same as in Wheat.paddock.Manager folder.Harvesting rule
  simulation Potato -> /simulations/Wheat
    area paddock -> /simulations/Wheat/paddock
      folder Manager folder -> /simulations/Wheat/paddock/Manager folder
        manager Sow on a fixed date
          category =  # Sowing criteria
          date = 1-jun  # Enter sowing date (dd-mmm)
          category =  # Sowing parameters
          crop = potato  # Enter name of crop to sow
          density = 5  # Enter sowing density (plants/m2)
          depth = 30  # Enter sowing depth (mm)
          cultivar = russet  # Enter cultivar
          class = plant  # Enter crop growth class
          row_spacing = 250  # Enter row spacing (mm)
          age = 1000  # Enter physiological age (deg days)
          on start_of_day:
          script: same as in Wheat.paddock.Manager folder.Sow on a fixed date
        manager Harvesting rule
          category =  # Harvesting criteria
          crop = potato  # Enter name of crop to harvest when ripe
          on end_of_day:
```
           if [crop].StageName = 'maturity' or [crop].plant_status = 'dead' then
              [crop]  harvest
              [crop]  end_crop
           endif
```
      potato
  simulation Soybean -> /simulations/Wheat
    area paddock -> /simulations/Wheat/paddock
      folder Manager folder -> /simulations/Wheat/paddock/Manager folder
        manager Sow on a fixed date
          category =  # Sowing criteria
          date = 1-dec  # Enter sowing date (dd-mmm)
          category =  # Sowing parameters
          crop = soybean  # Enter name of crop to sow
          density = 10  # Enter sowing density (plants/m2)
          depth = 50  # Enter sowing depth (mm)
          cultivar = buchanan  # Enter cultivar
          class = plant  # Enter crop growth class
          row_spacing = 500  # Enter row spacing (mm)
          on start_of_day:
          script: same as in Wheat.paddock.Manager folder.Sow on a fixed date
        manager Harvesting rule
          category =  # Harvesting criteria
          crop = soybean  # Enter name of crop to harvest when ripe
          on end_of_day:
          script: same as in Wheat.paddock.Manager folder.Harvesting rule
      soybean
  simulation Stylo -> /simulations/Wheat
    area paddock -> /simulations/Wheat/paddock
      folder Manager folder -> /simulations/Wheat/paddock/Manager folder
        manager Sow on a fixed date
          category =  # Sowing criteria
          date = 1-dec  # Enter sowing date (dd-mmm)
          category =  # Sowing parameters
          crop = stylo  # Enter name of crop to sow
          density = 10  # Enter sowing density (plants/m2)
          depth = 50  # Enter sowing depth (mm)
          cultivar = verano  # Enter cultivar
          class = plant  # Enter crop growth class
          row_spacing = 500  # Enter row spacing (mm)
          on start_of_day:
          script: same as in Wheat.paddock.Manager folder.Sow on a fixed date
        manager Harvesting rule
          category =  # Harvesting criteria
          crop = stylo  # Enter name of crop to harvest when ripe
          on end_of_day:
          script: same as in Wheat.paddock.Manager folder.Harvesting rule
      stylo
  simulation SweetCorn -> /simulations/Wheat
    area paddock -> /simulations/Wheat/paddock
      folder Manager folder -> /simulations/Wheat/paddock/Manager folder
        manager Sow on a fixed date
          category =  # Sowing criteria
          date = 1-dec  # Enter sowing date (dd-mmm)
          category =  # Sowing parameters
          crop = SweetCorn  # Enter name of crop to sow
          density = 10  # Enter sowing density (plants/m2)
          depth = 50  # Enter sowing depth (mm)
          cultivar = h5  # Enter cultivar
          class = plant  # Enter crop growth class
          row_spacing = 500  # Enter row spacing (mm)
          on start_of_day:
          script: same as in Wheat.paddock.Manager folder.Sow on a fixed date
        manager Harvesting rule
          category =  # Harvesting criteria
          crop = SweetCorn  # Enter name of crop to harvest when ripe
          on end_of_day:
          script: same as in Wheat.paddock.Manager folder.Harvesting rule
      SweetCorn
  simulation SweetSorghum -> /simulations/Wheat
    area paddock -> /simulations/Wheat/paddock
      folder Manager folder -> /simulations/Wheat/paddock/Manager folder
        manager Sow on a fixed date
          category =  # Sowing criteria
          date = 1-dec  # Enter sowing date (dd-mmm)
          category =  # Sowing parameters
          crop = SweetSorghum  # Enter name of crop to sow
          density = 10  # Enter sowing density (plants/m2)
          depth = 50  # Enter sowing depth (mm)
          cultivar = sugargraze  # Enter cultivar
          class = plant  # Enter crop growth class
          row_spacing = 500  # Enter row spacing (mm)
          on start_of_day:
          script: same as in Wheat.paddock.Manager folder.Sow on a fixed date
        manager Harvesting rule
          category =  # Harvesting criteria
          crop = SweetSorghum  # Enter name of crop to harvest when ripe
          on end_of_day:
          script: same as in Wheat.paddock.Manager folder.Harvesting rule
      SweetSorghum
  simulation Weed -> /simulations/Wheat
    area paddock -> /simulations/Wheat/paddock
      folder Manager folder -> /simulations/Wheat/paddock/Manager folder
        manager Sow on a fixed date
          category =  # Sowing criteria
          date = 1-jun  # Enter sowing date (dd-mmm)
          category =  # Sowing parameters
          crop = weed  # Enter name of crop to sow
          density = 10  # Enter sowing density (plants/m2)
          depth = 50  # Enter sowing depth (mm)
          cultivar = late  # Enter cultivar
          class = winter_dicot  # Enter crop growth class
          row_spacing = 500  # Enter row spacing (mm)
          on start_of_day:
          script: same as in Wheat.paddock.Manager folder.Sow on a fixed date
        manager Harvesting rule
          category =  # Harvesting criteria
          crop = weed  # Enter name of crop to harvest when ripe
          on end_of_day:
          script: same as in Wheat.paddock.Manager folder.Harvesting rule
      weed
