folder simulations: version=28
  memo Development Plan
    Isolate each process in the Water Module then test that process.

    SoilWat Process Simulations
    --------------------------------------------
    Create a baseline test for each process in SoilWat by turning off the various parameters.

    You can turn off the various processing in soilwat just by changing a handfull of parameters.
    For example,
    Saturated flow -> swcon = 0
    Unsaturated flow -> diffus const and diffus slope = 0
    runoff -> cn2 = 0
    es (soil evaporation) -> u and cona = 0
    Also you will need to create a met file where you set rainfall = 0. You can do this either
    by deleting the whole rainfall column and then putting a single line at the top of the file
    with [rain = 0]. This is how you set a constant in the met file.

    Make sure it is really turning off these processes by outputting the variables associated with each process to the output file.

    SoilWater Development
    -------------------------------------

    To start with just bring in the variables and test that you can input and output them.
    Just create a test simulation and run it for one day only, just to see if the inputting
    and outputting works. Dean says he would like you to commit this test simulation as well.

    After inputting the variables you then start adding in the processes into your new C#
    soilwater one at a time. Neil suggests that you do this in the following order,
    1. Saturated Flow
    2. Unsaturated Flow
    3. runoff
    4. es (soil evaporation)
    with 4 soil evaporation there is a whole bunch of cruft that you don't need to bother
    bringing into the new simulation because it is no longer used. You only need to bring
    in the Richie equation method for soil evaporation. All the other methods are no longer
    used and Niel Huth said that if he wants them he will add them back in himself.

    After you add each process you should do a commit. You should also commit the Tests that
    you used to test each process. These tests go in the Tests folder so that the build machine
    will do these tests as well. This way once you are finished the model with have a permanent
    test simulation for each of the individual processes in SoilWater. Also be doing it all the
    time if you leave the development of SoilWater and come back to it, if someone else makes
    changes to APSIM because the tests are in the test folder they will be able to see they broke
    SoilWater (even though it is only partially completed), and be able to fix it to be the same as how
    you left it, for when you come back.

    After you add each process you will need to test them against soilwat.

    So you create a whole bunch of test simulations (in the same .apsim file)
    where in each one you turn all the processes off except the one you want to look at.
    Attach a memo to each simulation explaining what process you are looking at in that
    simulation.

    In these test simulations once you add the 2nd and more processes you will also have
    to start turning the processes off in soilwater as well as in soilwat. You do this by
    the same method as in soilwat. Just setting the parameters to zero.
  memo Simulation Ideas
    The following are some ideas of the types of simulations that you need to create to
    test each process,
    (you may want to create a uniform soil with uniform thicknesses)

    1. Saturated Flow, make the starting sw in each layer uniform by setting them to SAT (sw = sat)
    and then drain the soil for 30 days. Because saturated flow occurs between SAT->DUL you should
    be able to watch and see the water drain from SAT to DUL in each layer over the 30 days and
    watch it drain out the bottom. You should make all the units mm and do a mass balance. A mass
    balance just means water in equals water out. So add up all the water in the soil that it starts
    with and then compare that to the amount that drains out the bottom. At 30 days in your simulation
    you can then have a rainfall event and then watch it drain again for another 30days.
    (use depth plots of sw to graph)
    Flux is the array variable that specifies saturated flow

    2. Unsaturated Flow, break this into 2 parts
    nb. in the following Wet means DUL and Dry means LL15. Wet is DUL not SAT because SAT to DUL is saturated flow.
    (i)  Wet layers over Dry layers (unsaturated drainage test)
    (ii) Dry layers over Wet layers (capillary rise test)
    To create the test simulation for (i) just use the GUI and specify the soil to be 50% and filled
    from the top. (make sure sw is not above DUL or below LL15).
    You won't be able to do this for (ii) where Dry over wet because there is no filled from the bottom in GUI.
    (use depth plots of sw to graph)

    nb. Instead of breaking it up into these 2 parts I just did alternating layers of wet and dry soil. Starting with wet soil.
    I combined the first and second layers because they are both just 15cm instead of 30cm like the other layers.

    Flow is the array variable that specifies unsaturated flow

    3. Runoff,
    You only need to look at runoff on a particular day because it only happens on the day the rain
    occured. So the clock for your simulation only has to run for a single day. BUT to save time just
    run the clock over more then one day and then just reset the water back to its starting sw after each
    day. Reseting the sw each day (you can do this just in manager logic in the simulation)
    nb. Neil says there should be a reset command in the fortran code for SoilWat. So you can use this
    command in the manage logic to just reset the soil profile back to the initial water that the simulation
    started with. (the way the reset command works I think is to just take the starting soil water from
    the sim file (the Params) and sets the variables in the model to that.

    Set up a simulation where you on day 1 you have a rainfall event and you look at the runoff then you reset
    the sw for the layers and then on day 2 you have an even larger rainfall event and you look at the runoff
    and then reset the layers and day 3 even larger etc.
    Then you copy this simulation several times and then just change the starting soil water to be various things from
    completely full, to being half full, to completely dry. So for each of these simulations you will see how much
    runoff occurs for various sized rainfall events.
    (use normal line graph of date on x axis and rain and runoff on y axis)

    Just out of interest:
    Ask neil about if irrigation is treated the same as rainfall because irrigation
    does not cause runoff (the model assumes the water just goes straght into the soil).

    Set starting soil to LL15 except for top layer which I set to SAT

    Set CnRed and CnCov both to 0 because we have no crop in the simulation so it is bare earth and there is no Cover so CnRed and CnCov are never used anyway. (CnCov was 0.8 and CnRed was 20)

    4. es,
    Since es in the model for the Richie equation is a square root of time, just have a thick top layer in your
    soil and make the entire profile full, and watch how the es drops off over time (ie serveral days). You don't
    need rain or irrigation because the top layer is starting off full, so it should start to evaporate straight
    away.

    Set the starting water to SAT not DUL
    The top layer sw_dep(1) will then dry down to air_dry_dep

    You don't need to bother about rain or irrigation, you just start the top layer as being full of water.

    es just works off the sw in the top layer of the soil. So you need to make it really thick.

    I ran it over a year instead of several days, to capture the difference in Evap due to the changeover from the summer date to winter date. To do this I also had to change the winter U and Cona so they were different to summer U and Cona.

    eos is the same as eo because there is no crop or surface residue in these simulations so no lighter interception and no surface residue interception,
    therefore since
    eos = eo x light interception from canopy x surface residue interception
    then
    eos = so
    (use normal line graphs of,
    radn on x axis and es on y axis,
    avg temp ((tmax + tmin)/2) on x axis and es on y axis)
  memo
    I started by just taking the Continuous Wheat Simulation from the "Examples" folder.

    Note there is some SoilWat tests under the "Tests" folder in a folder called "SoilWat Tests". They consist of some .con and .par files. I converted the .con files to sims.

    Read the module documentation for SoilWat.
  simulation Saturated Flow Only (OLD)
    metfile met
      filename=%apsim%\Tests\SoilWater\Process Event\Saturated Flow Only.met
    clock
      start_date = 01/01/1940  # Enter the start date of the simulation
      end_date = 02/03/1940  # Enter the end date of the simulation
    summaryfile
    area paddock
      soil: Site=Jimbour; Region=South East Queensland; LocalName=Waco
        SoilType = Black Vertosol  # Classification
        NearestTown = Jimbour, Q 4352
        NaturalVegetation = Grassland, mainly Qld bluegrass
        Sample Soil sample
          Layer:
            Thickness (mm)  NO3 (ppm)  NH4 (ppm)  SW (mm/mm)
            150             0          0          0.59
            150             0          0          0.58
            300             0          0          0.59
            300             0          0          0.58
            300             0          0          0.57
            300             0          0          0.55
            300             0          0          0.55
            300             0          0          0.53
            300             0          0          0.52
            300             0          0          0.51
            300             0          0          0.49
          Date = 02/01/1940  # Sample date
        Water
          Layer:
            Thickness (mm)  BD (g/cc)  AirDry (mm/mm)  LL15 (mm/mm)  DUL (mm/mm)  SAT (mm/mm)
            150             1.02       0.15            0.29          0.54         0.59
            150             1.03       0.26            0.29          0.53         0.58
            300             1.02       0.29            0.29          0.54         0.59
            300             1.02       0.29            0.29          0.54         0.58
            300             1.06       0.3             0.3           0.52         0.57
            300             1.11       0.31            0.31          0.5          0.55
            300             1.12       0.32            0.32          0.5          0.55
            300             1.15       0.33            0.33          0.48         0.53
            300             1.18       0.34            0.34          0.47         0.52
            300             1.2        0.35            0.35          0.46         0.51
            300             1.25       0.36            0.36          0.44         0.49
        SoilWat
          Layer:
            Thickness (mm)  SWCON (0-1)
            150             0.3
            150             0.3
            300             0.3
            300             0.3
            300             0.3
            300             0.3
            300             0.3
            300             0.3
            300             0.3
            300             0.3
            300             0.3
          SummerCona = 0
          SummerU = 0
          SummerDate = 1-Nov
          WinterCona = 0
          WinterU = 0
          WinterDate = 1-Apr
          DiffusConst = 0
          DiffusSlope = 0
          Salb = 0.13
          Cn2Bare = 1
          CnRed = 0
          CnCov = 0
        SoilOrganicMatter: RootCn=40; RootWt=200; SoilCn=12.5; EnrACoeff=7.4; EnrBCoeff=0.2
          Layer:
            Thickness (mm)  OC (Total %)  FBiom (0-1)  FInert (0-1)
            150             1.04          0.025        0.4
            150             0.89          0.02         0.6
            300             0.89          0.015        0.8
            300             0.89          0.01         0.9
            300             0.77          0.01         0.95
            300             0.45          0.01         0.95
            300             0.27          0.01         0.95
            300             0.22          0.01         0.95
            300             0.16          0.01         0.95
            300             0.13          0.01         0.95
            300             0.12          0.01         0.95
        Analysis
          Layer:
            Thickness (mm)  EC (1:5 dS/m)  PH (1:5 water)
            150             0.2            8.4
            150             0.25           8.8
            300             0.31           9
            300             0.4            9.2
            300             0.59           9.2
            300             0.84           9.1
            300             0.93           9
            300             1.01           9
            300             1.06           8.9
            300             1.05           8.9
            300             1.01           8.9
      outputfile: filename=Saturated Flow Only (OLD).out; title=Saturated Flow Only (OLD)
        variables
          variables: dlayer, sat_dep, dul_dep, ll15_dep, air_dry_dep, dd/mm/yyyy as Date, rain, sw_dep, flux, drain, runoff, es
        events Reporting Frequency: event=end_day
  simulation Saturated Flow Only (NEW) -> /simulations/Saturated Flow Only (OLD)
    PlugIns
      PlugIn=[%apsim%/UserInterface/ApsimUIPlugIn.xml, %apsim%/UserInterface/SoilTypes.xml, %apsim%/UserInterface/Graph.xml, %apsim%/UserInterface/Ausfarm.xml, %apsim%/UserInterface/DevelopersPlugIn.xml, %apsim%/Model/Accum.xml, %apsim%/Model/AgPasture.xml, %apsim%/Model/Bambatsi.xml, %apsim%/Model/Barley.xml, %apsim%/Model/Br.xml, %apsim%/Model/Bore.xml, %apsim%/Model/Broccoli.xml, %apsim%/Model/ButterflyPea.xml, %apsim%/Model/Canola.xml, %apsim%/Model/Canopy.xml, %apsim%/Model/Centro.xml, %apsim%/Model/Channel.xml, %apsim%/Model/Chickpea.xml, %apsim%/Model/Cl.xml, %apsim%/Model/Climatechange.xml, %apsim%/Model/Clock.xml, %apsim%/Model/Cowpea.xml, %apsim%/Model/CropUI.xml, %apsim%/Model/Dam.xml, %apsim%/Model/DCD.xml, %apsim%/Model/EGrandis.xml, %apsim%/Model/EMelliodora.xml, %apsim%/Model/Eo.xml, %apsim%/Model/EPopulnea.xml, %apsim%/Model/Erosion.xml, %apsim%/Model/Events.xml, %apsim%/Model/Fababean.xml, %apsim%/Model/Factorial.xml, %apsim%/Model/Factor.xml, %apsim%/Model/FactorComplex.xml, %apsim%/Model/FrenchBean.xml, %apsim%/Model/Fertiliser.xml, %apsim%/Model/Fieldpea.xml, %apsim%/Model/Gcm_data.xml, %apsim%/Model/Grasp.xml, %apsim%/Model/Graz.xml, %apsim%/Model/Growth.xml, %apsim%/Model/Horsegram.xml, %apsim%/Model/Ini.xml, %apsim%/Model/InitWater.xml, %apsim%/Model/Input.xml, %apsim%/Model/Irrigation.xml, %apsim%/Model/KWTest.xml, %apsim%/Model/Lablab.xml, %apsim%/Model/Lettuce.xml, %apsim%/Model/Log.xml, %apsim%/Model/Lucerne.xml, %apsim%/Model/Lupin.xml, %apsim%/Model/Maize.xml, %apsim%/Model/Manager.xml, %apsim%/Model/Map.xml, %apsim%/Model/Memo.xml, %apsim%/Model/MetFile.xml, %apsim%/Model/MicroMet.xml, %apsim%/Model/Millet.xml, %apsim%/Model/Millet1.xml, %apsim%/Model/Millet2.xml, %apsim%/Model/Millet3.xml, %apsim%/Model/Millet4.xml, %apsim%/Model/Millet5.xml, %apsim%/Model/Mucuna.xml, %apsim%/Model/Mungbean.xml, %apsim%/Model/Navybean.xml, %apsim%/Model/Oats.xml, %apsim%/Model/Ocean_data.xml, %apsim%/Model/Operations.xml, %apsim%/Model/Orobanche.xml, %apsim%/Model/Oryza.xml, %apsim%/Model/OutputFile.xml, %apsim%/Model/Ozcot.xml, %apsim%/Model/Patchinput.xml, %apsim%/Model/Peanut.xml, %apsim%/Model/Pigeonpea.xml, %apsim%/Model/Pond.xml, %apsim%/Model/Potato.xml, %apsim%/Model/RotPlot.xml, %apsim%/Model/RugPlotUI.xml, %apsim%/Model/Root.xml, %apsim%/Model/Rule.xml, %apsim%/Model/Seedling.xml, %apsim%/Model/SiloInput.xml, %apsim%/Model/Slurp.xml, %apsim%/Model/Soi.xml, %apsim%/Model/Soil.xml, %apsim%/Model/SoilNui.xml, %apsim%/Model/SoilTemp.xml, %apsim%/Model/Sorghum.xml, %apsim%/Model/SorghumConstants.xml, %apsim%/Model/SorghumGenotype.xml, %apsim%/Model/Soybean.xml, %apsim%/Model/Stylo.xml, %apsim%/Model/Sugar.xml, %apsim%/Model/Summaryfile.xml, %apsim%/Model/Sunflower.xml, %apsim%/Model/SurfaceOM.xml, %apsim%/Model/SweetCorn.xml, %apsim%/Model/SweetSorghum.xml, %apsim%/Model/SWIM2.xml, %apsim%/Model/SWIM2ui.xml, %apsim%/Model/Sysbal.xml, %apsim%/Model/Tcllink.xml, %apsim%/Model/Tclmanager.xml, %apsim%/Model/Tclui.xml, %apsim%/Model/Tracker.xml, %apsim%/Model/Tree.xml, %apsim%/Model/Variables.xml, %apsim%/Model/Venlink.xml, %apsim%/Model/vine.xml, %apsim%/Model/WaterSupply.xml, %apsim%/Model/Weed.xml, %apsim%/Model/Wheat.xml, %apsim%/Model/YPCalc.xml, %apsim%\Model\Soil with new water model.xml]
    area paddock -> /simulations/Saturated Flow Only (OLD)/paddock
      outputfile: filename=Saturated Flow Only (NEW).out; title=Saturated Flow Only (NEW)
        variables -> /simulations/Saturated Flow Only (OLD)/paddock/outputfile/Variables
        events Reporting Frequency -> /simulations/Saturated Flow Only (OLD)/paddock/outputfile/Reporting Frequency
  simulation Unsaturated Flow Only (OLD)
    metfile met
      filename=%apsim%\Tests\SoilWater\Process Event\Unsaturated Flow Only.met
    clock
      start_date = 01/01/1940  # Enter the start date of the simulation
      end_date = 31/12/1950  # Enter the end date of the simulation
    summaryfile
    area paddock
      soil: Site=Jimbour; Region=South East Queensland; LocalName=Waco
        SoilType = Black Vertosol  # Classification
        NearestTown = Jimbour, Q 4352
        NaturalVegetation = Grassland, mainly Qld bluegrass
        Sample Soil sample
          Layer:
            Thickness (mm)  NO3 (ppm)  NH4 (ppm)  SW (mm/mm)
            150             0          0          0.54
            150             0          0          0.53
            300             0          0          0.29
            300             0          0          0.54
            300             0          0          0.3
            300             0          0          0.5
            300             0          0          0.32
            300             0          0          0.48
            300             0          0          0.34
            300             0          0          0.46
            300             0          0          0.36
          Date = 02/01/1940  # Sample date
        Water: same as Saturated Flow Only (OLD).paddock.Soil.Water
        SoilWat
          Layer:
            Thickness (mm)  SWCON (0-1)
            150             0
            150             0
            300             0
            300             0
            300             0
            300             0
            300             0
            300             0
            300             0
            300             0
            300             0
          SummerCona = 0
          SummerU = 0
          SummerDate = 1-Nov
          WinterCona = 0
          WinterU = 0
          WinterDate = 1-Apr
          DiffusConst = 40
          DiffusSlope = 16
          Salb = 0.13
          Cn2Bare = 1
          CnRed = 0
          CnCov = 0
        SoilOrganicMatter: same as Saturated Flow Only (OLD).paddock.Soil.SoilOrganicMatter
        Analysis: same as Saturated Flow Only (OLD).paddock.Soil.Analysis
      outputfile: filename=Unsaturated Flow Only (OLD).out; title=Unsaturated Flow Only (OLD)
        variables
          variables: dlayer, sat_dep, dul_dep, ll15_dep, air_dry_dep, dd/mm/yyyy as Date, rain, sw_dep, flow, drain, runoff, es
        events Reporting Frequency: event=end_day
  simulation Unsaturated Flow Only (NEW) -> /simulations/Unsaturated Flow Only (OLD)
    PlugIns: same as Saturated Flow Only (NEW).PlugIns
    area paddock -> /simulations/Unsaturated Flow Only (OLD)/paddock
      outputfile: filename=Unsaturated Flow Only (NEW).out; title=Unsaturated Flow Only (NEW)
        variables -> /simulations/Unsaturated Flow Only (OLD)/paddock/outputfile/Variables
        events Reporting Frequency -> /simulations/Unsaturated Flow Only (OLD)/paddock/outputfile/Reporting Frequency
  simulation Runoff Only (OLD)
    metfile met: filename=%apsim%\Tests\SoilWater\Process Event\Runoff Only.met
    clock
      start_date = 01/01/1940  # Enter the start date of the simulation
      end_date = 31/12/1950  # Enter the end date of the simulation
    summaryfile
    area paddock
      soil: Site=Jimbour; Region=South East Queensland; LocalName=Waco
        SoilType = Black Vertosol  # Classification
        NearestTown = Jimbour, Q 4352
        NaturalVegetation = Grassland, mainly Qld bluegrass
        Sample Soil sample
          Layer:
            Thickness (mm)  NO3 (ppm)  NH4 (ppm)  SW (mm/mm)
            150             0          0          0.59
            150             0          0          0.58
            300             0          0          0.29
            300             0          0          0.29
            300             0          0          0.3
            300             0          0          0.31
            300             0          0          0.32
            300             0          0          0.33
            300             0          0          0.34
            300             0          0          0.35
            300             0          0          0.36
          Date = 02/01/1940  # Sample date
        Water: same as Saturated Flow Only (OLD).paddock.Soil.Water
        SoilWat
          Layer:
            Thickness (mm)  SWCON (0-1)
            150             0
            150             0
            300             0
            300             0
            300             0
            300             0
            300             0
            300             0
            300             0
            300             0
            300             0
          SummerCona = 0
          SummerU = 0
          SummerDate = 1-Nov
          WinterCona = 0
          WinterU = 0
          WinterDate = 1-Apr
          DiffusConst = 0
          DiffusSlope = 0
          Salb = 0.13
          Cn2Bare = 73
          CnRed = 0
          CnCov = 0
        SoilOrganicMatter: same as Saturated Flow Only (OLD).paddock.Soil.SoilOrganicMatter
        Analysis: same as Saturated Flow Only (OLD).paddock.Soil.Analysis
      outputfile: filename=Runoff Only (OLD).out; title=Runoff Only (OLD)
        variables
          variables: dd/mm/yyyy as Date, rain, runoff, dlayer, sat_dep, dul_dep, ll15_dep, air_dry_dep, sw_dep, flux, flow, drain, es
        events Reporting Frequency: event=end_day
  simulation Runoff Only (NEW) -> /simulations/Runoff Only (OLD)
    PlugIns: same as Saturated Flow Only (NEW).PlugIns
    area paddock -> /simulations/Runoff Only (OLD)/paddock
      outputfile: filename=Runoff Only (NEW).out; title=Runoff Only (NEW)
        variables -> /simulations/Runoff Only (OLD)/paddock/outputfile/Variables
        events Reporting Frequency -> /simulations/Runoff Only (OLD)/paddock/outputfile/Reporting Frequency
  simulation Soil Evaporation Only (OLD)
    metfile met
      filename=%apsim%\Tests\SoilWater\Process Event\Soil Evaporation Only.met
    clock
      start_date = 01/01/1940  # Enter the start date of the simulation
      end_date = 01/01/1941  # Enter the end date of the simulation
    summaryfile
    area paddock
      manager AvgTempCalculation
        on start_of_day:
```
avgTemp = (maxt + mint)/2
```
      soil: Site=Jimbour; Region=South East Queensland; LocalName=Waco
        SoilType = Black Vertosol  # Classification
        NearestTown = Jimbour, Q 4352
        NaturalVegetation = Grassland, mainly Qld bluegrass
        Sample Soil sample: same as Saturated Flow Only (OLD).paddock.Soil.Soil sample
        Water: same as Saturated Flow Only (OLD).paddock.Soil.Water
        SoilWat
          Layer:
            Thickness (mm)  SWCON (0-1)
            150             0
            150             0
            300             0
            300             0
            300             0
            300             0
            300             0
            300             0
            300             0
            300             0
            300             0
          SummerCona = 3.5
          SummerU = 6
          SummerDate = 1-Nov
          WinterCona = 2.5
          WinterU = 5
          WinterDate = 1-Apr
          DiffusConst = 0
          DiffusSlope = 0
          Salb = 0.13
          Cn2Bare = 1
          CnRed = 0
          CnCov = 0
        SoilOrganicMatter: same as Saturated Flow Only (OLD).paddock.Soil.SoilOrganicMatter
        Analysis: same as Saturated Flow Only (OLD).paddock.Soil.Analysis
      outputfile: filename=Soil Evaporation Only (OLD).out; title=Soil Evaporation Only (OLD)
        variables
          variables: dlayer, sat_dep, dul_dep, sw_dep, ll15_dep, air_dry_dep, flux, drain, runoff, rain, day, today, dd/mm/yyyy as Date, u, cona, t, es, eo, eos, sw_dep(1), radn, avgTemp
        events Reporting Frequency: event=end_day
  simulation Soil Evaporation Only (NEW) -> /simulations/Soil Evaporation Only (OLD)
    PlugIns: same as Saturated Flow Only (NEW).PlugIns
    area paddock -> /simulations/Soil Evaporation Only (OLD)/paddock
      outputfile: filename=Soil Evaporation Only (NEW).out; title=Soil Evaporation Only (NEW)
        variables -> /simulations/Soil Evaporation Only (OLD)/paddock/outputfile/Variables
        events Reporting Frequency -> /simulations/Soil Evaporation Only (OLD)/paddock/outputfile/Reporting Frequency
  folder Solute Tests
    memo Solute
      Copied the Saturated and Unsaturated Flow simulations and just added solutes to them.

      Using no3 (mobile) and nh4 (immobile) as solutes is bad because they transform from one to the other.
      Plus because they both belong to SoilN module you want to use something that uses the Solute module (eg. CL) so that this tests to make sure SoilWater is talking with Solute module properly.

      Using CL as the mobile solute.

      Use NH4 as the immobile solute.

      To stop the mineralisation demineralisation process from happening in SoilN
      ie. to stop immobile NH4 transforming from NH4 (immobile) to NO3 (mobile) and then moving, I set the,
      PH of the soil to 1
      SoilOrganicMatter to OC (Total %) to 0 and RootWt to 0

      Saturated flow is specified by leach_solutename. It is the drainage of solute out of the bottom layer and is a single value.
      There is an array variable inside the code called "leach" which is an array variable with the leaching from each layer. It is also referred to as flux.

      Unsaturated flow is specified by flow_solutename . It is an array value.
    simulation Solute - Saturated Flow Only (OLD)
      metfile met
        filename=%apsim%\Tests\SoilWater\Process Event\Solute - Saturated Flow Only.met
      clock
        start_date = 01/01/1940  # Enter the start date of the simulation
        end_date = 02/03/1940  # Enter the end date of the simulation
      summaryfile
      area paddock
        cl
          d0 = 108  # Cl diffusivity in water (mm2/d)
          layers = 300 150 200 250 200 250 200 250 200 250 200 250 200  # Cl in each layer (kg/ha)
        soil: Site=Jimbour; Region=South East Queensland; LocalName=Waco
          SoilType = Black Vertosol  # Classification
          NearestTown = Jimbour, Q 4352
          NaturalVegetation = Grassland, mainly Qld bluegrass
          Sample Soil sample
            Layer:
              Thickness (mm)  NO3 (ppm)  NH4 (kg/ha)  SW (mm/mm)
              150             0          350          0.59
              150             0          250          0.58
              300             0          350          0.59
              300             0          250          0.58
              300             0          350          0.57
              300             0          250          0.55
              300             0          350          0.55
              300             0          250          0.53
              300             0          350          0.52
              300             0          250          0.51
              300             0          350          0.49
            Date = 02/01/1940  # Sample date
          Water: same as Saturated Flow Only (OLD).paddock.Soil.Water
          SoilWat: same as Saturated Flow Only (OLD).paddock.Soil.SoilWat
          SoilOrganicMatter
            Layer:
              Thickness (mm)  OC (Total %)  FBiom (0-1)  FInert (0-1)
              150             0             0.025        0.4
              150             0             0.02         0.6
              300             0             0.015        0.8
              300             0             0.01         0.9
              300             0             0.01         0.95
              300             0             0.01         0.95
              300             0             0.01         0.95
              300             0             0.01         0.95
              300             0             0.01         0.95
              300             0             0.01         0.95
              300             0             0.01         0.95
            RootCn = 40
            RootWt = 0
            SoilCn = 12.5
            EnrACoeff = 7.4
            EnrBCoeff = 0.2
          Analysis
            Layer:
              Thickness (mm)  EC (1:5 dS/m)  PH (1:5 water)
              150             0.2            1
              150             0.25           1
              300             0.31           1
              300             0.4            1
              300             0.59           1
              300             0.84           1
              300             0.93           1
              300             1.01           1
              300             1.06           1
              300             1.05           1
              300             1.01           1
        outputfile: filename=Solute - Saturated Flow Only (OLD).out; title=Saturated Flow Only (OLD)
          variables
            variables: dlayer, sat_dep, dul_dep, ll15_dep, air_dry_dep, rain, sw_dep, flux, drain, runoff, es, dd/mm/yyyy as Date, leach_cl as leach_mobile, leach_nh4 as leach_immobile, leach_no3, leach_urea, cl format 3 as mobile, nh4 format 3 as immobile, no3 format 3, urea format 3
          events Reporting Frequency: event=end_day
    simulation Solute - Saturated Flow Only (NEW) -> /simulations/Solute Tests/Solute - Saturated Flow Only (OLD)
      PlugIns
        PlugIn=[%apsim%/UserInterface/ApsimUIPlugIn.xml, %apsim%/UserInterface/SoilTypes.xml, %apsim%/UserInterface/Graph.xml, %apsim%/UserInterface/Ausfarm.xml, %apsim%/UserInterface/DevelopersPlugIn.xml, %apsim%/Model/Accum.xml, %apsim%/Model/AgPasture.xml, %apsim%/Model/Bambatsi.xml, %apsim%/Model/Barley.xml, %apsim%/Model/Br.xml, %apsim%/Model/Bore.xml, %apsim%/Model/Broccoli.xml, %apsim%/Model/ButterflyPea.xml, %apsim%/Model/Canola.xml, %apsim%/Model/Canopy.xml, %apsim%/Model/Centro.xml, %apsim%/Model/Channel.xml, %apsim%/Model/Chickpea.xml, %apsim%/Model/Cl.xml, %apsim%/Model/Climatechange.xml, %apsim%/Model/Clock.xml, %apsim%/Model/Cowpea.xml, %apsim%/Model/CropUI.xml, %apsim%/Model/Dam.xml, %apsim%/Model/DCD.xml, %apsim%/Model/EGrandis.xml, %apsim%/Model/EMelliodora.xml, %apsim%/Model/Eo.xml, %apsim%/Model/EPopulnea.xml, %apsim%/Model/Erosion.xml, %apsim%/Model/Events.xml, %apsim%/Model/Fababean.xml, %apsim%/Model/Factorial.xml, %apsim%/Model/Factor.xml, %apsim%/Model/FactorComplex.xml, %apsim%/Model/FrenchBean.xml, %apsim%/Model/Fertiliser.xml, %apsim%/Model/Fieldpea.xml, %apsim%/Model/Gcm_data.xml, %apsim%/Model/Grasp.xml, %apsim%/Model/Graz.xml, %apsim%/Model/Growth.xml, %apsim%/Model/Horsegram.xml, %apsim%/Model/Ini.xml, %apsim%/Model/InitWater.xml, %apsim%/Model/Input.xml, %apsim%/Model/Irrigation.xml, %apsim%/Model/KWTest.xml, %apsim%/Model/Lablab.xml, %apsim%/Model/Lettuce.xml, %apsim%/Model/Log.xml, %apsim%/Model/Lucerne.xml, %apsim%/Model/Lupin.xml, %apsim%/Model/Maize.xml, %apsim%/Model/MaizeZ.xml, %apsim%/Model/Manager.xml, %apsim%/Model/Map.xml, %apsim%/Model/Memo.xml, %apsim%/Model/MetFile.xml, %apsim%/Model/MicroMet.xml, %apsim%/Model/Millet.xml, %apsim%/Model/Millet1.xml, %apsim%/Model/Millet2.xml, %apsim%/Model/Millet3.xml, %apsim%/Model/Millet4.xml, %apsim%/Model/Millet5.xml, %apsim%/Model/Mucuna.xml, %apsim%/Model/Mungbean.xml, %apsim%/Model/Navybean.xml, %apsim%/Model/Oats.xml, %apsim%/Model/Ocean_data.xml, %apsim%/Model/Operations.xml, %apsim%/Model/Orobanche.xml, %apsim%/Model/Oryza.xml, %apsim%/Model/OutputFile.xml, %apsim%/Model/Ozcot.xml, %apsim%/Model/Patchinput.xml, %apsim%/Model/Peanut.xml, %apsim%/Model/Pigeonpea.xml, %apsim%/Model/Pond.xml, %apsim%/Model/Potato.xml, %apsim%/Model/RotPlot.xml, %apsim%/Model/RugPlotUI.xml, %apsim%/Model/Root.xml, %apsim%/Model/Rule.xml, %apsim%/Model/Seedling.xml, %apsim%/Model/SiloInput.xml, %apsim%/Model/Slurp.xml, %apsim%/Model/Soi.xml, %apsim%/Model/Soil.xml, %apsim%/Model/SoilNui.xml, %apsim%/Model/SoilTemp.xml, %apsim%/Model/Sorghum.xml, %apsim%/Model/SorghumConstants.xml, %apsim%/Model/SorghumGenotype.xml, %apsim%/Model/Soybean.xml, %apsim%/Model/Stylo.xml, %apsim%/Model/Sugar.xml, %apsim%/Model/Summaryfile.xml, %apsim%/Model/Sunflower.xml, %apsim%/Model/SurfaceOM.xml, %apsim%/Model/SweetCorn.xml, %apsim%/Model/SweetSorghum.xml, %apsim%/Model/SWIM2.xml, %apsim%/Model/SWIM2ui.xml, %apsim%/Model/Sysbal.xml, %apsim%/Model/SysBal2.xml, %apsim%/Model/Tcllink.xml, %apsim%/Model/Tclmanager.xml, %apsim%/Model/Tclui.xml, %apsim%/Model/Tracker.xml, %apsim%/Model/Tree.xml, %apsim%/Model/Variables.xml, %apsim%/Model/Venlink.xml, %apsim%/Model/vine.xml, %apsim%/Model/WaterSupply.xml, %apsim%/Model/Weed.xml, %apsim%/Model/Wheat.xml, %apsim%/Model/YPCalc.xml, %apsim%\Model\Soil with new water model.xml]
      area paddock -> /simulations/Solute Tests/Solute - Saturated Flow Only (OLD)/paddock
        outputfile: filename=Solute - Saturated Flow Only (NEW).out; title=Saturated Flow Only (OLD)
          variables -> /simulations/Solute Tests/Solute - Saturated Flow Only (OLD)/paddock/outputfile/Variables
          events Reporting Frequency -> /simulations/Solute Tests/Solute - Saturated Flow Only (OLD)/paddock/outputfile/Reporting Frequency
    simulation Solute - Unsaturated Flow Only (OLD)
      metfile met
        filename=%apsim%\Tests\SoilWater\Process Event\Solute - Unsaturated Flow Only.met
      clock
        start_date = 01/01/1940  # Enter the start date of the simulation
        end_date = 31/12/1950  # Enter the end date of the simulation
      summaryfile
      area paddock
        cl
          d0 = 108  # Cl diffusivity in water (mm2/d)
          layers = 300 150 200 250 200 250 200 250 200 250 200 250 200  # Cl in each layer (kg/ha)
        soil: Site=Jimbour; Region=South East Queensland; LocalName=Waco
          SoilType = Black Vertosol  # Classification
          NearestTown = Jimbour, Q 4352
          NaturalVegetation = Grassland, mainly Qld bluegrass
          Sample Soil sample
            Layer:
              Thickness (mm)  NO3 (ppm)  NH4 (kg/ha)  SW (mm/mm)
              150             0          350          0.54
              150             0          250          0.53
              300             0          350          0.29
              300             0          250          0.54
              300             0          350          0.3
              300             0          250          0.5
              300             0          350          0.32
              300             0          250          0.48
              300             0          350          0.34
              300             0          250          0.46
              300             0          350          0.36
            Date = 02/01/1940  # Sample date
          Water: same as Saturated Flow Only (OLD).paddock.Soil.Water
          SoilWat: same as Unsaturated Flow Only (OLD).paddock.Soil.SoilWat
          SoilOrganicMatter: same as Solute Tests.Solute - Saturated Flow Only (OLD).paddock.Soil.SoilOrganicMatter
          Analysis: same as Solute Tests.Solute - Saturated Flow Only (OLD).paddock.Soil.Analysis
        outputfile: filename=Solute - Unsaturated Flow Only (OLD).out; title=Unsaturated Flow Only (OLD)
          variables
            variables: dlayer, sat_dep, dul_dep, ll15_dep, air_dry_dep, rain, sw_dep, flux, drain, runoff, es, dd/mm/yyyy as Date, flow_cl as flow_mobile, flow_nh4 as flow_immobile, flow_no3, flow_urea, cl format 3 as mobile, nh4 format 3 as immobile, no3 format 3, urea format 3
          events Reporting Frequency: event=end_day
    simulation Solute - Unsaturated Flow Only (NEW) -> /simulations/Solute Tests/Solute - Unsaturated Flow Only (OLD)
      PlugIns: same as Solute Tests.Solute - Saturated Flow Only (NEW).PlugIns
      area paddock -> /simulations/Solute Tests/Solute - Unsaturated Flow Only (OLD)/paddock
        outputfile: filename=Solute - Unsaturated Flow Only (NEW).out; title=Unsaturated Flow Only (OLD)
          variables -> /simulations/Solute Tests/Solute - Unsaturated Flow Only (OLD)/paddock/outputfile/Variables
          events Reporting Frequency -> /simulations/Solute Tests/Solute - Unsaturated Flow Only (OLD)/paddock/outputfile/Reporting Frequency
    memo Solute Irrigation
      Solute Irrigation, I just copied the Runoff Only simulation and added irrigations to it.
      I copied the Runoff Only because I wanted to make sure Irrigations were not causing runoff when applied. Irrigations are assumed to go straight into the soil without any runoff.
      nb. if you fill up the layer though you may cause runoff due to "extra_runoff". Extra Runoff is due to the water backing up in the top layer due to its inability to drain quickly enough.

      Turned off the rain by addin,
      rain=0 (mm) to top of my met file.

      I had to zero the CL, NO3, NH4 in the soil so you can see the irrigation adding it.
      Also zeroed the starting soil water. (could not actually use zeros because it causes infinite numbers for cl in output file. Caused by divide by zero in solute module I suspect. So set to 0.0001 instead)

      Turned Automatic Irrigation to OFF and set  the soluted concentrations for irrigations.

      Added the irrigations with Operations Schedule manager.
    simulation Solute - Irrigation (OLD)
      metfile met
        filename=%apsim%\Tests\SoilWater\Process Event\Solute - Irrigation Only.met
      clock
        start_date = 01/01/1940  # Enter the start date of the simulation
        end_date = 01/06/1940  # Enter the end date of the simulation
      summaryfile
      area paddock
        cl
          d0 = 108  # Cl diffusivity in water (mm2/d)
          layers = 0 0 0 0 0 0 0 0 0 0 0 0 0  # Cl in each layer (kg/ha)
        irrigation
          automatic_irrigation = off
          asw_depth = 600  # Depth to which ASW is calculated. (mm)
          crit_fr_asw = 0.5  # Fraction of ASW below which irrigation is applied (0-1.0)
          irrigation_efficiency = 1  # Efficiency of the irrigation. (0-1.0)
          irrigation_allocation = off  # Allocation limits
          allocation = 0  # Allocation in mm
          default_no3_conc = 0.0  # Nitrate concentration (ppm N)
          default_nh4_conc = 0.0  # Ammonium concentration (ppm N)
          default_cl_conc = 0.0  # Chloride concentration (ppm Cl)
        soil: Site=Jimbour; Region=South East Queensland; LocalName=Waco
          SoilType = Black Vertosol  # Classification
          NearestTown = Jimbour, Q 4352
          NaturalVegetation = Grassland, mainly Qld bluegrass
          Sample Soil sample
            Layer:
              Thickness (mm)  NO3 (ppm)  NH4 (ppm)  SW (mm/mm)
              150             0          0          0.001
              150             0          0          0.001
              300             0          0          0.001
              300             0          0          0.001
              300             0          0          0.001
              300             0          0          0.001
              300             0          0          0.001
              300             0          0          0.001
              300             0          0          0.001
              300             0          0          0.001
              300             0          0          0.001
            Date = 02/01/1940  # Sample date
          Water: same as Saturated Flow Only (OLD).paddock.Soil.Water
          SoilWat
            Layer:
              Thickness (mm)  SWCON (0-1)
              150             0
              150             0
              300             0
              300             0
              300             0
              300             0
              300             0
              300             0
              300             0
              300             0
              300             0
            SummerCona = 0
            SummerU = 0
            SummerDate = 1-Nov
            WinterCona = 0
            WinterU = 0
            WinterDate = 1-Apr
            DiffusConst = 0
            DiffusSlope = 0
            Salb = 0.13
            Cn2Bare = 73
            CnRed = 20
            CnCov = 0.8
          SoilOrganicMatter: same as Solute Tests.Solute - Saturated Flow Only (OLD).paddock.Soil.SoilOrganicMatter
          Analysis: same as Solute Tests.Solute - Saturated Flow Only (OLD).paddock.Soil.Analysis
        operations Operations Schedule
          1/2/1940  Irrigation apply amount = 20 (mm), NO3=200, NH4=300, CL=400
          1/3/1940  Irrigation apply amount = 20 (mm), NO3=225, NH4=325, CL=425
          1/4/1940  Irrigation apply amount = 20 (mm), NO3=250, NH4=350, CL=450
        outputfile: filename=Solute - Irrigation (OLD).out; title=Runoff Only (OLD)
          variables
            variables: rain, runoff, dlayer, dul_dep, ll15_dep, air_dry_dep, sw_dep, flux, flow, drain, es, dd/mm/yyyy as Date, Irrigation.irrigation, sw_dep(1), no3(1), nh4(1), cl(1), sw_dep, no3, nh4, cl
          events Reporting Frequency: event=end_day
    simulation Solute - Irrigation (NEW) -> /simulations/Solute Tests/Solute - Irrigation (OLD)
      PlugIns: same as Solute Tests.Solute - Saturated Flow Only (NEW).PlugIns
      area paddock -> /simulations/Solute Tests/Solute - Irrigation (OLD)/paddock
        outputfile: filename=Solute - Irrigation (NEW).out; title=Runoff Only (OLD)
          variables -> /simulations/Solute Tests/Solute - Irrigation (OLD)/paddock/outputfile/Variables
          events Reporting Frequency -> /simulations/Solute Tests/Solute - Irrigation (OLD)/paddock/outputfile/Reporting Frequency
  memo Ponding Only
    Ponding occurs when water backs up in the top layer because it can not drain fast enough (via Saturated Flow).
    So you need to set either MWCON or KS in the top layers to restrict flow through it and you want to tell it what the pond size is MaxPond.

    Use MWCON in one simulation and use KS in the other. They both handle the situation of what to do when the soil water goes above saturation.
    Doing two simulations will test their respective code to make sure they are working correctly.
    MWCON either moves all of it or none of it into the layer below depending up whether it is set to 0 or 1.
    KS you specify millimeters per day that move out of the layer into the layer below when it rises above saturation.

    You could test MWCON and KS in WaterTable Calculation test as well, but it is a bit hard to see what is going on, because you would have to enable saturated flow etc. as well. It's not as easy to see if it is working as this ponding example is. Whether water is moving because of KS or MWCON instead of the saturated flows etc.

    Set starting water to 0, so you have an empty profile so you can see it fill.

    Added 30mm of rain every four days to see the pond fill, then added a few 300mm rainfall events so that the pond went above max_pond and the water became runoff.

    In SoilWat sub component set MaxPond to 300mm

    Set MWCON to 0 in the top layer and 1 for all the other layers. This will create an impermeable layer in the top layer to cause ponding.
    Or Set KS to 1mm per day in top layer and 24mm per day in all the other layers to create the impermeable layer in the top layer to cause ponding.

    Turn all the other processes off (evap, unsaturated flow)
    Make sure you also set SWCON to 0 so that there is no flow as a result of Saturated flow (DUL to Sat). We only want to test the "Above Saturation" MWCON code.
    I even turned runoff off but you still should get runoff because once you go above max_pond it should become runoff. Turning runoff off will prove that it is this ponding runoff code working and not the actual runoff code working to provide the runoff from rainfall in this simulation.

    "pond" is the ouput variable for ponding, but sw of the top layer is also of interest.
    "pond_evap" is the evaporation of the pond which is also off interest.

    Flux is the variable for saturated flow and Flow for Unsaturated flow  are also of interest to make sure they are turned off
  simulation Ponding Only using MWCON (OLD)
    metfile met: filename=%apsim%\Tests\SoilWater\Process Event\Ponding Only.met
    clock
      start_date = 01/01/1940  # Enter the start date of the simulation
      end_date = 02/03/1940  # Enter the end date of the simulation
    summaryfile
    area paddock
      soil: Site=Jimbour; Region=South East Queensland; LocalName=Waco
        SoilType = Black Vertosol  # Classification
        NearestTown = Jimbour, Q 4352
        NaturalVegetation = Grassland, mainly Qld bluegrass
        Sample Soil sample
          Layer:
            Thickness (mm)  NO3 (ppm)  NH4 (ppm)  SW (mm/mm)
            150             0          0          0
            150             0          0          0
            300             0          0          0
            300             0          0          0
            300             0          0          0
            300             0          0          0
            300             0          0          0
            300             0          0          0
            300             0          0          0
            300             0          0          0
            300             0          0          0
          Date = 02/01/1940  # Sample date
        Water: same as Saturated Flow Only (OLD).paddock.Soil.Water
        SoilWat
          Layer:
            Thickness (mm)  SWCON (0-1)  MWCON (0-1)
            150             0            0
            150             0            1
            300             0            1
            300             0            1
            300             0            1
            300             0            1
            300             0            1
            300             0            1
            300             0            1
            300             0            1
            300             0            1
          SummerCona = 0
          SummerU = 0
          SummerDate = 1-Nov
          WinterCona = 0
          WinterU = 0
          WinterDate = 1-Apr
          DiffusConst = 0
          DiffusSlope = 0
          Salb = 0.13
          Cn2Bare = 1
          CnRed = 0
          CnCov = 0
          MaxPond = 300
        SoilOrganicMatter: same as Saturated Flow Only (OLD).paddock.Soil.SoilOrganicMatter
        Analysis: same as Saturated Flow Only (OLD).paddock.Soil.Analysis
      outputfile: filename=Ponding Only using MWCON (OLD).out; title=Saturated Flow Only (OLD)
        variables
          variables: dlayer, sat_dep, dul_dep, ll15_dep, air_dry_dep, dd/mm/yyyy as Date, rain, runoff, pond_evap, pond, sw_dep(1-3) as sw_top, es, drain, flux, flow, sw_dep
        events Reporting Frequency: event=end_day
  simulation Ponding Only using MWCON (NEW) -> /simulations/Ponding Only using MWCON (OLD)
    PlugIns: same as Solute Tests.Solute - Saturated Flow Only (NEW).PlugIns
    area paddock -> /simulations/Ponding Only using MWCON (OLD)/paddock
      outputfile: filename=Ponding Only using MWCON (NEW).out; title=Saturated Flow Only (OLD)
        variables -> /simulations/Ponding Only using MWCON (OLD)/paddock/outputfile/Variables
        events Reporting Frequency -> /simulations/Ponding Only using MWCON (OLD)/paddock/outputfile/Reporting Frequency
  simulation Ponding Only using KS (OLD)
    metfile met: filename=%apsim%\Tests\SoilWater\Process Event\Ponding Only.met
    clock
      start_date = 01/01/1940  # Enter the start date of the simulation
      end_date = 02/03/1940  # Enter the end date of the simulation
    summaryfile
    area paddock
      soil: Site=Jimbour; Region=South East Queensland; LocalName=Waco
        SoilType = Black Vertosol  # Classification
        NearestTown = Jimbour, Q 4352
        NaturalVegetation = Grassland, mainly Qld bluegrass
        Sample Soil sample: same as Ponding Only using MWCON (OLD).paddock.Soil.Soil sample
        Water
          Layer:
            Thickness (mm)  KS (mm/day)  BD (g/cc)  AirDry (mm/mm)  LL15 (mm/mm)  DUL (mm/mm)  SAT (mm/mm)
            150             1            1.02       0.15            0.29          0.54         0.59
            150             24           1.03       0.26            0.29          0.53         0.58
            300             24           1.02       0.29            0.29          0.54         0.59
            300             24           1.02       0.29            0.29          0.54         0.58
            300             24           1.06       0.3             0.3           0.52         0.57
            300             24           1.11       0.31            0.31          0.5          0.55
            300             24           1.12       0.32            0.32          0.5          0.55
            300             24           1.15       0.33            0.33          0.48         0.53
            300             24           1.18       0.34            0.34          0.47         0.52
            300             24           1.2        0.35            0.35          0.46         0.51
            300             24           1.25       0.36            0.36          0.44         0.49
        SoilWat
          Layer:
            Thickness (mm)  SWCON (0-1)
            150             0
            150             0
            300             0
            300             0
            300             0
            300             0
            300             0
            300             0
            300             0
            300             0
            300             0
          SummerCona = 0
          SummerU = 0
          SummerDate = 1-Nov
          WinterCona = 0
          WinterU = 0
          WinterDate = 1-Apr
          DiffusConst = 0
          DiffusSlope = 0
          Salb = 0.13
          Cn2Bare = 1
          CnRed = 0
          CnCov = 0
          MaxPond = 300
        SoilOrganicMatter: same as Saturated Flow Only (OLD).paddock.Soil.SoilOrganicMatter
        Analysis: same as Saturated Flow Only (OLD).paddock.Soil.Analysis
      outputfile: filename=Ponding Only using KS (OLD).out; title=Saturated Flow Only (OLD)
        variables
          variables: dlayer, sat_dep, dul_dep, ll15_dep, air_dry_dep, dd/mm/yyyy as Date, rain, runoff, pond_evap, pond, sw_dep(1-3) as sw_top, es, drain, flux, flow, sw_dep
        events Reporting Frequency: event=end_day
  simulation Ponding Only using KS (NEW) -> /simulations/Ponding Only using KS (OLD)
    PlugIns: same as Solute Tests.Solute - Saturated Flow Only (NEW).PlugIns
    area paddock -> /simulations/Ponding Only using KS (OLD)/paddock
      outputfile: filename=Ponding Only using KS (NEW).out; title=Saturated Flow Only (OLD)
        variables -> /simulations/Ponding Only using KS (OLD)/paddock/outputfile/Variables
        events Reporting Frequency -> /simulations/Ponding Only using KS (OLD)/paddock/outputfile/Reporting Frequency
  memo WaterTable Calculation
    (Don't use MWCON because will use that for the Ponding test. MWCON is more suited for use in ponding,
    Use KS it is more suited WaterTables [need to consider more layers in water tables than in ponding, so finer control is better])

    Set SAT and DUL to 0.8 and 0.5 respectively.

    Set starting water to just below SAT  in the top layers and to just above DUL in the bottom layers.
    Then set SWCON to slightly be sligthly faster in each layer down the profile. This will stop water backing up as it drains down the profile because the water is leaving the lower below slightly faster then it is coming in from the
    layer above.

    I set the very top layers to 0 because they are only 150mm deep and they make things harder to understand.

    Set KS to 0mm/day in the bottom layer and 8mm/day for all the other layers. This will create an impermeable layer in the bottom layer to cause a water table.

    Turn all the other processes off (runoff, evap, unsaturated flow)

    The idea is that water in the top layers will flow down until they hit the impermeable layer and then will gradually form a water table. You should be able to see the water table grow larger as the water drains into it.
    No water is added to the system it is all based on the starting water flowing down from the top and none of the layers ever getting above saturation until they hit the bottom and beging backing up.

    The output variable is called "water_table" . The whole pont of this is we want to show that the code calculating this water_table value is working correctly.
    It is the depth (as measured from the ground surface) of the first saturated layer of the soil. So as the water table goes up and down this value will change.
  simulation WaterTable Calculation (OLD)
    metfile met: filename=%apsim%\Tests\SoilWater\Process Event\WaterTable Only.met
    clock
      start_date = 01/01/1940  # Enter the start date of the simulation
      end_date = 02/03/1940  # Enter the end date of the simulation
    summaryfile
    area paddock
      soil: Site=Jimbour; Region=South East Queensland; LocalName=Waco
        SoilType = Black Vertosol  # Classification
        NearestTown = Jimbour, Q 4352
        NaturalVegetation = Grassland, mainly Qld bluegrass
        Sample Soil sample
          Layer:
            Thickness (mm)  NO3 (ppm)  NH4 (ppm)  SW (mm/mm)
            150             0          0          0
            150             0          0          0
            300             0          0          0.79
            300             0          0          0.79
            300             0          0          0.79
            300             0          0          0.79
            300             0          0          0.6
            300             0          0          0.6
            300             0          0          0.6
            300             0          0          0.6
            300             0          0          0.6
          Date = 02/01/1940  # Sample date
        Water
          Layer:
            Thickness (mm)  KS (mm/day)  BD (g/cc)  AirDry (mm/mm)  LL15 (mm/mm)  DUL (mm/mm)  SAT (mm/mm)
            150             8            1.02       0.15            0.29          0.5          0.8
            150             8            1.03       0.26            0.29          0.5          0.8
            300             8            1.02       0.29            0.29          0.5          0.8
            300             8            1.02       0.29            0.29          0.5          0.8
            300             8            1.06       0.3             0.3           0.5          0.8
            300             8            1.11       0.31            0.31          0.5          0.8
            300             8            1.12       0.32            0.32          0.5          0.8
            300             8            1.15       0.33            0.33          0.5          0.8
            300             8            1.18       0.34            0.34          0.5          0.8
            300             8            1.2        0.35            0.35          0.5          0.8
            300             0            1.25       0.36            0.36          0.5          0.8
        SoilWat
          Layer:
            Thickness (mm)  SWCON (0-1)
            150             0
            150             0
            300             0.102
            300             0.103
            300             0.104
            300             0.105
            300             0.106
            300             0.107
            300             0.108
            300             0.109
            300             0
          SummerCona = 0
          SummerU = 0
          SummerDate = 1-Nov
          WinterCona = 0
          WinterU = 0
          WinterDate = 1-Apr
          DiffusConst = 0
          DiffusSlope = 0
          Salb = 0.13
          Cn2Bare = 1
          CnRed = 0
          CnCov = 0
        SoilOrganicMatter: same as Solute Tests.Solute - Saturated Flow Only (OLD).paddock.Soil.SoilOrganicMatter
        Analysis: same as Saturated Flow Only (OLD).paddock.Soil.Analysis
      outputfile: filename=WaterTable Calculation (OLD).out; title=Saturated Flow Only (OLD)
        variables
          variables: dlayer, sat_dep, dul_dep, ll15_dep, air_dry_dep, dd/mm/yyyy as Date, today, rain, runoff, drain, water_table, sw_dep, es, flux, flow
        events Reporting Frequency: event=end_day
  simulation WaterTable Calculation (NEW) -> /simulations/WaterTable Calculation (OLD)
    PlugIns: same as Solute Tests.Solute - Saturated Flow Only (NEW).PlugIns
    area paddock -> /simulations/WaterTable Calculation (OLD)/paddock
      outputfile: filename=WaterTable Calculation (NEW).out; title=Saturated Flow Only (OLD)
        variables -> /simulations/WaterTable Calculation (OLD)/paddock/outputfile/Variables
        events Reporting Frequency -> /simulations/WaterTable Calculation (OLD)/paddock/outputfile/Reporting Frequency
  memo Lateral Outflow
    Copied the Saturated Flow Only simulation.
    Turned off the saturated flow by setting SWCON to 0 for each layer.

    Put a value of,
    Slope =0.1
    DischargeWidth=50
    CatchmentArea=1000

    And set the KLAT for each layer to 0.5

    Add alot of rain to the met file so that sw stays above DUL so that more lateral flow can occur.

    report the outflow_lat array variable
  simulation Lateral Outflow Only (OLD)
    metfile met
      filename=%apsim%\Tests\SoilWater\Process Event\Lateral Outflow Only.met
    clock
      start_date = 01/01/1940  # Enter the start date of the simulation
      end_date = 02/03/1940  # Enter the end date of the simulation
    summaryfile
    area paddock
      soil: Site=Jimbour; Region=South East Queensland; LocalName=Waco
        SoilType = Black Vertosol  # Classification
        NearestTown = Jimbour, Q 4352
        NaturalVegetation = Grassland, mainly Qld bluegrass
        Sample Soil sample: same as Saturated Flow Only (OLD).paddock.Soil.Soil sample
        Water: same as Saturated Flow Only (OLD).paddock.Soil.Water
        SoilWat
          Layer:
            Thickness (mm)  SWCON (0-1)  KLAT (mm/d)
            150             0            8
            150             0            8
            300             0            8
            300             0            8
            300             0            8
            300             0            8
            300             0            8
            300             0            8
            300             0            8
            300             0            8
            300             0            8
          SummerCona = 0
          SummerU = 0
          SummerDate = 1-Nov
          WinterCona = 0
          WinterU = 0
          WinterDate = 1-Apr
          DiffusConst = 0
          DiffusSlope = 0
          Salb = 0.13
          Cn2Bare = 1
          CnRed = 0
          CnCov = 0
          Slope = 0.5
          DischargeWidth = 5
          CatchmentArea = 10
        SoilOrganicMatter: same as Saturated Flow Only (OLD).paddock.Soil.SoilOrganicMatter
        Analysis: same as Saturated Flow Only (OLD).paddock.Soil.Analysis
      outputfile: filename=Lateral Outflow Only (OLD).out; title=Saturated Flow Only (OLD)
        variables
          variables: dlayer, sat_dep, dul_dep, ll15_dep, air_dry_dep, dd/mm/yyyy as Date, rain, outflow_lat, sw_dep, flux, drain, runoff, es
        events Reporting Frequency: event=end_day
  simulation Lateral Outflow Only (NEW) -> /simulations/Lateral Outflow Only (OLD)
    PlugIns: same as Solute Tests.Solute - Saturated Flow Only (NEW).PlugIns
    area paddock -> /simulations/Lateral Outflow Only (OLD)/paddock
      outputfile: filename=Lateral Outflow Only (NEW).out; title=Saturated Flow Only (OLD)
        variables -> /simulations/Lateral Outflow Only (OLD)/paddock/outputfile/Variables
        events Reporting Frequency -> /simulations/Lateral Outflow Only (OLD)/paddock/outputfile/Reporting Frequency
  memo Runon and Lateral Inflow Inputs
    This is just a test to make sure the user can specify runon and inflow_lat as inputs.

    These values are just put directly into the soil with no modification. So there is no code to test here.
    Runon goes straight into the top layer
    lateral inflow (inflow_lat) goes straight into the respective layer. Unlike Lateral Outflow there is no calculation that needs to be done. Just put the whole amount into the layer as if it is an irrigation.

    Copied the Saturated Flow Only simulation.
    Turned off the saturated flow by setting SWCON to 0 for each layer.
    So we have turned everything off.

    Set starting water to 0 for all layers

    We only want to see if the simulation is reading the sparse data file correctly and inputting the runon and inflow_lat properly.
  simulation Runon and Lateral Inflow Inputs (OLD)
    metfile met
      filename=%apsim%\Tests\SoilWater\Process Event\Runon and Lateral Inflow Inputs.met
    clock
      start_date = 01/01/1940  # Enter the start date of the simulation
      end_date = 02/03/1940  # Enter the end date of the simulation
    summaryfile
    area paddock
      soil: Site=Jimbour; Region=South East Queensland; LocalName=Waco
        SoilType = Black Vertosol  # Classification
        NearestTown = Jimbour, Q 4352
        NaturalVegetation = Grassland, mainly Qld bluegrass
        Sample Soil sample: same as Ponding Only using MWCON (OLD).paddock.Soil.Soil sample
        Water: same as Saturated Flow Only (OLD).paddock.Soil.Water
        SoilWat
          Layer:
            Thickness (mm)  SWCON (0-1)
            150             0
            150             0
            300             0
            300             0
            300             0
            300             0
            300             0
            300             0
            300             0
            300             0
            300             0
          SummerCona = 0
          SummerU = 0
          SummerDate = 1-Nov
          WinterCona = 0
          WinterU = 0
          WinterDate = 1-Apr
          DiffusConst = 0
          DiffusSlope = 0
          Salb = 0.13
          Cn2Bare = 1
          CnRed = 0
          CnCov = 0
        SoilOrganicMatter: same as Saturated Flow Only (OLD).paddock.Soil.SoilOrganicMatter
        Analysis: same as Saturated Flow Only (OLD).paddock.Soil.Analysis
      outputfile: filename=Runon and Lateral Inflow Inputs (OLD).out; title=Saturated Flow Only (OLD)
        variables
          variables: dlayer, sat_dep, dul_dep, ll15_dep, air_dry_dep, dd/mm/yyyy as Date, rain, runon, inflow_lat, sw_dep, flux, drain, runoff, es
        events Reporting Frequency: event=end_day
  simulation Runon and Lateral Inflow Inputs (NEW) -> /simulations/Runon and Lateral Inflow Inputs (OLD)
    PlugIns: same as Solute Tests.Solute - Saturated Flow Only (NEW).PlugIns
    area paddock -> /simulations/Runon and Lateral Inflow Inputs (OLD)/paddock
      outputfile: filename=Runon and Lateral Inflow Inputs (NEW).out; title=Saturated Flow Only (OLD)
        variables -> /simulations/Runon and Lateral Inflow Inputs (OLD)/paddock/outputfile/Variables
        events Reporting Frequency -> /simulations/Runon and Lateral Inflow Inputs (OLD)/paddock/outputfile/Reporting Frequency
  folder Manager Set Variables
    memo WaterTable - Set
      Also want to try "Setting" the WaterTable to a fixed value. To test this setting code. This code is supposed to fix the water table to a constant value so it does not go up or down.
      This simulates the more real world water table where water can flow out laterally or flow in laterally to maintain a fixed value. This does these losses for you without you have to use
      LaterFlow capability of this module.
    simulation WaterTable -Set to a fixed depth (OLD)
      metfile met
        filename=%apsim%\Tests\SoilWater\Process Event\WaterTable -Set to a fixed depth.met
      clock
        start_date = 01/01/1940  # Enter the start date of the simulation
        end_date = 02/03/1940  # Enter the end date of the simulation
      summaryfile
      area paddock
        soil: Site=Jimbour; Region=South East Queensland; LocalName=Waco
          SoilType = Black Vertosol  # Classification
          NearestTown = Jimbour, Q 4352
          NaturalVegetation = Grassland, mainly Qld bluegrass
          Sample Soil sample: same as Ponding Only using MWCON (OLD).paddock.Soil.Soil sample
          Water
            Layer:
              Thickness (mm)  BD (g/cc)  AirDry (mm/mm)  LL15 (mm/mm)  DUL (mm/mm)  SAT (mm/mm)
              150             1.02       0.15            0.29          0.5          0.8
              150             1.03       0.26            0.29          0.5          0.8
              300             1.02       0.29            0.29          0.5          0.8
              300             1.02       0.29            0.29          0.5          0.8
              300             1.06       0.3             0.3           0.5          0.8
              300             1.11       0.31            0.31          0.5          0.8
              300             1.12       0.32            0.32          0.5          0.8
              300             1.15       0.33            0.33          0.5          0.8
              300             1.18       0.34            0.34          0.5          0.8
              300             1.2        0.35            0.35          0.5          0.8
              300             1.25       0.36            0.36          0.5          0.8
          SoilWat: same as Runon and Lateral Inflow Inputs (OLD).paddock.Soil.SoilWat
          SoilOrganicMatter: same as Saturated Flow Only (OLD).paddock.Soil.SoilOrganicMatter
          Analysis: same as Saturated Flow Only (OLD).paddock.Soil.Analysis
        manager set water table
          on start_of_day:
```
'Soil Water' set water_table = 2000
```
        outputfile: filename=WaterTable -Set to a fixed depth (OLD).out; title=Saturated Flow Only (OLD)
          variables
            variables: dlayer, sat_dep, dul_dep, ll15_dep, air_dry_dep, dd/mm/yyyy as Date, rain, runoff, es, drain, water_table, sw, flux, flow, sw_dep
          events Reporting Frequency: event=end_day
    simulation WaterTable -Set to a fixed depth (NEW) -> /simulations/Manager Set Variables/WaterTable -Set to a fixed depth (OLD)
      PlugIns: same as Solute Tests.Solute - Saturated Flow Only (NEW).PlugIns
      area paddock -> /simulations/Manager Set Variables/WaterTable -Set to a fixed depth (OLD)/paddock
        outputfile: filename=WaterTable -Set to a fixed depth (NEW).out; title=Saturated Flow Only (OLD)
          variables -> /simulations/Manager Set Variables/WaterTable -Set to a fixed depth (OLD)/paddock/outputfile/Variables
          events Reporting Frequency -> /simulations/Manager Set Variables/WaterTable -Set to a fixed depth (OLD)/paddock/outputfile/Reporting Frequency
  memo Runoff after Tillage Event
    The tillage event only alters the runoff. This of course effects other stuff such as infiltration but it does not affect infiltration (and others) directly. Only by effecting runoff does it effect infiltration (and others).

    Just copy the Runoff simulation

    Do a Tillage in a manager component

    Out of interest do a diff between the output file from these "Runoff ater Tillage Event" simulations and the output file from the "Runoff Only" simulation and you wiill see the effect a tillage has on runoff.
    Then you will see that after a certain amount of rainfall that the difference ends. This is because the amount of rainfall after which you stop reducing the runoff (cn_rain) has been passed.
    Do a search of the summary file for the phrase, "Tillage CN reduction finished" To see when this happens.
    You will see that it happens on the "14 Jan 1940". Before this date the runoffs don't match but after this date the runoff matches (between the "Runoff after Tillage" and "Runoff Only" simulations.
  simulation Runoff after Tillage Event (OLD)
    metfile met
      filename=%apsim%\Tests\SoilWater\Process Event\Runoff after Tillage Event.met
    clock
      start_date = 01/01/1940  # Enter the start date of the simulation
      end_date = 31/12/1950  # Enter the end date of the simulation
    summaryfile
    area paddock
      soil: same as Runoff Only (OLD).paddock.Soil
      operations Operations Schedule
        3/01/1940  'Soil water' tillage type = bogus, cn_red = 15.0, cn_rain = 200.0
      outputfile: filename=Runoff after Tillage Event (OLD).out; title=Runoff Only (OLD)
        variables
          variables: dd/mm/yyyy as Date, rain, runoff, dlayer, sat_dep, dul_dep, ll15_dep, air_dry_dep, sw_dep, flux, flow, drain, es
        events Reporting Frequency: event=end_day
  simulation Runoff after Tillage Event (NEW) -> /simulations/Runoff after Tillage Event (OLD)
    PlugIns: same as Solute Tests.Solute - Saturated Flow Only (NEW).PlugIns
    area paddock -> /simulations/Runoff after Tillage Event (OLD)/paddock
      outputfile: filename=Runoff after Tillage Event (NEW).out; title=Runoff Only (OLD)
        variables -> /simulations/Runoff after Tillage Event (OLD)/paddock/outputfile/Variables
        events Reporting Frequency -> /simulations/Runoff after Tillage Event (OLD)/paddock/outputfile/Reporting Frequency
  memo Soil Evaporation with SurfaceOM
    Just copy the "Soil Evporation Only" simulation.

    Add a "Surface Organic Matter" component

    Out of interest do a diff between "Soil Evaporation with SurfaceOM" simulation and "Soil Evporation Only" .
    You will see that the soil evaporation changes as it should.

    Report the surfaceom_cover variable to see what the cover is.
  simulation Soil Evaporation with SurfaceOM (OLD)
    metfile met
      filename=%apsim%\Tests\SoilWater\Process Event\Soil Evaporation with SurfaceOM.met
    clock
      start_date = 01/01/1940  # Enter the start date of the simulation
      end_date = 01/01/1941  # Enter the end date of the simulation
    summaryfile
    area paddock
      manager AvgTempCalculation
        on start_of_day:
```
avgTemp = (maxt + mint)/2
```
      soil: same as Soil Evaporation Only (OLD).paddock.Soil
      surfaceom Surface Organic Matter
        PoolName = wheat_stubble  # Organic Matter pool name
        type = wheat  # Organic Matter type
        mass = 1000.  # Initial surface residue (kg/ha)
        cnr = 80.0  # C:N ratio of initial residue
        standing_fraction = 0.0  # Fraction of residue standing
      outputfile: filename=Soil Evaporation with SurfaceOM (OLD).out; title=Soil Evaporation Only (OLD)
        variables
          variables: dlayer, sat_dep, dul_dep, sw_dep, ll15_dep, air_dry_dep, flux, drain, runoff, rain, day, today, dd/mm/yyyy as Date, u, cona, t, surfaceom_cover, es, eo, eos, sw_dep(1), radn, avgTemp
        events Reporting Frequency: event=end_day
  simulation Soil Evaporation with SurfaceOM (NEW) -> /simulations/Soil Evaporation with SurfaceOM (OLD)
    PlugIns: same as Solute Tests.Solute - Saturated Flow Only (NEW).PlugIns
    area paddock -> /simulations/Soil Evaporation with SurfaceOM (OLD)/paddock
      outputfile: filename=Soil Evaporation with SurfaceOM (NEW).out; title=Soil Evaporation Only (OLD)
        variables -> /simulations/Soil Evaporation with SurfaceOM (OLD)/paddock/outputfile/Variables
        events Reporting Frequency -> /simulations/Soil Evaporation with SurfaceOM (OLD)/paddock/outputfile/Reporting Frequency
  memo Runoff with SurfaceOM
    Just copy the "Runoff Only" simulation.

    Add a "Surface Organic Matter" component.

    Report the surfaceom_cover variable

    Out of interest do a diff between the output file from this "Runoff with SurfaceOM" simulation and the output file from the "Runoff Only" simulation and you wiill see the effect Surface OM has on runoff.

    SurfaceOM appears to not effect the runoff in the old SoilWat module.  However there is code in SoilWat that says it should (do a search on residue_cover variable to see where).
  simulation Runoff with SurfaceOM (OLD)
    metfile met
      filename=%apsim%\Tests\SoilWater\Process Event\Runoff with SurfaceOM.met
    clock
      start_date = 01/01/1940  # Enter the start date of the simulation
      end_date = 31/12/1950  # Enter the end date of the simulation
    summaryfile
    area paddock
      soil: same as Runoff Only (OLD).paddock.Soil
      surfaceom Surface Organic Matter
        PoolName = wheat_stubble  # Organic Matter pool name
        type = wheat  # Organic Matter type
        mass = 5000.  # Initial surface residue (kg/ha)
        cnr = 80.0  # C:N ratio of initial residue
        standing_fraction = 0.0  # Fraction of residue standing
      outputfile: filename=Runoff with SurfaceOM (OLD).out; title=Runoff Only (OLD)
        variables
          variables: dd/mm/yyyy as Date, rain, runoff, surfaceom_cover, dlayer, sat_dep, dul_dep, ll15_dep, air_dry_dep, sw_dep, flux, flow, drain, es
        events Reporting Frequency: event=end_day
  folder Crop Tests
    memo OnWaterChanged Event Test
       This event was added so that the Plant2 module could extract water via its roots from the SoilWater module.
       At the time Plant2 was not advanced enough to be able to do a "Set" on another modules variables.
       Plant2 still uses this method to extract water using its roots. See the Plant too "Root Organ" (Root.cs) for the OnWaterChanged event.

      AgPasture and a couple of other crop modules also use this OnWaterChangedEvent.

      nb. All Plant2 modules need to add a Micromet component. All Plant2 moduels use Micromet

      We are going to use Slurp as the crop. Slurp is a Plant2 module and so uses the OnWaterChanged event for its roots.

      under "Tests\Potato2" folder, "Potato2_validation.apsim", under "Cultivars" folder,  start with "Cultivar_Burbank" simulation.
      nb. also copy the Lincoln.met as well. (from \Examples\MetFiles)

      Delete all the graphs and output files.

      Report the following variables at end of day,

      PlantStatus
      dd/mm/yyyy as Date
      RootWaterSupply
      RootWaterUptake
      WaterDemand
      WaterSupplyDemandRatio
      Cover_green
      Height
      Cover_tot
    simulation OnWaterChanged Event Test (OLD)
      metfile met
        filename=%apsim%\Tests\SoilWater\Process Event\OnWaterChanged Event Test.met
      clock
        start_date = 20/10/2003  # Enter the start date of the simulation
        end_date = 23/05/2004  # Enter the end date of the simulation
      summaryfile
      area paddock
        fertiliser
        surfaceom surface organic matter
          PoolName = wheat  # Organic Matter pool name
          type = wheat  # Organic Matter type
          mass = 2000  # Initial surface residue (kg/ha)
          cnr = 80  # C:N ratio of initial residue
          standing_fraction = 0  # Fraction of residue standing
        folder Manager folder
          manager Harvesting rule (disabled)
            # Harvesting criteria
            crop = potato2  # Enter name of crop to harvest when ripe
            on start_of_day:
```
           if [crop].PhenologyCurrentPhaseName = 'Maturity' or [crop].plant_status = 'dead' then
              [crop]  harvest
              [crop]  endcrop
           endif
```
          operations
            20/10/2003  fertiliser apply amount= 100 (kg/ha), type= urea_N (), depth= 10 (mm)
            25/11/2003  fertiliser apply amount= 69 (kg/ha), type= urea_N (), depth= 10 (mm)
            26/11/2003  irrigation apply amount= 15 (mm)
            4/12/2003  irrigation apply amount= 50 (mm)
            16/12/2003  irrigation apply amount= 15 (mm)
            22/12/2003  irrigation apply amount= 50 (mm)
            30/12/2003  irrigation apply amount= 50 (mm)
            8/1/2004  irrigation apply amount= 50 (mm)
            21/1/2004  irrigation apply amount= 50 (mm)
            31/1/2004  irrigation apply amount= 50 (mm)
            27/2/2004  irrigation apply amount= 25 (mm)
            25/12/2003  fertiliser apply amount= 0 (kg/ha), type= urea_N (), depth= 10 (mm)
          irrigation
            automatic_irrigation = off
            asw_depth = 600  # Depth to which ASW is calculated. (mm)
            crit_fr_asw = 0.5  # Fraction of ASW below which irrigation is applied (0-1.0)
            irrigation_efficiency = 1  # Efficiency of the irrigation. (0-1.0)
            irrigation_allocation = off  # Allocation limits
            allocation = 0  # Allocation in ML
            default_no3_conc = 0  # Nitrate concentration (ppm N)
            default_nh4_conc = 0  # Ammonium concentration (ppm N)
            default_cl_conc = 0  # Chloride concentration (ppm Cl)
            default_no3_conc = 0  # Nitrate concentration (ppm N)
            default_nh4_conc = 0  # Ammonium concentration (ppm N)
            default_cl_conc = 0  # Chloride concentration (ppm Cl)
          manager Potato Sowing Rule
            sowing_date = 20/10/2003
            emergence_date = 12/11/2003
            row_width = 770  # Row width (mm)
            inrow_spacing = 280  # In-row plant spacing (mm)
            stem_number = 2.2  # Stem number per plant
            cultivar = RussetBurbank
            sowing_depth = 120  # Sowing depth (mm)
            Harvest_date = 03/06/2000
            tt_planting = 700  # Accumulated tt before planting
            on start_of_day:
```
Plant_population = 1/(([row_width]/1000)*([inrow_spacing]/1000))
if today = date('[sowing_date]') then
   potato2 sow population = Plant_population, depth = [sowing_depth], cultivar = [cultivar], maxcover = 1.0, budnumber = [stem_number], row_spacing = [row_width], crop_class = plant  
endif
```
            on Init:
```
Plant_population = 0
```
            memo Stem # note
              Measured stem number was 2.4 but I have increased this to account for the likelyhood the the 3 stem subsample favored large stems so the mean stem weight was over prediced and stem number under
        soil Templeton
          Analysis
            Layer:
              Thickness (mm)  PH (1:5 water)
              100             6.6
              200             6.2
              300             5.7
              300             5.5
              300             5.5
              300             5.5
          InitWater Initial water
            PercentMethod: Percent=1.00; Distributed=Evenly distributed
          Water
            Layer:
              Thickness (mm)  BD (g/cc)  AirDry (mm/mm)  LL15 (mm/mm)  DUL (mm/mm)  SAT (mm/mm)
              100             1.2        0.08            0.16          0.33         0.5
              200             1.2        0.16            0.16          0.33         0.5
              300             1.2        0.15            0.15          0.31         0.44
              300             1.2        0.13            0.13          0.27         0.46
              300             1.2        0.15            0.15          0.3          0.44
              300             1.2        0.15            0.15          0.3          0.44
            SoilCrop wheat
              Layer:
                Thickness (mm)  LL (mm/mm)  KL (/day)  XF (0-1)
                100             0.13        0.06       1
                200             0.13        0.06       1
                300             0.1         0.06       1
                300             0.08        0.06       1
                300             0.11        0.06       1
                300             0.11        0.06       1
            SoilCrop potato2
              Layer:
                Thickness (mm)  LL (mm/mm)  KL (/day)  XF (0-1)
                100             0.13        0.1        1
                200             0.13        0.06       1
                300             0.1         0.04       0.3
                300             0.15        0.01       0.3
                300             0.3         0          0
                300             0.3         0          0
            SoilCrop potato21
              Layer:
                Thickness (mm)  LL (mm/mm)  KL (/day)  XF (0-1)
                100             0.13        0.1        1
                200             0.13        0.1        1
                300             0.1         0.07       1
                300             0.15        0.05       1
                300             0.3         0.05       0
                300             0.3         0.05       0
          SoilWat: SummerCona=4.4; SummerU=9; SummerDate=1-Nov; WinterCona=4.4; WinterU=9; WinterDate=1-Apr; DiffusConst=88; DiffusSlope=35.4; Salb=0.18; CN2Bare=68; CNRed=20; CNCov=0.8
            Layer:
              Thickness (mm)  SWCON (0-1)
              100             0.55
              200             0.55
              300             0.55
              300             0.55
              300             0.55
              300             0.55
          SoilOrganicMatter: RootCN=30; RootWT=3000; SoilCN=11.5; EnrACoeff=7.4; EnrBCoeff=0.2
            Layer:
              Thickness (mm)  OC (Total %)  FBiom (0-1)  FInert (0-1)
              100             3.5           0.025        0.3
              200             2.5           0.025        0.4
              300             1.2           0.015        0.75
              300             1.03          0.01         0.9
              300             0.47          0.01         0.96
              300             0.47          0.01         0.96
          Sample Initial nitrogen
            Layer:
              Thickness (mm)  NO3 (kg/ha)  NH4 (kg/ha)
              100             40           0.1
              200             30           0.1
              300             14           0.1
              300             14           0.1
              300             1.38889      0.1
              300             1.38889      0.1
        micromet
          soilalbedo = 0.23
          a_interception = 0
          b_interception = 0
          c_interception = 0
          d_interception = 0
        potato2
        outputfile: filename=OnWaterChanged Event Test (OLD).out
          variables
            variables: PlantStatus, StageCodeValue, dd/mm/yyyy as Date, Cover_green, Cover_tot, Height, RootDepth, RootWaterUptake, sw_dep, RootWaterSupply, WaterDemand, WaterSupplyDemandRatio, RootSoilWaterEffectValue
          events Reporting Frequency: event=Daily
    simulation OnWaterChanged Event Test (NEW) -> /simulations/Crop Tests/OnWaterChanged Event Test (OLD)
      PlugIns: same as Solute Tests.Solute - Saturated Flow Only (NEW).PlugIns
      area paddock -> /simulations/Crop Tests/OnWaterChanged Event Test (OLD)/paddock
        outputfile: filename=OnWaterChanged Event Test (NEW).out
          variables -> /simulations/Crop Tests/OnWaterChanged Event Test (OLD)/paddock/Outputfile/Variables
          events Reporting Frequency -> /simulations/Crop Tests/OnWaterChanged Event Test (OLD)/paddock/Outputfile/Reporting Frequency
    folder Runoff with Crops
      memo Runoff with Crops
        Use slurp because we want to test the SoilWater module, we don't want to test the other crop module. Slurp almost never changes.
        So you will ONLY get a diff with this simulation if they do something to the SoilWater module.
        Where as if we used another crop we would get a diff with this simulation whenever they changed that crop. Not just when they change the SoilWater module.

        Open  "MicrometTest" simulation from  "MicrometTest2slurp.apsim" under "Tests\MicroMet" folder

        Start with "Runoff Only" Simulation

        Add the following components from the "MicrometTest" simulation,

        micromet
        slurp
        slurproot
        slurp manager
        Under the Water component of the soil, copy the LL, KL and XF compont for
        slurp
        slurproot

        In the "slurp manager" rule on "start of day" tab change,
        if day = 1 and year = 1960 then
        to
        if day = 1 and year = 1940 then

        on "end of day" tab delete,
        micromet lai_table

        Report the following variables at end of day,

        Cover_green
        Cover_tot
        Height
      memo Short Crop Height
        The Height of the cover is impotant. For a given amount of cover, if it is short the cover should have full effect on reducing runoff. If it is tall the cover should have a reduced effect on reducing runoff.
        see soilwat2_cover_surface_runoff()

        See "Runoff with Crops" memo then do the following:

        In the "Slurp manager" "start of day" tab change the
        slurp.height = 200mm.

        Out of interest do a diff between the output file from this "Runoff with Crop - Short" simulation and the output file from the "Runoff Only" simulation and you wiill see the effect a Short Crop has on runoff.

        If you do a diff between the Short and the Tall Crops you will notice that they have different runoff's despite having exactly the same green cover and total cover.
        This shows the effect the height of the cover has on the runoff. Although you will notice that the Tall Crop has less runoff then the shorter crop which is a mistake in the model I think.
      simulation Runoff with Crop - Short (OLD)
        metfile met
          filename=%apsim%\Tests\SoilWater\Process Event\Runoff with Canopy Height.met
        clock
          start_date = 01/01/1940  # Enter the start date of the simulation
          end_date = 31/12/1950  # Enter the end date of the simulation
        summaryfile
        area paddock
          micromet
            soilalbedo = 0.23
            a_interception = 0
            b_interception = 0
            c_interception = 0
            d_interception = 0
          soil: Site=Jimbour; Region=South East Queensland; LocalName=Waco
            SoilType = Black Vertosol  # Classification
            NearestTown = Jimbour, Q 4352
            NaturalVegetation = Grassland, mainly Qld bluegrass
            Sample Soil sample: same as Runoff Only (OLD).paddock.Soil.Soil sample
            Water
              Layer:
                Thickness (mm)  BD (g/cc)  AirDry (mm/mm)  LL15 (mm/mm)  DUL (mm/mm)  SAT (mm/mm)
                150             1.02       0.15            0.29          0.54         0.59
                150             1.03       0.26            0.29          0.53         0.58
                300             1.02       0.29            0.29          0.54         0.59
                300             1.02       0.29            0.29          0.54         0.58
                300             1.06       0.3             0.3           0.52         0.57
                300             1.11       0.31            0.31          0.5          0.55
                300             1.12       0.32            0.32          0.5          0.55
                300             1.15       0.33            0.33          0.48         0.53
                300             1.18       0.34            0.34          0.47         0.52
                300             1.2        0.35            0.35          0.46         0.51
                300             1.25       0.36            0.36          0.44         0.49
              SoilCrop Slurp
                Layer:
                  Thickness (mm)  LL (mm/mm)  KL (/day)  XF (0-1)
                  100             0.29        0.06       1
                  250             0.29        0.06       1
                  300             0.29        0.06       1
                  350             0.29        0.06       1
                  400             0.3         0.06       1
                  300             0.31        0.06       1
                  300             0.32        0.06       1
                  300             0.33        0.06       1
                  300             0.34        0.06       1
                  300             0.35        0.06       1
                  300             0.36        0.06       1
              SoilCrop SlurpRoot: same as Crop Tests.Runoff with Crops.Runoff with Crop - Short (OLD).paddock.Soil.Water.Slurp
            SoilWat: same as Runoff Only (OLD).paddock.Soil.SoilWat
            SoilOrganicMatter: same as Saturated Flow Only (OLD).paddock.Soil.SoilOrganicMatter
            Analysis: same as Saturated Flow Only (OLD).paddock.Soil.Analysis
          slurp
          root slurproot
          manager Slurp manager
            on start_of_day:
```
if day = 1 and year = 1940 then
   ! initialise 
   slurp sow cultivar=slurpcultivar
   slurp.leaflai = 7.0
   slurp.Leaflaidead = 0.1
   slurp.height = 200.
endif
```
          outputfile: filename=Runoff with Crop - Short (OLD).out; title=Runoff Only (OLD)
            variables
              variables: dd/mm/yyyy as Date, rain, runoff, Cover_green, Cover_tot, Height, dlayer, sat_dep, dul_dep, ll15_dep, air_dry_dep, sw_dep, flux, flow, drain, es
            events Reporting Frequency: event=end_day
      simulation Runoff with Crop - Short (NEW) -> /simulations/Crop Tests/Runoff with Crops/Runoff with Crop - Short (OLD)
        PlugIns: same as Solute Tests.Solute - Saturated Flow Only (NEW).PlugIns
        area paddock -> /simulations/Crop Tests/Runoff with Crops/Runoff with Crop - Short (OLD)/paddock
          outputfile: filename=Runoff with Crop - Short (NEW).out; title=Runoff Only (OLD)
            variables -> /simulations/Crop Tests/Runoff with Crops/Runoff with Crop - Short (OLD)/paddock/outputfile/Variables
            events Reporting Frequency -> /simulations/Crop Tests/Runoff with Crops/Runoff with Crop - Short (OLD)/paddock/outputfile/Reporting Frequency
      memo Tall Crop Height
        The Height of the cover is impotant. For a given amount of cover, if it is short the cover should have full effect on reducing runoff. If it is tall the cover should have a reduced effect on reducing runoff.
        see soilwat2_cover_surface_runoff()

        See "Runoff with Crops" memo then do the following:

        In the "Slurp manager" "start of day" tab change the
        slurp.height = 3000mm.

        Out of interest do a diff between the output file from this "Runoff with Crop - Tall" simulation and the output file from the "Runoff Only" simulation and you wiill see the effect a Tall Crop has on runoff.

        If you do a diff between the Short and the Tall Crops you will notice that they have different runoff's despite having exactly the same green cover and total cover.
        This shows the effect the height of the cover has on the runoff. Although you will notice that the Tall Crop has less runoff then the shorter crop which is a mistake in the model I think.
      simulation Runoff with Crop - Tall (OLD)
        metfile met
          filename=%apsim%\Tests\SoilWater\Process Event\Runoff with Canopy Height.met
        clock
          start_date = 01/01/1940  # Enter the start date of the simulation
          end_date = 31/12/1950  # Enter the end date of the simulation
        summaryfile
        area paddock
          micromet
            soilalbedo = 0.23
            a_interception = 0
            b_interception = 0
            c_interception = 0
            d_interception = 0
          soil: same as Crop Tests.Runoff with Crops.Runoff with Crop - Short (OLD).paddock.Soil
          slurp
          root slurproot
          manager Slurp manager
            on start_of_day:
```
if day = 1 and year = 1940 then
   ! initialise 
   slurp sow cultivar=slurpcultivar
   slurp.leaflai = 7.0
   slurp.Leaflaidead = 0.1
   slurp.height = 3000.
endif
```
          outputfile: filename=Runoff with Crop - Tall (OLD).out; title=Runoff Only (OLD)
            variables
              variables: dd/mm/yyyy as Date, rain, runoff, Cover_green, Cover_tot, Height, dlayer, sat_dep, dul_dep, ll15_dep, air_dry_dep, sw_dep, flux, flow, drain, es
            events Reporting Frequency: event=end_day
      memo Intercropping Crops
        If there is more then one crop in the ground you have to add up the covers of ALL the crops in the ground to workout how to change the runoff according to the crop cover.

        See "Runoff with Canopy" memo then do the following:

        Add the following components,

        slurp1
        slurp manager 1
        slurp1root

        Under the water component in the soil, add LL, KL and XF for slurp1 and slurp1root as well.

        Out of interest do a diff between the output file from this "Runoff with Intercropping" simulation and the output file from the "Runoff Only" simulation and you wiill see the effect Intercropping has on runoff.

        Also if you do a diff between this Intercropping Simulation and either the Short and the Tall Crops you will notice that it has different runoff to either the Short or the Tall Crop
        This shows that Intercropping has an effect on the runoff.
        Also notice that it has less runoff then either the Runoff Only, Short Crop or Tall Crop. As you would expect having so much more cover on it.
      simulation Runoff with Intercropping (OLD)
        metfile met
          filename=%apsim%\Tests\SoilWater\Process Event\Runoff with Canopy Height.met
        clock
          start_date = 01/01/1940  # Enter the start date of the simulation
          end_date = 31/12/1950  # Enter the end date of the simulation
        summaryfile
        area paddock
          micromet
            soilalbedo = 0.23
            a_interception = 0
            b_interception = 0
            c_interception = 0
            d_interception = 0
          soil: Site=Jimbour; Region=South East Queensland; LocalName=Waco
            SoilType = Black Vertosol  # Classification
            NearestTown = Jimbour, Q 4352
            NaturalVegetation = Grassland, mainly Qld bluegrass
            Sample Soil sample: same as Runoff Only (OLD).paddock.Soil.Soil sample
            Water
              Layer:
                Thickness (mm)  BD (g/cc)  AirDry (mm/mm)  LL15 (mm/mm)  DUL (mm/mm)  SAT (mm/mm)
                150             1.02       0.15            0.29          0.54         0.59
                150             1.03       0.26            0.29          0.53         0.58
                300             1.02       0.29            0.29          0.54         0.59
                300             1.02       0.29            0.29          0.54         0.58
                300             1.06       0.3             0.3           0.52         0.57
                300             1.11       0.31            0.31          0.5          0.55
                300             1.12       0.32            0.32          0.5          0.55
                300             1.15       0.33            0.33          0.48         0.53
                300             1.18       0.34            0.34          0.47         0.52
                300             1.2        0.35            0.35          0.46         0.51
                300             1.25       0.36            0.36          0.44         0.49
              SoilCrop Slurp: same as Crop Tests.Runoff with Crops.Runoff with Crop - Short (OLD).paddock.Soil.Water.Slurp
              SoilCrop SlurpRoot: same as Crop Tests.Runoff with Crops.Runoff with Crop - Short (OLD).paddock.Soil.Water.Slurp
              SoilCrop Slurp1: same as Crop Tests.Runoff with Crops.Runoff with Crop - Short (OLD).paddock.Soil.Water.Slurp
              SoilCrop Slurp1Root: same as Crop Tests.Runoff with Crops.Runoff with Crop - Short (OLD).paddock.Soil.Water.Slurp
            SoilWat: same as Runoff Only (OLD).paddock.Soil.SoilWat
            SoilOrganicMatter: same as Saturated Flow Only (OLD).paddock.Soil.SoilOrganicMatter
            Analysis: same as Saturated Flow Only (OLD).paddock.Soil.Analysis
          slurp
          root slurproot
          manager Slurp manager
            on start_of_day:
            script: same as in Crop Tests.Runoff with Crops.Runoff with Crop - Short (OLD).paddock.Slurp manager
          slurp slurp1
          root slurp1root
          manager Slurp manager1
            on start_of_day:
```
if day = 1 and year = 1940 then
   ! initialise 
   slurp1 sow cultivar=slurpcultivar
   slurp1.leaflai = 7.0
   slurp1.Leaflaidead = 0.1
   slurp1.height = 3000.
endif
```
          outputfile: filename=Runoff with Intercropping (OLD).out; title=Runoff Only (OLD)
            variables
              variables: dd/mm/yyyy as Date, rain, runoff, Cover_green, Cover_tot, Height, dlayer, sat_dep, dul_dep, ll15_dep, air_dry_dep, sw_dep, flux, flow, drain, es
            events Reporting Frequency: event=end_day
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