folder simulations: version=36; creator=Apsim 7.6-r3505
  simulation Taro2
    metfile met: filename=%apsim%\Tests\Taro2\suva3.met
    clock
      start_date = 22/01/2013  # Enter the start date of the simulation
      end_date = 31/12/2013  # Enter the end date of the simulation
    summaryfile
    area paddock
      Taro2
      Soil: SoilType=Black Vertosol; LocalName=Waco; Site=Jimbour; NearestTown=Jimbour, Q 4352; Region=South East Queensland; NaturalVegetation=Grassland, mainly Qld bluegrass; Latitude=0; Longitude=0; YearOfSampling=0
        Water
          Thickness  BD    AirDry  LL15   DUL    SAT    KS
          150        1.14  0.042   0.083  0.489  0.539  100
          150        1.24  0.017   0.083  0.454  0.504  100
          300        1     0.083   0.083  0.542  0.592  100
          300        1.05  0.083   0.083  0.523  0.573  100
          300        1.01  0.083   0.083  0.539  0.589  100
          300        1.13  0.083   0.083  0.54   0.59   100
          300        1.25  0.083   0.083  0.54   0.59   100
          SoilCrop Taro2: LL=[0.083, 0.137, 0.181, 0.258, 0.242, 0.348, 0.363]; KL=[0.1, 0.1, 0.08, 0.06, 0.04, 0.02, 0.01]; XF=[1, 1, 1, 1, 1, 1, 1]
        SoilWater: SummerCona=5; SummerU=9; SummerDate=1-Nov; WinterCona=5; WinterU=9; WinterDate=1-Apr; DiffusConst=54; DiffusSlope=28; Salb=0.12; CN2Bare=73; CNRed=20; CNCov=0.8; Thickness=[150, 150, 300, 300, 300, 300, 300]; SWCON=[0.33, 0.33, 0.33, 0.33, 0.33, 0.33, 0.33]
        SoilOrganicMatter: RootCN=40; RootWt=200; SoilCN=12.5; EnrACoeff=7.4; EnrBCoeff=0.2; OCUnits=Total
          Thickness  OC    FBiom  FInert
          150        1.04  0.025  0.4
          150        0.89  0.02   0.6
          300        0.89  0.015  0.8
          300        0.89  0.01   0.9
          300        0.77  0.01   0.95
          300        0.45  0.01   0.95
          300        0.27  0.01   0.95
        Analysis: PHUnits=Water; BoronUnits=HotWater
          Thickness  EC    PH
          150        0.2   8.4
          150        0.25  8.8
          300        0.31  9
          300        0.4   9.2
          300        0.59  9.2
          300        0.84  9.1
          300        0.93  9
        Sample Initial Nitrogen: NO3Units=kgha; NH4Units=kgha; SWUnits=Volumetric; OCUnits=Total; PHUnits=Water
          Thickness  NO3   NH4   SW
          150        1.28  0.77  0.182
          150        1.76  0.69  0.218
          300        3.01  0.6   0.199
          300        4.11  0.79  0.232
          300        3     0.7   0.232
          300        3     0.7   0.232
          300        3     0.7   0.232
          999999     -     -     -
      surfaceom SurfaceOrganicMatter
        PoolName = wheat_stubble  # Organic Matter pool name
        type = wheat  # Organic Matter type
        mass = 0.0  # Initial surface residue (kg/ha)
        cnr = 80.0  # C:N ratio of initial residue
        standing_fraction = 0.0  # Fraction of residue standing
      fertiliser
      folder Manager folder
        manager Sow on a fixed date
          # Sowing criteria
          date = 22/01/2013  # Enter sowing date (dd-mmm)
          # Sowing parameters
          crop = Taro2  # Enter name of crop to sow
          density = 1  # Enter sowing density (plants/m2)
          depth = 1  # Enter sowing depth (mm)
          cultivar = Tausala  # Enter cultivar
          class = Plant  # Enter crop growth class
          row_spacing = 1000  # Enter row spacing (mm)
          on start_of_day:
```
        if (today = date('[date]') then
              [crop] sow population =[density], depth = [depth], cultivar = [cultivar], MaxCover = 1.0, BudNumber = 1, row_spacing = [row_spacing], crop_class = [class]
         endif
```
        manager Harvesting rule
          # Harvesting criteria
          crop = Taro2  # Enter name of crop to harvest when ripe
          on end_of_day:
```
           if ('[crop]' = 'cotton') then
              if ([crop].ozcot_status > 0) then
                  [crop] harvest
              endif
           elseif ('[crop].PhenologyCurrentStageName' = 'HarvestReady' or [crop].plant_status = 'dead') then
              [crop]  harvest
              [crop]  end_crop
           endif
```
        operations Operations Schedule
          22/1/2013  fertiliser apply amount = 39 (kg/ha), depth = 50 (mm), type = NO3_N ()
          26/2/2013  fertiliser apply amount = 52 (kg/ha), depth = 50 (mm), type = Urea_N ()
          1/4/2014  fertiliser apply amount = 52 (kg/ha), depth = 50 (mm), type = Urea_N ()
          25/4/2013  Irrigation apply amount = 2 (mm)
          6/5/2013  fertiliser apply amount = 52 (kg/ha), depth = 50 (mm), type = Urea_N ()
      outputfile: filename=Taro2.out; title=Taro2
        variables
          variables: dd/mm/yyyy as Date, StageCodeValue, PhenologyCurrentPhaseName, PhenologyCurrentStageName, LeafLAI, AboveGroundWt, sw_dep(), WaterDemand, LeafFw, LeafTranspiration, LeafWaterDemand, RootWaterUptake, surfaceom_wt, no3(), StructureMainStemNodeNo, LeafExpandedNodeNo, LeafExpandedCohortNo, LeafThermalTimeValue, StemLiveWt, StemLiveStructuralNConc, StemLiveNConc, CormLiveWt, BelowGroundWt, TotalWt, LeafLiveWt, RootLiveWt, FruitLiveWt, Taro2.LeafLiveN
        events Reporting Frequency: event=daily
      micromet: soilalbedo=0.23; a_interception=0.0; b_interception=0.0; c_interception=0.0; d_interception=0.0
      irrigation
        automatic_irrigation = off
        asw_depth = 600  # Depth to which ASW is calculated. (mm)
        crit_fr_asw = 0.5  # Fraction of ASW below which irrigation is applied (0-1.0)
        irrigation_efficiency = 1  # Efficiency of the irrigation. (0-1.0)
        irrigation_allocation = off  # Allocation limits
        allocation = 0  # Allocation in mm
        default_no3_conc = 0.0  # Nitrate concentration (ppm N)
        default_nh4_conc = 0.0  # Ammonium concentration (ppm N)
        default_cl_conc = 0.0  # Chloride concentration (ppm Cl)
      folder Plant2 developers graph suite
        outputfile Plant2 diagnostic variables: Title=Taro2 Plant2 diagnostic variables; filename=Taro2 Plant2 diagnostic variables.out
          events Reporting Frequency: event=Daily
          variables
            variables: dd/mmm/yyyy, no3(), nh4(), urea(), surfaceom_n, biom_n(), fom_n(), hum_n(), dnit(), leach, AccumPlantN, AccumMineralisation, AccumDenit, AccumFert, AccumLeach, AccumDetach, DeltaSoilMineralN, RootNUptakeSupply, eo, es, sw_dep(), dul_dep(), drain, runoff, outflow_lat(), pond, AccumEO, AccumEP, AccumES, AccumDrainage, AccumRunoff, AccumRainfall, AccumIrrigation, AccumOutflowLat, SoilWaterDeficit, LeafDeadWt, LeafLiveWt, StemDeadWt2, StemLiveWt, CormDeadWt, CormLiveWt, RootDeadWt, RootLiveWt, RootLiveN, RootDeadN, LeafDeadN, LeafLiveN, StemDeadN, StemLiveN, CormDeadN, CormLiveN, RootWaterSupply, RootWaterUptake, LeafTranspiration, LeafWaterDemand, RootDepth, Cover_green, Cover_tot, Cover_dead, LeafLAI, LeafLAIDead, Height, LeafFn, LeafFw, LeafFrgr, LeafPhotosynthesisFt, LeafPhotosynthesisFvpd, LeafTotalNo, LeafGreenNo, LeafExpandingNodeNo, LeafCohortNo, LeafBranchNo, LeafDeadNodeNo, LeafNodeNo, LeafSenescingNodeNo, LeafDeadN, LeafDeadWt, LeafLeafSizeValue, LeafLiveN, StemLiveN, TotalNonStructuralN, TotalStructuralN, TotalWt
        manager Diagnostic variables
          CropType = Taro2  # Select crop type to report variables for
          on init:
```
SimDay = 1

AccumPlantN = 0
AccumMineralisation = 0
AccumDenit = 0
AccumFert = 0
AccumLeach = 0
AccumDetach = 0
DeltaSoilOMN = 0
DeltaSurfaceOMN = 0
DeltaSoilMineralN = 0

AccumEO = 0
AccumEP = 0
AccumES = 0
AccumDrainage = 0
AccumRunoff = 0
AccumIrrigation = 0
AccumRainfall = 0
SoilWaterDeficit = 0
```
          on start_of_day:
```
if simday = 1 then
InitialSoilOMN = biom_n() + fom_n() + hum_n()
InitialSurfaceOMN = surfaceom_n
InitialMineralN = no3() + nh4() + urea()
endif

!!!!!! Nitrogen balance components !!!!!!
!!!!!!^^^^^^^^^^^^^^^^^^^^^^^^^^^^^!!!!!!
AccumPlantN =  ([CropType].LeafLiveN + [CropType].LeafDeadN + [CropType].StemLiveN + [CropType].StemDeadN + [CropType].CormLiveN + [CropType].CormDeadN ) * 10 ![CropType].RootLiveN + [CropType].RootDeadN
AccumMineralisation = AccumMineralisation + dlt_n_min() + dlt_n_min_res()
AccumDenit = AccumDenit - dnit() 
AccumFert = AccumFert + fertiliser
AccumLeach = AccumLeach - leach_urea - leach_no3 - leach_nh4 
AccumDetach = 0 !plant2 doesn't detach yet
DeltaSoilOMN = (biom_n() + fom_n() + hum_n()) - InitialSoilOMN
DeltaSurfaceOMN = surfaceom_n - InitialSurfaceOMN
DeltaSoilMineralN = (no3() + nh4() + urea()) - InitialMineralN

!!!!!! Water balance components !!!!!!
!!!!!!^^^^^^^^^^^^^^^^^^^^^^^^^^!!!!!!

AccumEO = AccumEO - eo
AccumEP = AccumEP - [CropType].LeafTranspiration
AccumES = AccumES - es
AccumDrainage = AccumDrainage - drain
AccumRunoff = AccumRunoff - runoff
AccumOutflowLat = AccumOutflowLat - outflow_lat()
AccumIrrigation = AccumIrrigation + Irrigation
AccumRainfall = Accumrainfall + rain
SoilWaterDeficit =  sw_dep() - dul_dep()
```
          on end_of_day:
```
if SimDay = 1 then
SimDay = 2
Else SimDay = 2
endif
```
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