folder Simulations: version=17
  simulation Usapinonot_Clitoria_14_Feb
    metfile met: filename=Usapinonot.met
    climatechange
      maxtmodifier = 0  # Change in maximum temperature in degrees celsius
      mintmodifier = 0  # Change in minimum temperature in degrees celsius
      rainmodifier = 1  # Relative change in rainfall
      radiationmodifier = 1.3  # Relative change in radiation
      co2 = 350  # Atmospheric C02 concentration (ppm)
    clock
      start_date = 16/12/2006  # Select the start date of the simulation
      end_date = 25/02/2008  # Select the end date of the simulation
    summaryfile: filename=Continuous Wheat Simulation.sum
    area paddock
      registrations global
      folder Manager folder
        manager Sowing rule
          category =  # Sowing criteria
          date1 = 14-Feb-2007  # Enter sowing window START date (dd-mmm)
          date2 = 14-Feb-2007  # Enter sowing window END date (dd-mmm)
          must_sow = yes  # Must sow?
          raincrit = 0  # Amount of rainfall
          rainnumdays = 3  # Number of days of rainfall
          esw_amount = 200  # Enter minimum allowable available soil water (mm)
          category =  # Sowing parameters
          crop = butterflypea  # Enter name of crop to sow
          density = 2  # Enter sowing density (plants/m2)
          depth = 50  # Enter sowing depth (mm)
          cultivar = timor  # Enter cultivar
          class = plant  # Enter crop growth class
          row_spacing = 200  # Enter row spacing (mm)
          on start_of_day:
```
      if (paddock_is_fallow() = 1 and FallowIn <> 'yes' and (NextCrop = 0 or NextCrop = '[crop]')) then
         if (date_within('[date1], [date2]') = 1) then
            if (rain[[rainnumdays]] >= [raincrit] AND esw >= [esw_amount]) OR
                ('[must_sow]' = 'yes' AND today = date('[date2]'))) THEN
               ChooseNextCrop = 'yes'   ! for rotations
               [crop] sow plants =[density], sowing_depth = [depth], cultivar = [cultivar], row_spacing = [row_spacing], crop_class = [class]
            endif
            if today = date('[date2]') then
               ChooseNextCrop = 'yes'
            endif
         endif
      endif
```
        manager Harvesting rule
          category =  # Harvesting criteria
          crop = butterflypea  # Enter name of crop to harvest when ripe
          on end_of_day:
```
           if [crop].StageName = 'harvest_ripe' or [crop].plant_status = 'dead' then
              [crop]  harvest
              [crop]  end_crop
           endif
```
        manager Sowing fertiliser
          category =  # When should fertiliser be applied
          modulename = Butterflypea  # On which module should the event come from
          eventname = sowing  # On which event should fertiliser be applied
          category =  # Fertiliser application details
          fertmodule = fertiliser  # Module used to apply the fertiliser
          fert_amount_sow = 0  # Amount of starter fertiliser at sowing (kg/ha)
          fert_type_sow = urea_N  # Sowing fertiliser type
          on [modulename].[eventname]:
```
        [fertmodule] apply amount = [fert_amount_sow] (kg/ha), depth = 50 (mm), type = [fert_type_sow]
```
        manager
          on init:
```
cuts = 0
 total_minN = 0
biom = 0
```
          on start_of_day:
```
 biom = leafgreenwt + stemgreenwt
```
          on end_of_day:
```
  total_minN = total_minN + dlt_n_min_tot()
```
        manager Reset on fixed date
          category =  # When should a reset be done
          reset_date = 18-Jan-2007  # Enter date of reset (dd-mmm)
          category =  # Reset details
          soilmodule = Grey Vertisol (Usapinonot No678)  # Name of your soil module
          surfaceommodule = surface organic matter  # Name of your surface organic matter module
          resetWater = yes  # Reset soil water?
          resetNitrogen = yes  # Reset soil nitrogen?
          resetSurfaceOM = yes  # Reset surface organic matter?
          on start_of_day:
```
         if (today = date('[reset_date]')) then
            resetWater = '[resetWater]'
            resetNitrogen  = '[resetNitrogen]'
            resetSurfaceOM = '[resetSurfaceOM]'
            if (resetWater = 'yes') then
                '[soilmodule] Water' reset
            endif
            if (resetNitrogen = 'yes') then
                '[soilmodule] Nitrogen' reset
            endif
            if (resetSurfaceOM = 'yes') then
                '[surfaceommodule]' reset
            endif
            act_mods reseting
         endif
```
      fertiliser
      surfaceom surface organic matter
        PoolName = centro  # Organic Matter pool name
        type = centro  # Organic Matter type
        mass = 500  # Initial surface residue (kg/ha)
        cnr = 40  # C:N ratio of initial residue
        standing_fraction = 0  # Fraction of residue standing
      butterflypea
      outputfile
        variables
          variables: dd/mm/yyyy as Date, year, day, DaysAfterSowing, flowering_das, flowering_date, StageName, yield, biomass_wt, LeafTotalWt, StemTotalWt, podTotalWt, LeafSenescedWt, biom as green_biomass, LeafGreenWt, StemGreenWt, leaf_no, leaf_no_sen, leaf_area(), node_no, lai, stover_wt, ep, esw_layr(), root_depth, no3(), manager.total_minN, height, dlt_dm_green_grain, dlt_dm_green_leaf, dlt_dm_green_meal, dlt_dm_green_pod, dlt_dm_green_root, dlt_dm_green_stem, sw, rain, stagename
        events Reporting Frequency: event=Daily
      soil Grey Vertisol (Usapinonot No678): state=NTT; region=TTU Regency; nearesttown=Kefamenanu; site=Usapinonot; ApsoilNumber=678; SoilType=Grey Vertisol; Latitude=-9.489; Longitude=124.558; LocationAccuracy=+/-50m; SummerCona=3.5; WinterCona=3.5; SummerU=6; WinterU=6; SummerDate=1-Nov; WinterDate=1-May; Salb=0.12; DiffusConst=40; DiffusSlope=16; CN2Bare=73; CNRed=20; CNCov=0.8; RootCN=40; RootWT=1000; SoilCN=12; EnrACoeff=7.4; EnrBCoeff=0.2
        DataSource=Collected by BPTP and CSIRO as part of ACIAR Project LPS/2006/003 'Integrating forage legumes into the maize cropping systems of West Timor'
        comment=verano_stylo=Stylosanthes hamata; lablab=lablab purpureus; cavalcade_centro=centrosema pascuorum; desmanthus_virgatus; butterfly_pea=clitoria ternatea; burgundy_bean=macroptilium bracteatum (CLL based on Ss); caatinga_stylo=stylosanthes seabrana; brazilian_stylo=stylosanthes guianensis; desmanthus_pernambucanus; arachis_pintoi; Macroptilium gracile; stylo184; maize CLL estimated
        profile
          layer:
            thickness  bd     ll15   airdry  dul    sat    swcon  fbiom  finert  oc    ph   ll maize  kl maize  xf maize  ll lablab  kl lablab  xf lablab  ll cavalcade  kl cavalcade  xf cavalcade  ll desmanthusv  kl desmanthusv  xf desmanthusv  ll butterflypea  kl butterflypea  xf butterflypea  ll burgundybean  kl burgundybean  xf burgundybean  ll Stylos  kl Stylos  xf Stylos  ll stylog  kl stylog  xf stylog  ll desmanthusp  kl desmanthusp  xf desmanthusp
            150        1.061  0.31   0.155   0.429  0.57   0.3    0.04   0.4     1.3   7.5  0.287     0.06      1         0.31       0.08       1          0.31          0.08          1             0.287           0.08            1               0.287            0.06             1                0.287            0.06             1                0.287      0.08       1          0.287      0.08       1          0.287           0.08            1
            150        1.058  0.31   0.248   0.419  0.571  0.3    0.02   0.6     0.8   7.5  0.29      0.06      1         0.31       0.08       1          0.31          0.08          1             0.29            0.08            1               0.29             0.06             1                0.29             0.06             1                0.29       0.08       1          0.29       0.08       1          0.29            0.08            1
            300        1.177  0.295  0.295   0.464  0.526  0.3    0.02   0.8     0.3   7.5  0.316     0.06      1         0.32       0.08       1          0.32          0.08          1             0.295           0.08            1               0.297            0.04             1                0.325            0.06             1                0.325      0.08       1          0.32       0.08       1          0.32            0.08            1
            300        1.197  0.295  0.295   0.468  0.518  0.3    0.02   1       0.15  7.5  0.322     0.04      1         0.31       0.08       1          0.32          0.08          1             0.31            0.08            1               0.32             0.04             1                0.35             0.04             1                0.35       0.08       1          0.33       0.08       1          0.321           0.08            1
            300        1.243  0.305  0.305   0.455  0.501  0.3    0.01   1       0.1   7.5  0.343     0.04      1         0.32       0.07       1          0.339         0.07          1             0.305           0.07            1               0.33             0.02             1                0.351            0.04             1                0.351      0.07       1          0.347      0.07       1          0.351           0.07            1
            300        1.311  0.305  0.305   0.455  0.505  0.3    0.01   1       0.1   7.5  0.37      0.02      1         0.35       0.07       1          0.379         0.07          1             0.333           0.07            1               0.345            0.01             1                0.363            0.04             1                0.363      0.07       1          0.341      0.07       1          0.363           0.07            1
            300        1.195  0.305  0.305   0.46   0.519  0.3    0.01   1       0.05  7.5  0.428     0.01      1         0.39       0.07       1          0.44          0.07          1             0.333           0.07            1               0.38             0.01             0                0.363            0.03             1                0.363      0.07       1          0.341      0.07       1          0.363           0.07            1
        InitWater
          profile
            layer:
              thickness  sw
              150        0.399
              150        0.395
              300        0.395
              300        0.384
              300        0.376
              300        0.4343
              300        0.4343
        InitNitrogen
          profile
            layer:
              thickness  no3       nh4
              150        0.928182  0.100012
              150        0.928182  0.100012
              300        0.928182  0.100012
              300        0.928182  0.100012
              300        0.928182  0.100012
              300        0.928182  0.100012
              300        0.928182  0.100012
  simulation Gatton_Clitoria_17Dec
    metfile met: filename=Gatton.met
    clock
      start_date = 16/12/2007  # Select the start date of the simulation
      end_date = 1/06/2008  # Select the end date of the simulation
    summaryfile: filename=Continuous Wheat Simulation.sum
    area paddock
      registrations global
      folder Manager folder
        manager Sowing rule
          category =  # Sowing criteria
          date1 = 17-Dec  # Enter sowing window START date (dd-mmm)
          date2 = 17-Dec  # Enter sowing window END date (dd-mmm)
          must_sow = yes  # Must sow?
          raincrit = 30  # Amount of rainfall
          rainnumdays = 3  # Number of days of rainfall
          esw_amount = 200  # Enter minimum allowable available soil water (mm)
          category =  # Sowing parameters
          crop = butterflypea  # Enter name of crop to sow
          density = 12  # Enter sowing density (plants/m2)
          depth = 30  # Enter sowing depth (mm)
          cultivar = gatton  # Enter cultivar
          class = plant  # Enter crop growth class
          row_spacing = 200  # Enter row spacing (mm)
          on start_of_day:
          script: same as in Usapinonot_Clitoria_14_Feb.paddock.Manager folder.Sowing rule
        manager Harvesting rule
          category =  # Harvesting criteria
          crop = butterflypea  # Enter name of crop to harvest when ripe
          on end_of_day:
```
           if [crop].StageName = 'harvest_ripe' or [crop].plant_status = 'dead' then
       !       [crop]  harvest
       !       [crop]  end_crop
           endif
```
        manager Sowing fertiliser: same as Usapinonot_Clitoria_14_Feb.paddock.Manager folder.Sowing fertiliser
        manager
          on init:
```
cuts = 0
 total_minN = 0
biom = 0
```
          on start_of_day:
```
biom = leafgreenwt + stemgreenwt

  if day = 358 then        
      irrigation apply amount = 10
  endif

  if day = 362 then        
      irrigation apply amount = 38
  endif
```
          on end_of_day:
```
  total_minN = total_minN + dlt_n_min_tot()
```
      fertiliser
      surfaceom surface organic matter
        PoolName = centro  # Organic Matter pool name
        type = centro  # Organic Matter type
        mass = 500  # Initial surface residue (kg/ha)
        cnr = 40  # C:N ratio of initial residue
        standing_fraction = 0  # Fraction of residue standing
      butterflypea
      soil Prarie-Lockyer: state=Queensland; region=Lockyer; nearesttown=Lawes, Q 4350; site=Lawes; SoilType=Prarie; Latitude=-27.5339; Longitude=152.338; LocationAccuracy=+-20m; DataSource=CSIRO Sustainable Ecosystems, Toowoomba; naturalvegetation=Blue Gum, Moreton Bay Ash, Tea Tree; SummerCona=3.5; WinterCona=2.5; SummerU=6; WinterU=4; SummerDate=1-Nov; WinterDate=1-apr; Salb=0.12; DiffusConst=40; DiffusSlope=16; CN2Bare=73; CNRed=20; CNCov=0.8; RootCN=40; RootWT=1000; SoilCN=12; EnrACoeff=7.4; EnrBCoeff=0.2
        comment=Soil naming structure: \State\Region\Classification-Local Name (Site/district and locator number); oc and ph estimated
        profile
          layer:
            thickness  bd    ll15  airdry  dul   sat   swcon  fbiom  finert  oc   ph  ll chickpea  kl chickpea  xf chickpea  ll butterflypea  kl butterflypea  xf butterflypea
            150        1.38  0.2   0.1     0.38  0.45  0.3    0.04   0.4     1.2  7   0.2          0.06         1            0.2              0.06             1
            150        1.38  0.21  0.168   0.38  0.45  0.3    0.02   0.6     1.2  7   0.21         0.06         1            0.21             0.06             1
            300        1.28  0.2   0.18    0.39  0.45  0.3    0.02   0.8     1.2  7   0.2          0.06         1            0.2              0.06             1
            300        1.38  0.22  0.2     0.4   0.45  0.3    0.02   1       1.1  7   0.22         0.06         1            0.22             0.06             1
            300        1.4   0.24  0.22    0.39  0.44  0.3    0.01   1       0.7  7   0.22         0.06         1            0.24             0.06             1
            300        1.46  0.28  0.27    0.37  0.42  0.3    0.01   1       0.3  7   0.34         0.06         1            0.28             0.06             1
            300        1.47  0.3   0.29    0.34  0.42  0.3    0.01   1       0.3  7   0.3          0.06         1            0.3              0.06             1
            300        1.47  0.3   0.29    0.34  0.42  0.3    0.01   1       0.3  7   0.3          0.06         1            0.3              0.06             1
        InitWater: RelativeTo=butterflypea
          PercentMethod: Percent=1.00; Distributed=Evenly distributed
        InitNitrogen
          profile
            layer:
              thickness  no3  nh4
              150        5    0.1
              150        4    0.1
              300        3    0.1
              300        2    0.1
              300        1    0.1
              300        0.6  0.1
              300        0.5  0.1
              300        0.1  0.1
      outputfile
        variables
          variables: dd/mm/yyyy as Date, year, day, DaysAfterSowing, flowering_das, flowering_date, StageName, yield, biomass_wt, LeafTotalWt, StemTotalWt, podTotalWt, LeafSenescedWt, biom as green_biomass, LeafGreenWt, StemGreenWt, leaf_no, leaf_no_sen, leaf_area(), node_no, lai, stover_wt, ep, esw_layr(), root_depth, no3(), manager.total_minN, height, dlt_dm_green_grain, leafgrowthwt, dlt_dm_green_meal, podgrowthwt, dlt_dm_green_root, stemgrowthwt, leaves_per_node, lai_sum, mint, stagename
        events Reporting Frequency: event=Daily
      irrigation
        automatic_irrigation = off
        asw_depth = 600  # Depth to which ASW is calculated. (mm)
        crit_fr_asw = 0.5  # Fraction of ASW below which irrigation is applied (0-1.0)
        irrigation_efficiency = 1  # Efficiency of the irrigation. (0-1.0)
        default_no3_conc = 0  # Nitrate concentration (ppm N)
        default_nh4_conc = 0  # Ammonium concentration (ppm N)
        default_cl_conc = 0  # Chloride concentration (ppm Cl)
  simulation Emerald_BFP
    memo Jo notes for bfp
      This is the butterflypea validation at Emerald Research Station
      (JO and MQ)
    metfile met: filename=Emerald0809.met
    clock
      start_date = 1/01/2008  # Select the start date of the simulation
      end_date = 31/12/2008  # Select the end date of the simulation
    summaryfile: filename=Continuous Wheat Simulation.sum
    area Dryland
      registrations global
      folder Manager folder
        manager Sowing rule
          category =  # Sowing criteria
          date1 = 22-feb  # Enter sowing window START date (dd-mmm)
          date2 = 22-feb  # Enter sowing window END date (dd-mmm)
          must_sow = yes  # Must sow?
          raincrit = 30  # Amount of rainfall
          rainnumdays = 3  # Number of days of rainfall
          esw_amount = 200  # Enter minimum allowable available soil water (mm)
          category =  # Sowing parameters
          crop = butterflypea  # Enter name of crop to sow
          density = 15  # Enter sowing density (plants/m2)
          depth = 20  # Enter sowing depth (mm)
          cultivar = milgarra  # Enter cultivar
          class = plant  # Enter crop growth class
          row_spacing = 200  # Enter row spacing (mm)
          on start_of_day:
          script: same as in Usapinonot_Clitoria_14_Feb.paddock.Manager folder.Sowing rule
        manager Harvesting rule
          category =  # Harvesting criteria
          crop = butterflypea  # Enter name of crop to harvest when ripe
          on end_of_day:
          script: same as in Usapinonot_Clitoria_14_Feb.paddock.Manager folder.Harvesting rule
        manager Sowing fertiliser
          category =  # When should fertiliser be applied
          modulename = butterflypea  # On which module should the event come from
          eventname = sowing  # On which event should fertiliser be applied
          category =  # Fertiliser application details
          fertmodule = fertiliser  # Module used to apply the fertiliser
          fert_amount_sow = 0  # Amount of starter fertiliser at sowing (kg/ha)
          fert_type_sow = urea_N  # Sowing fertiliser type
          on [modulename].[eventname]:
          script: same as in Usapinonot_Clitoria_14_Feb.paddock.Manager folder.Sowing fertiliser
        manager
          on init:
```
cuts = 0
 total_minN = 0
biom = 0
```
          on start_of_day:
          script: same as in Gatton_Clitoria_17Dec.paddock.Manager folder.Manager
          on end_of_day:
```
  total_minN = total_minN + dlt_n_min_tot()
```
      butterflypea
      fertiliser
      surfaceom surface organic matter
        PoolName = residue  # Organic Matter pool name
        type = wheat  # Organic Matter type
        mass = 1000  # Initial surface residue (kg/ha)
        cnr = 80  # C:N ratio of initial residue
        standing_fraction = 0  # Fraction of residue standing
      outputfile
        variables
          variables: dd/mm/yyyy as Date, year, day, DaysAfterSowing, flowering_das, flowering_date, StageName, yield, biomass_wt, LeafTotalWt, StemTotalWt, podTotalWt, LeafSenescedWt, biom as green_biomass, LeafGreenWt, StemGreenWt, leaf_no, leaf_no_sen, leaf_area(), node_no, lai, stover_wt, ep, esw_layr(), root_depth, no3(), manager.total_minN, height, dlt_dm_green_grain, leafgrowthwt, dlt_dm_green_meal, podgrowthwt, dlt_dm_green_root, stemgrowthwt, leaves_per_node, swdef_pheno, swdef_photo, swdef_expan, swdef_fixation, lai_sum, green_leaves, tt_, acc_TT, biomass, green_biomass, rain, n_fixed_tops, n_supply_soil, n_uptake, stagename
          Constants: Title=Emerald_BFP_Dryland
        events Reporting Frequency: event=Daily
      irrigation
        automatic_irrigation = off
        asw_depth = 600  # Depth to which ASW is calculated. (mm)
        crit_fr_asw = 0.5  # Fraction of ASW below which irrigation is applied (0-1.0)
        irrigation_efficiency = 0.8  # Efficiency of the irrigation. (0-1.0)
        default_no3_conc = 0  # Nitrate concentration (ppm N)
        default_nh4_conc = 0  # Ammonium concentration (ppm N)
        default_cl_conc = 0  # Chloride concentration (ppm Cl)
      soil Black_Vertosol_ERS: state=Queensland; region=Central Highlands; nearesttown=Emerald; site=Emerald research Station; ApsoilNumber=xxx; SoilType=Black Vertosol; Latitude=-23.48; Longitude=148.15; LocationAccuracy=+-20m; DataSource=Typed by JO (from Hill et al 2006) - from Merv mungbean; naturalvegetation=Open Downs; Salb=0.12; DiffusConst=40; DiffusSlope=16; CN2Bare=73; CNRed=20; CNCov=0.8; RootCN=40; RootWT=1000; SoilCN=12; EnrACoeff=7.4; EnrBCoeff=0.2; U=6; Cona=3.5
        comment=Soil naming structure: \State\Region\Classification-Local Name (Site/district and locator number); oc and ph estimated
        profile
          layer:
            thickness  bd     ll15   airdry  dul    sat   swcon  fbiom  finert  ph    oc    ll butterflypea  kl butterflypea  xf butterflypea  ll lablab  kl lablab  xf lablab  ll SweetSorghum  kl SweetSorghum  xf SweetSorghum  ll wheat  kl wheat  xf wheat
            100        1.193  0.25   0.12    0.5    0.55  0.2    0.035  0.2     8.05  0.76  0.27             0.04             1                0.27       0.07       1          0.27             0.07             1                0.27      0.06      1
            100        1.193  0.25   0.2     0.5    0.55  0.2    0.02   0.5     7.9   0.66  0.3              0.04             1                0.3        0.07       1          0.3              0.07             1                0.3       0.06      1
            100        1.193  0.255  0.255   0.5    0.55  0.2    0.015  0.7     8.25  0.61  0.32             0.03             1                0.32       0.07       1          0.32             0.07             1                0.32      0.06      1
            300        1.219  0.28   0.28    0.49   0.54  0.2    0.01   0.8     8.2   0.59  0.35             0.04             1                0.35       0.05       1          0.35             0.05             1                0.35      0.04      1
            300        1.246  0.305  0.305   0.48   0.53  0.2    0.01   0.95    8.2   0.57  0.36             0.02             1                0.36       0.01       1          0.36             0.01             1                0.36      0.04      1
            200        1.299  0.31   0.31    0.465  0.51  0.2    0.01   0.99    8.2   0.52  0.35             0.01             1                0.35       0.01       1          0.35             0.01             1                0.35      0.02      1
        InitWater: RelativeTo=butterflypea
          profile
            layer:
              thickness  sw
              100        0.4
              100        0.5
              100        0.5
              300        0.49
              300        0.48
              200        0.465
        InitNitrogen
          profile
            layer:
              thickness  no3       nh4
              100        4.00034   0.0999853
              100        3.70014   0.0999853
              100        4.40008   0.0999853
              300        2.90004   0.0999853
              300        1.2       0.0999853
              200        0.499997  0.0999853
    area Irrigated
      registrations global
      folder Manager folder
        manager Sowing rule
          category =  # Sowing criteria
          date1 = 22-feb  # Enter sowing window START date (dd-mmm)
          date2 = 22-feb  # Enter sowing window END date (dd-mmm)
          must_sow = yes  # Must sow?
          raincrit = 30  # Amount of rainfall
          rainnumdays = 3  # Number of days of rainfall
          esw_amount = 200  # Enter minimum allowable available soil water (mm)
          category =  # Sowing parameters
          crop = butterflypea  # Enter name of crop to sow
          density = 15  # Enter sowing density (plants/m2)
          depth = 30  # Enter sowing depth (mm)
          cultivar = milgarra  # Enter cultivar
          class = plant  # Enter crop growth class
          row_spacing = 200  # Enter row spacing (mm)
          on start_of_day:
          script: same as in Usapinonot_Clitoria_14_Feb.paddock.Manager folder.Sowing rule
        manager Harvesting rule
          category =  # Harvesting criteria
          crop = butterflypea  # Enter name of crop to harvest when ripe
          on end_of_day:
          script: same as in Usapinonot_Clitoria_14_Feb.paddock.Manager folder.Harvesting rule
        manager Sowing fertiliser: same as Emerald_BFP.Dryland.Manager folder.Sowing fertiliser
        manager
          on init:
```
cuts = 0
 total_minN = 0
biom = 0
```
          on start_of_day:
```
biom = leafgreenwt + stemgreenwt

  if day = 80 then                                        !21st March
      irrigation apply amount = 50
  endif

  if day = 133 then                                      !13th may
      irrigation apply amount = 50
  endif

 
  if day = 100 then                                      !EXTRA
  !    irrigation apply amount = 50
  endif

if butterflypea.stagename = 'end_grain_fill' then
 !  butterflypea flush
endif
```
          on end_of_day:
```
  total_minN = total_minN + dlt_n_min_tot()
```
      butterflypea
      fertiliser
      surfaceom surface organic matter
        PoolName = residue  # Organic Matter pool name
        type = wheat  # Organic Matter type
        mass = 1000  # Initial surface residue (kg/ha)
        cnr = 80  # C:N ratio of initial residue
        standing_fraction = 0  # Fraction of residue standing
      outputfile
        variables
          variables: dd/mm/yyyy as Date, year, day, DaysAfterSowing, flowering_das, flowering_date, StageName, yield, biomass_wt, LeafTotalWt, StemTotalWt, podTotalWt, LeafSenescedWt, biom as green_biomass, LeafGreenWt, StemGreenWt, leaf_no, leaf_no_sen, leaf_area(), node_no, lai, stover_wt, ep, esw_layr(), root_depth, no3(), manager.total_minN, height, dlt_dm_green_grain, leafgrowthwt, dlt_dm_green_meal, podgrowthwt, dlt_dm_green_root, stemgrowthwt, leaves_per_node, swdef_pheno, swdef_photo, swdef_expan, swdef_fixation, lai_sum, green_leaves, tt_, acc_TT, biomass, green_biomass, rain, n_fixed_tops, n_supply_soil, n_uptake, stagename
          Constants: Title=Emerald_BFP_Irrigated
        events Reporting Frequency: event=Daily
      irrigation: same as Emerald_BFP.Dryland.Irrigation
      soil Black_Vertosol_ERS: state=Queensland; region=Central Highlands; nearesttown=Emerald; site=Emerald research Station; ApsoilNumber=xxx; SoilType=Black Vertosol; Latitude=-23.48; Longitude=148.15; LocationAccuracy=+-20m; DataSource=Typed by JO (from Hill et al 2006) - from Merv mungbean; naturalvegetation=Open Downs; Salb=0.12; DiffusConst=40; DiffusSlope=16; CN2Bare=73; CNRed=20; CNCov=0.8; RootCN=40; RootWT=1000; SoilCN=12; EnrACoeff=7.4; EnrBCoeff=0.2; SummerU=6; SummerCona=3.5; WinterCona=2.4; WinterU=4; SummerDate=1-nov; WinterDate=1-apr
        comment=Soil naming structure: \State\Region\Classification-Local Name (Site/district and locator number); oc and ph estimated
        profile
          layer:
            thickness  bd     ll15   airdry  dul    sat   swcon  fbiom  finert  ph    oc    ll butterflypea  kl butterflypea  xf butterflypea  ll lablab  kl lablab  xf lablab  ll SweetSorghum  kl SweetSorghum  xf SweetSorghum  ll wheat  kl wheat  xf wheat
            100        1.193  0.25   0.12    0.5    0.55  0.2    0.035  0.2     8.05  0.76  0.27             0.06             1                0.27       0.07       1          0.27             0.07             1                0.27      0.06      1
            100        1.193  0.25   0.2     0.5    0.55  0.2    0.02   0.5     7.9   0.66  0.3              0.06             1                0.3        0.07       1          0.3              0.07             1                0.3       0.06      1
            100        1.193  0.255  0.255   0.5    0.55  0.2    0.015  0.7     8.25  0.61  0.32             0.04             1                0.32       0.07       1          0.32             0.07             1                0.32      0.06      1
            300        1.219  0.28   0.28    0.49   0.54  0.2    0.01   0.8     8.2   0.59  0.35             0.04             1                0.35       0.05       1          0.35             0.05             1                0.35      0.04      1
            300        1.246  0.305  0.305   0.48   0.53  0.2    0.01   0.95    8.2   0.57  0.36             0.02             1                0.36       0.01       1          0.36             0.01             1                0.36      0.04      1
            200        1.299  0.31   0.31    0.465  0.51  0.2    0.01   0.99    8.2   0.52  0.35             0.01             1                0.35       0.01       1          0.35             0.01             1                0.35      0.02      1
        InitWater: RelativeTo=butterflypea
          profile
            layer:
              thickness  sw
              100        0.48
              100        0.5
              100        0.5
              300        0.49
              300        0.48
              200        0.465
        InitNitrogen: same as Emerald_BFP.Dryland.Black_Vertosol_ERS.InitNitrogen
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