folder Simulations: version=17
  simulation Gatton_LabLab_2000exp_P5
    metfile met: filename=gatton_2000.met
    clock
      start_date = 1/01/2000  # Select the start date of the simulation
      end_date = 1/06/2000  # Select the end date of the simulation
    summaryfile: filename=Continuous Wheat Simulation.sum
    area paddock
      registrations global
      burgundybean
        ini: filename=C:\DATA\Temp\NPD\West_Timor\APSIMV6\burgundybean.ini
      folder Manager folder
        manager Sowing rule
          category =  # Sowing criteria
          date1 = 24-Jan-2000  # Enter sowing window START date (dd-mmm)
          date2 = 24-Jan-2000  # Enter sowing window END date (dd-mmm)
          must_sow = yes  # Must sow?
          raincrit = 30  # Amount of rainfall
          rainnumdays = 3  # Number of days of rainfall
          esw_amount = 200  # Enter minimum allowable available soil water (mm)
          category =  # Sowing parameters
          crop = lablab  # Enter name of crop to sow
          density = 5  # Enter sowing density (plants/m2)
          depth = 30  # Enter sowing depth (mm)
          cultivar = highworth  # Enter cultivar
          class = plant  # Enter crop growth class
          row_spacing = 500  # Enter row spacing (mm)
          on start_of_day:
```
      if (paddock_is_fallow() = 1 and FallowIn <> 'yes' and (NextCrop = 0 or NextCrop = '[crop]')) then
         if (date_within('[date1], [date2]') = 1) then
            if (rain[[rainnumdays]] >= [raincrit] AND esw >= [esw_amount]) OR
                ('[must_sow]' = 'yes' AND today = date('[date2]'))) THEN
               ChooseNextCrop = 'yes'   ! for rotations
               [crop] sow plants =[density], sowing_depth = [depth], cultivar = [cultivar], row_spacing = [row_spacing], crop_class = [class]
            endif
            if today = date('[date2]') then
               ChooseNextCrop = 'yes'
            endif
         endif
      endif
```
        manager Harvesting rule
          category =  # Harvesting criteria
          crop = lablab  # Enter name of crop to harvest when ripe
          on end_of_day:
```
           if [crop].StageName = 'harvest_ripe' or [crop].plant_status = 'dead' then
              [crop]  harvest
              [crop]  end_crop
           endif
```
        manager
          on init:
```
cuts = 0
 total_minN = 0
biom = 0

green_leaves = 0
```
          on start_of_day:
```
 biom = leafgreenwt + stemgreenwt


 if leaf_no >= 1 then
      green_leaves = leaf_no - leaf_no_sen 
 else
 endif

  if day = 358 and year = 2007 then        
      irrigation apply amount = 10
  endif

  if day = 362  and year = 2007 then        
      irrigation apply amount = 38
  endif

 
  if day = 97 and year = 2008 then        
      irrigation apply amount = 40
  endif

  if day = 9114 and year = 2008 then        
      irrigation apply amount = 50
  endif
```
          on end_of_day:
```
  total_minN = total_minN + dlt_n_min_tot()
```
      fertiliser
      surfaceom surface organic matter
        PoolName = centro  # Organic Matter pool name
        type = centro  # Organic Matter type
        mass = 500  # Initial surface residue (kg/ha)
        cnr = 40  # C:N ratio of initial residue
        standing_fraction = 0  # Fraction of residue standing
      lablab
      soil Prarie-Lockyer: state=Queensland; region=Lockyer; nearesttown=Lawes, Q 4350; site=Lawes; SoilType=Prarie; Latitude=-27.5339; Longitude=152.338; LocationAccuracy=+-20m; DataSource=CSIRO Sustainable Ecosystems, Toowoomba; naturalvegetation=Blue Gum, Moreton Bay Ash, Tea Tree; SummerCona=3.5; WinterCona=2.5; SummerU=6; WinterU=4; SummerDate=1-Nov; WinterDate=1-apr; Salb=0.12; DiffusConst=40; DiffusSlope=16; CN2Bare=73; CNRed=20; CNCov=0.8; RootCN=40; RootWT=1000; SoilCN=12; EnrACoeff=7.4; EnrBCoeff=0.2
        comment=Soil naming structure: \State\Region\Classification-Local Name (Site/district and locator number); oc and ph estimated
        profile
          layer:
            thickness  bd    ll15   airdry  dul   sat   swcon  fbiom  finert  oc   ph  ll chickpea  kl chickpea  xf chickpea  ll butterflypea  kl butterflypea  xf butterflypea  ll centro  kl centro  xf centro  ll macroptilium  kl macroptilium  xf macroptilium  ll lablab  kl lablab  xf lablab
            150        1.38  0.19   0.1     0.38  0.45  0.3    0.04   0.4     1.2  7   0.2          0.06         1            0.2              0.06             1                0.19       0.06       1          0.19             0.06             1                0.19       0.06       1
            150        1.38  0.195  0.168   0.38  0.45  0.3    0.02   0.6     1.2  7   0.21         0.06         1            0.21             0.06             1                0.195      0.06       1          0.195            0.06             1                0.195      0.06       1
            300        1.28  0.2    0.2     0.39  0.45  0.3    0.02   0.8     1.2  7   0.2          0.06         1            0.2              0.06             1                0.2        0.06       1          0.2              0.06             1                0.2        0.06       1
            300        1.38  0.22   0.22    0.4   0.45  0.3    0.02   1       1.1  7   0.22         0.06         1            0.22             0.06             1                0.22       0.06       1          0.22             0.06             1                0.22       0.06       1
            300        1.4   0.23   0.23    0.39  0.44  0.3    0.01   1       0.7  7   0.23         0.06         1            0.24             0.06             1                0.23       0.06       1          0.23             0.06             1                0.23       0.06       1
            300        1.46  0.25   0.25    0.37  0.42  0.3    0.01   1       0.3  7   0.3          0.06         1            0.28             0.06             1                0.25       0.06       1          0.25             0.06             1                0.25       0.06       1
            300        1.47  0.26   0.26    0.34  0.42  0.3    0.01   1       0.3  7   0.34         0.06         1            0.3              0.06             1                0.26       0.06       1          0.26             0.06             1                0.26       0.06       1
            300        1.47  0.27   0.27    0.34  0.42  0.3    0.01   1       0.3  7   0.34         0.06         1            0.3              0.06             1                0.27       0.06       1          0.27             0.06             1                0.27       0.06       1
        InitWater: RelativeTo=lablab
          PercentMethod: Percent=1.00; Distributed=Evenly distributed
        InitNitrogen
          profile
            layer:
              thickness  no3      nh4
              150        2.71003  0.1
              150        2.71003  0.1
              300        2.71003  0.1
              300        2.71003  0.1
              300        2.71003  0.1
              300        2.71003  0.1
              300        2.71003  0.1
              300        2.71003  0.1
      outputfile
        variables
          variables: dd/mm/yyyy as Date, year, day, DaysAfterSowing, flowering_das, flowering_date, StageName, yield, biomass_wt, LeafTotalWt, StemTotalWt, podTotalWt, LeafSenescedWt, biom as green_biomass, LeafGreenWt, StemGreenWt, leaf_no, leaf_no_sen, leaf_area(), node_no, lai, stover_wt, ep, esw_layr(), root_depth, no3(), manager.total_minN, height, dlt_dm_green_grain, dlt_dm_green_leaf, dlt_dm_green_meal, dlt_dm_green_pod, dlt_dm_green_root, dlt_dm_green_stem, leaves_per_node, swdef_pheno, swdef_photo, swdef_expan, swdef_fixation, lai_sum, green_leaves, tt_, acc_TT
        events Reporting Frequency: event=Daily
      irrigation
        automatic_irrigation = off
        asw_depth = 600  # Depth to which ASW is calculated. (mm)
        crit_fr_asw = 0.5  # Fraction of ASW below which irrigation is applied (0-1.0)
        irrigation_efficiency = 1  # Efficiency of the irrigation. (0-1.0)
        default_no3_conc = 0.0  # Nitrate concentration (ppm N)
        default_nh4_conc = 0.0  # Ammonium concentration (ppm N)
        default_cl_conc = 0.0  # Chloride concentration (ppm Cl)
  simulation Gatton_LabLab_2000exp_P10
    metfile met: filename=gatton_2000.met
    clock
      start_date = 23/01/2000  # Select the start date of the simulation
      end_date = 1/06/2000  # Select the end date of the simulation
    summaryfile: filename=Continuous Wheat Simulation.sum
    area paddock
      registrations global
      folder Manager folder
        manager Sowing rule
          category =  # Sowing criteria
          date1 = 24-Jan-2000  # Enter sowing window START date (dd-mmm)
          date2 = 24-Jan-2000  # Enter sowing window END date (dd-mmm)
          must_sow = yes  # Must sow?
          raincrit = 30  # Amount of rainfall
          rainnumdays = 3  # Number of days of rainfall
          esw_amount = 200  # Enter minimum allowable available soil water (mm)
          category =  # Sowing parameters
          crop = lablab  # Enter name of crop to sow
          density = 10  # Enter sowing density (plants/m2)
          depth = 30  # Enter sowing depth (mm)
          cultivar = highworth  # Enter cultivar
          class = plant  # Enter crop growth class
          row_spacing = 500  # Enter row spacing (mm)
          on start_of_day:
          script: same as in Gatton_LabLab_2000exp_P5.paddock.Manager folder.Sowing rule
        manager Harvesting rule
          category =  # Harvesting criteria
          crop = lablab  # Enter name of crop to harvest when ripe
          on end_of_day:
```
           if [crop].StageName = 'harvest_ripe' or [crop].plant_status = 'dead' or day = 79 then
              [crop]  harvest
              [crop]  end_crop
           endif
```
        manager
          on init:
```
cuts = 0
 total_minN = 0
biom = 0

green_leaves = 0

tt_ = 0
acc_TT = 0
```
          on start_of_day:
```
 biom = leafgreenwt + stemgreenwt

tt_ = ((maxt+mint)/2) -10
acc_TT = tt_ + acc_tt
 if leaf_no >= 1 then
      green_leaves = leaf_no - leaf_no_sen 
 else
 endif

  if day = 358 and year = 2007 then        
      irrigation apply amount = 10
  endif

  if day = 362  and year = 2007 then        
      irrigation apply amount = 38
  endif

 
  if day = 97 and year = 2008 then        
      irrigation apply amount = 40
  endif

  if day = 9114 and year = 2008 then        
      irrigation apply amount = 50
  endif
```
          on end_of_day:
```
  total_minN = total_minN + dlt_n_min_tot()
```
      fertiliser
      surfaceom surface organic matter
        PoolName = residue  # Organic Matter pool name
        type = lablab  # Organic Matter type
        mass = 1000  # Initial surface residue (kg/ha)
        cnr = 40  # C:N ratio of initial residue
        standing_fraction = 0  # Fraction of residue standing
      lablab
      soil Prarie-Lockyer: state=Queensland; region=Lockyer; nearesttown=Lawes, Q 4350; site=Lawes; SoilType=Prarie; Latitude=-27.5339; Longitude=152.338; LocationAccuracy=+-20m; DataSource=CSIRO Sustainable Ecosystems, Toowoomba; naturalvegetation=Blue Gum, Moreton Bay Ash, Tea Tree; SummerCona=4; WinterCona=2.5; SummerU=6; WinterU=4; SummerDate=1-Nov; WinterDate=1-apr; Salb=0.12; DiffusConst=40; DiffusSlope=16; CN2Bare=73; CNRed=20; CNCov=0.8; RootCN=40; RootWT=1500; SoilCN=12; EnrACoeff=7.4; EnrBCoeff=0.2
        comment=Soil naming structure: \State\Region\Classification-Local Name (Site/district and locator number); oc and ph estimated
        profile
          layer:
            thickness  bd    ll15   airdry  dul   sat   swcon  fbiom  finert  oc   ph  ll chickpea  kl chickpea  xf chickpea  ll butterflypea  kl butterflypea  xf butterflypea  ll centro  kl centro  xf centro  ll macroptilium  kl macroptilium  xf macroptilium  ll lablab  kl lablab  xf lablab
            150        1.38  0.19   0.1     0.38  0.45  0.3    0.04   0.4     1.2  7   0.2          0.06         1            0.2              0.06             1                0.19       0.06       1          0.19             0.06             1                0.19       0.06       1
            150        1.38  0.195  0.168   0.38  0.45  0.3    0.02   0.6     1.2  7   0.21         0.06         1            0.21             0.06             1                0.195      0.06       1          0.195            0.06             1                0.195      0.06       1
            300        1.28  0.2    0.2     0.39  0.45  0.3    0.02   0.8     1.2  7   0.2          0.06         1            0.2              0.06             1                0.2        0.06       1          0.2              0.06             1                0.2        0.06       1
            300        1.38  0.22   0.22    0.4   0.45  0.3    0.02   1       1.1  7   0.22         0.06         1            0.22             0.06             1                0.22       0.06       1          0.22             0.06             1                0.22       0.06       1
            300        1.4   0.23   0.23    0.39  0.44  0.3    0.01   1       0.7  7   0.23         0.06         1            0.24             0.06             1                0.23       0.06       1          0.23             0.06             1                0.23       0.04       1
            300        1.46  0.25   0.25    0.37  0.42  0.3    0.01   1       0.3  7   0.3          0.06         1            0.28             0.06             1                0.25       0.06       1          0.25             0.06             1                0.25       0.04       1
            300        1.47  0.26   0.26    0.34  0.42  0.3    0.01   1       0.3  7   0.34         0.06         1            0.3              0.06             1                0.26       0.06       1          0.26             0.06             1                0.26       0.02       1
        InitWater: RelativeTo=lablab
          PercentMethod: Percent=1.00; Distributed=Evenly distributed
        InitNitrogen: same as Gatton_LabLab_2000exp_P5.paddock.Prarie-Lockyer.InitNitrogen
      outputfile
        variables: same as Gatton_LabLab_2000exp_P5.paddock.outputfile.Variables
        events Reporting Frequency: event=Daily
      irrigation: same as Gatton_LabLab_2000exp_P5.paddock.Irrigation
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