folder BW8_GxE: version=37; creator=Apsim 7.9-r4092
  simulation Sorghum_BW8_GxE_T1
    clock
      start_date = 26/09/1996  # Select the start date of the simulation
      end_date = 20/02/1997  # Select the end date of the simulation
    summaryfile
    metfile met: filename=BW8_GxE.met
    area paddock
      folder Manager folder
        manager Sow SkipRow on a fixed date
          # Sowing criteria
          date = 7/10/1996  # Enter sowing date (d/m/yyyy)
          # Sowing parameters
          crop = Sorghum  # Enter name of crop to sow
          density = 10  # Enter sowing density (plants/m2)
          depth = 0.5  # Enter sowing depth (mm)
          cultivar = M35-1  # Enter cultivar
          row_spacing = 0.5  # Enter row spacing (m)
          RowConfiguration = solid  # Enter skip row configuration
          ftn = 0  # Enter Fertile Tiller No.
          on start_of_day:
```
            if (paddock_is_fallow() = 1 and today = date('[date]')) then
              [crop] sow plants =[density], sowing_depth = [depth], cultivar = [cultivar], row_spacing = [row_spacing], skip = [RowConfiguration], tiller_no_fertile = [ftn] ()
            endif
```
        manager Harvesting rule
          # Harvesting criteria
          crop = Sorghum  # Enter name of crop to harvest when ripe
          on end_of_day:
```
           if [crop].StageName = 'harvest_ripe' or [crop].plant_status = 'dead' then
              [crop]  harvest
              [crop]  end_crop
           endif
```
      irrigation
        automatic_irrigation = off  # switch
        asw_depth = 600  # Depth to which ASW is calculated. (mm)
        crit_fr_asw = 0.5  # Fraction of ASW below which irrigation is applied (0-1.0)
        irrigation_efficiency = 1  # Efficiency of the irrigation. (0-1.0)
        default_no3_conc = 0.0  # Nitrate concentration (ppm N)
        default_nh4_conc = 0.0  # Ammonium concentration (ppm N)
        default_cl_conc = 0.0  # Chloride concentration (ppm Cl)
      fertiliser
      operations
        19/11/1996  Irrigation apply amount = 28
        28/11/1996  Irrigation apply amount = 58
        10/12/1996  Irrigation apply amount = 49
        24/12/1996  Irrigation apply amount = 57
        7/01/1997  Irrigation apply amount = 67
        25/09/1996  fertiliser apply amount = 20 (kg/ha), depth = 50 (mm), type = NO3_N ()
        17/10/1996  fertiliser apply amount = 99 (kg/ha), depth = 50 (mm), type = NO3_N ()
        6/11/1996  fertiliser apply amount = 59 (kg/ha), depth = 50 (mm), type = NO3_N ()
        10/12/1996  fertiliser apply amount = 59 (kg/ha), depth = 50 (mm), type = NO3_N ()
      outputfile: filename=Sorghum_BW8_GxE_T1.out; title=Sorghum_BW8_GxE_T1
        variables My Variables
          variable:
            DaysAfterSowing as Das
            Stage
            Biomass units g/m^2 as BiomassWt
            GrainSize
            GrainNo
            MaxLAI as LaiAnth
            RootGreenWt
            LeafGreenWt
            StemGreenWt
            RachisGreenWt
            GrainGreenWt
            biomass_n
            RootGreenN
            LeafGreenN
            StemGreenN
            RachisGreenN
            GrainGreenN
            GrainGreenNConc
            LeafNo
            ESW
            no3() as NO3
            SLN
            sw()
            HI
            TPLA
            SPLA
            Yield
            Biomass
        events My Variables Events: event=harvesting
      Soil IC_BW8: LocalName=ICRISAT; Site=ICRISAT; Region=Hyderabad
        SoilType = BW8  # Soil description
        NearestTown = Unknown
        NaturalVegetation = Unknown
        Water
          Thickness  BD     AirDry  LL15   DUL    SAT
          150        1.490  0.120   0.160  0.320  0.43
          150        1.410  0.150   0.190  0.350  0.46
          150        1.410  0.150   0.190  0.350  0.46
          150        1.560  0.100   0.140  0.280  0.41
          150        1.490  0.110   0.150  0.310  0.43
          150        1.520  0.130   0.170  0.330  0.42
          150        1.610  0.090   0.130  0.260  0.39
          150        1.680  0.080   0.120  0.220  0.36
          150        1.630  0.090   0.130  0.240  0.38
          300        1.620  0.090   0.130  0.240  0.38
          300        1.620  0.090   0.130  0.240  0.38
          SoilCrop Sorghum
            LL=[0.160, 0.190, 0.190, 0.140, 0.150, 0.170, 0.130, 0.120, 0.130, 0.130, 0.130]
            KL=[0.070, 0.070, 0.070, 0.070, 0.070, 0.070, 0.070, 0.070, 0.070, 0.040, 0.040]
            XF=[1, 1, 1, 1, 1, 1, 1, 1, 1, 1, 1]
        SoilWater: SummerCona=3.5; SummerU=6; SummerDate=1-Nov; WinterCona=3.5; WinterU=6; WinterDate=1-Apr; DiffusConst=40; DiffusSlope=16; Salb=0.11; CN2Bare=85; CNRed=0.8; CNCov=0.2; Thickness=[150, 150, 150, 150, 150, 150, 150, 150, 150, 300, 300]
          SWCON=[0.160, 0.110, 0.140, 0.140, 0.110, 0.110, 0.100, 0.100, 0.100, 0.120, 0.100]
        SoilOrganicMatter: RootCN=45; RootWt=1000; SoilCN=14.5; EnrACoeff=7.4; EnrBCoeff=0.2
          Thickness  OC     FBiom  FInert
          150        0.490  0.050  0.390
          150        0.450  0.020  0.470
          150        0.280  0.010  0.520
          150        0.180  0.010  0.620
          150        0.140  0.010  0.740
          150        0.110  0.010  0.830
          150        0.090  0.010  0.930
          150        0.070  0.010  0.930
          150        0.060  0.010  0.930
          300        0.050  0.010  0.930
          300        0.030  0.010  0.930
        Analysis: Thickness=[150, 150, 150, 150, 150, 150, 150, 150, 150, 300, 300]
          PH=[8.350, 8.520, 8.800, 8.950, 9, 9, 9, 9, 8.920, 8.970, 8.820]
        InitialWater Initial Water: FractionFull=0.50; PercentMethod=FilledFromTop
        Sample Initial Nitrogen
          Thickness  NO3  NH4
          150        9    0.1
          150        11   0.1
          150        8    0.1
          150        6    0.1
          150        4    0.1
          150        3    0.1
          150        3    0.1
          150        3    0.1
          150        6    0.1
          300        4    0.1
          300        5    0.1
      sorghum
  simulation Sorghum_BW8_GxE_T2
    clock
      start_date = 26/09/1996  # Select the start date of the simulation
      end_date = 20/02/1997  # Select the end date of the simulation
    summaryfile
    metfile met: filename=BW8_GxE.met
    area paddock
      folder Manager folder
        manager Sow SkipRow on a fixed date
          # Sowing criteria
          date = 7/10/1996  # Enter sowing date (d/m/yyyy)
          # Sowing parameters
          crop = Sorghum  # Enter name of crop to sow
          density = 10  # Enter sowing density (plants/m2)
          depth = 0.5  # Enter sowing depth (mm)
          cultivar = CSH13R  # Enter cultivar
          row_spacing = 0.5  # Enter row spacing (m)
          RowConfiguration = solid  # Enter skip row configuration
          ftn = 0  # Enter Fertile Tiller No.
          on start_of_day:
          script: same as in Sorghum_BW8_GxE_T1.paddock.Manager folder.Sow SkipRow on a fixed date
        manager Harvesting rule
          # Harvesting criteria
          crop = Sorghum  # Enter name of crop to harvest when ripe
          on end_of_day:
          script: same as in Sorghum_BW8_GxE_T1.paddock.Manager folder.Harvesting rule
      irrigation
        automatic_irrigation = off  # switch
        asw_depth = 600.0  # Depth to which ASW is calculated. (mm)
        crit_fr_asw = 0.5  # Fraction of ASW below which irrigation is applied (0-1.0)
        irrigation_efficiency = 1.0  # Efficiency of the irrigation. (0-1.0)
        default_no3_conc = 0.0  # Nitrate concentration (ppm N)
        default_nh4_conc = 0.0  # Ammonium concentration (ppm N)
        default_cl_conc = 0.0  # Chloride concentration (ppm Cl)
      fertiliser
      operations: same as Sorghum_BW8_GxE_T1.paddock.operations
      Soil IC_BW8: same as Sorghum_BW8_GxE_T1.paddock.IC_BW8
      sorghum
      outputfile -> /BW8_GxE/Sorghum_BW8_GxE_T1/paddock/outputfile: filename=Sorghum_BW8_GxE_T2.out; title=Sorghum_BW8_GxE_T2
        variables My Variables -> /BW8_GxE/Sorghum_BW8_GxE_T1/paddock/outputfile/My Variables
        events My Variables Events -> /BW8_GxE/Sorghum_BW8_GxE_T1/paddock/outputfile/My Variables Events
  simulation Sorghum_BW8_GxE_T3
    clock
      start_date = 26/09/1996  # Select the start date of the simulation
      end_date = 20/02/1997  # Select the end date of the simulation
    summaryfile
    metfile met: filename=BW8_GxE.met
    area paddock
      folder Manager folder
        manager Sow SkipRow on a fixed date
          # Sowing criteria
          date = 7/10/1996  # Enter sowing date (d/m/yyyy)
          # Sowing parameters
          crop = Sorghum  # Enter name of crop to sow
          density = 10  # Enter sowing density (plants/m2)
          depth = 0.5  # Enter sowing depth (mm)
          cultivar = ATX623xRTX430  # Enter cultivar
          row_spacing = 0.5  # Enter row spacing (m)
          RowConfiguration = solid  # Enter skip row configuration
          ftn = 0  # Enter Fertile Tiller No.
          on start_of_day:
          script: same as in Sorghum_BW8_GxE_T1.paddock.Manager folder.Sow SkipRow on a fixed date
        manager Harvesting rule
          # Harvesting criteria
          crop = Sorghum  # Enter name of crop to harvest when ripe
          on end_of_day:
          script: same as in Sorghum_BW8_GxE_T1.paddock.Manager folder.Harvesting rule
      irrigation: same as Sorghum_BW8_GxE_T2.paddock.Irrigation
      fertiliser
      operations: same as Sorghum_BW8_GxE_T1.paddock.operations
      Soil IC_BW8: same as Sorghum_BW8_GxE_T1.paddock.IC_BW8
      sorghum
      outputfile -> /BW8_GxE/Sorghum_BW8_GxE_T1/paddock/outputfile: filename=Sorghum_BW8_GxE_T3.out; title=Sorghum_BW8_GxE_T3
        variables My Variables -> /BW8_GxE/Sorghum_BW8_GxE_T1/paddock/outputfile/My Variables
        events My Variables Events -> /BW8_GxE/Sorghum_BW8_GxE_T1/paddock/outputfile/My Variables Events
  simulation Sorghum_BW8_GxE_T4
    clock
      start_date = 26/09/1996  # Select the start date of the simulation
      end_date = 20/02/1997  # Select the end date of the simulation
    summaryfile
    metfile met: filename=BW8_GxE.met
    area paddock
      folder Manager folder
        manager Sow SkipRow on a fixed date
          # Sowing criteria
          date = 7/10/1996  # Enter sowing date (d/m/yyyy)
          # Sowing parameters
          crop = Sorghum  # Enter name of crop to sow
          density = 10  # Enter sowing density (plants/m2)
          depth = 0.5  # Enter sowing depth (mm)
          cultivar = QL41xQL36  # Enter cultivar
          row_spacing = 0.5  # Enter row spacing (m)
          RowConfiguration = solid  # Enter skip row configuration
          ftn = 0  # Enter Fertile Tiller No.
          on start_of_day:
          script: same as in Sorghum_BW8_GxE_T1.paddock.Manager folder.Sow SkipRow on a fixed date
        manager Harvesting rule
          # Harvesting criteria
          crop = Sorghum  # Enter name of crop to harvest when ripe
          on end_of_day:
          script: same as in Sorghum_BW8_GxE_T1.paddock.Manager folder.Harvesting rule
      irrigation: same as Sorghum_BW8_GxE_T2.paddock.Irrigation
      fertiliser
      operations: same as Sorghum_BW8_GxE_T1.paddock.operations
      Soil IC_BW8: same as Sorghum_BW8_GxE_T1.paddock.IC_BW8
      sorghum
      outputfile -> /BW8_GxE/Sorghum_BW8_GxE_T1/paddock/outputfile: filename=Sorghum_BW8_GxE_T4.out; title=Sorghum_BW8_GxE_T4
        variables My Variables -> /BW8_GxE/Sorghum_BW8_GxE_T1/paddock/outputfile/My Variables
        events My Variables Events -> /BW8_GxE/Sorghum_BW8_GxE_T1/paddock/outputfile/My Variables Events
  simulation Sorghum_BW8_GxE_T5
    clock
      start_date = 26/09/1996  # Select the start date of the simulation
      end_date = 20/02/1997  # Select the end date of the simulation
    summaryfile
    metfile met: filename=BW8_GxE.met
    area paddock
      folder Manager folder: same as Sorghum_BW8_GxE_T1.paddock.Manager folder
      irrigation: same as Sorghum_BW8_GxE_T1.paddock.Irrigation
      fertiliser
      operations
        25/09/1996  fertiliser apply amount = 20 (kg/ha), depth = 50 (mm), type = NO3_N ()
        17/10/1996  fertiliser apply amount = 99 (kg/ha), depth = 50 (mm), type = NO3_N ()
      Soil IC_BW8: same as Sorghum_BW8_GxE_T1.paddock.IC_BW8
      sorghum
      outputfile -> /BW8_GxE/Sorghum_BW8_GxE_T1/paddock/outputfile: filename=Sorghum_BW8_GxE_T5.out; title=Sorghum_BW8_GxE_T5
        variables My Variables -> /BW8_GxE/Sorghum_BW8_GxE_T1/paddock/outputfile/My Variables
        events My Variables Events -> /BW8_GxE/Sorghum_BW8_GxE_T1/paddock/outputfile/My Variables Events
  simulation Sorghum_BW8_GxE_T6
    clock
      start_date = 26/09/1996  # Select the start date of the simulation
      end_date = 20/02/1997  # Select the end date of the simulation
    summaryfile
    metfile met: filename=BW8_GxE.met
    area paddock
      folder Manager folder: same as Sorghum_BW8_GxE_T2.paddock.Manager folder
      manager Calculator
        on init:
```
 head_wt = 0
root_n = 0
head_n = 0
leaf_n = 0
sd = 0
```
        on end_of_day:
```
 [cr]head_wt = dw_green(4)[cr]root_n = n_green(1)[cr]head_n = n_green(4)[cr]leaf_n = n_green(2)[cr][cr]if (sw_demand > 0) then[cr]   sd = sw_supply / sw_demand[cr]else[cr]   sd = 1[cr]endif[cr][cr]if (sd > 1) then[cr]   sd = 1[cr]endif[cr]
```
      irrigation: same as Sorghum_BW8_GxE_T2.paddock.Irrigation
      fertiliser
      operations
        25/09/1996  fertiliser apply amount = 20 (kg/ha), depth = 50 (mm), type = NO3_N ()
        17/10/1996  fertiliser apply amount = 99 (kg/ha), depth = 50 (mm), type = NO3_N ()
      Soil IC_BW8: same as Sorghum_BW8_GxE_T1.paddock.IC_BW8
      sorghum
      outputfile -> /BW8_GxE/Sorghum_BW8_GxE_T1/paddock/outputfile: filename=Sorghum_BW8_GxE_T6.out; title=Sorghum_BW8_GxE_T6
        variables My Variables -> /BW8_GxE/Sorghum_BW8_GxE_T1/paddock/outputfile/My Variables
        events My Variables Events -> /BW8_GxE/Sorghum_BW8_GxE_T1/paddock/outputfile/My Variables Events
  simulation Sorghum_BW8_GxE_T7
    clock
      start_date = 26/09/1996  # Select the start date of the simulation
      end_date = 20/02/1997  # Select the end date of the simulation
    summaryfile
    metfile met: filename=BW8_GxE.met
    area paddock
      folder Manager folder: same as Sorghum_BW8_GxE_T3.paddock.Manager folder
      irrigation: same as Sorghum_BW8_GxE_T2.paddock.Irrigation
      fertiliser
      operations
        25/09/1996  fertiliser apply amount = 20 (kg/ha), depth = 50 (mm), type = NO3_N ()
        17/10/1996  fertiliser apply amount = 99 (kg/ha), depth = 50 (mm), type = NO3_N ()
      Soil IC_BW8: same as Sorghum_BW8_GxE_T1.paddock.IC_BW8
      sorghum
      outputfile -> /BW8_GxE/Sorghum_BW8_GxE_T1/paddock/outputfile: filename=Sorghum_BW8_GxE_T7.out; title=Sorghum_BW8_GxE_T7
        variables My Variables -> /BW8_GxE/Sorghum_BW8_GxE_T1/paddock/outputfile/My Variables
        events My Variables Events -> /BW8_GxE/Sorghum_BW8_GxE_T1/paddock/outputfile/My Variables Events
  simulation Sorghum_BW8_GxE_T8
    clock
      start_date = 26/09/1996  # Select the start date of the simulation
      end_date = 20/02/1997  # Select the end date of the simulation
    summaryfile
    metfile met: filename=BW8_GxE.met
    area paddock
      folder Manager folder: same as Sorghum_BW8_GxE_T4.paddock.Manager folder
      irrigation: same as Sorghum_BW8_GxE_T2.paddock.Irrigation
      fertiliser
      operations
        25/09/1996  fertiliser apply amount = 20 (kg/ha), depth = 50 (mm), type = NO3_N ()
        17/10/1996  fertiliser apply amount = 99 (kg/ha), depth = 50 (mm), type = NO3_N ()
      Soil IC_BW8: same as Sorghum_BW8_GxE_T1.paddock.IC_BW8
      sorghum
      outputfile -> /BW8_GxE/Sorghum_BW8_GxE_T1/paddock/outputfile: filename=Sorghum_BW8_GxE_T8.out; title=Sorghum_BW8_GxE_T8
        variables My Variables -> /BW8_GxE/Sorghum_BW8_GxE_T1/paddock/outputfile/My Variables
        events My Variables Events -> /BW8_GxE/Sorghum_BW8_GxE_T1/paddock/outputfile/My Variables Events
  simulation Sorghum_BW8_GxE_T9
    clock
      start_date = 26/09/1996  # Select the start date of the simulation
      end_date = 20/02/1997  # Select the end date of the simulation
    summaryfile
    metfile met: filename=BW8_GxE.met
    area paddock
      folder Manager folder: same as Sorghum_BW8_GxE_T1.paddock.Manager folder
      irrigation: same as Sorghum_BW8_GxE_T2.paddock.Irrigation
      fertiliser
      operations
        25/09/1996  fertiliser apply amount = 20 (kg/ha), depth = 50 (mm), type = NO3_N ()
      Soil IC_BW8: same as Sorghum_BW8_GxE_T1.paddock.IC_BW8
      sorghum
      outputfile -> /BW8_GxE/Sorghum_BW8_GxE_T1/paddock/outputfile: filename=Sorghum_BW8_GxE_T9.out; title=Sorghum_BW8_GxE_T9
        variables My Variables -> /BW8_GxE/Sorghum_BW8_GxE_T1/paddock/outputfile/My Variables
        events My Variables Events -> /BW8_GxE/Sorghum_BW8_GxE_T1/paddock/outputfile/My Variables Events
  simulation Sorghum_BW8_GxE_T10
    clock
      start_date = 26/09/1996  # Select the start date of the simulation
      end_date = 20/02/1997  # Select the end date of the simulation
    summaryfile
    metfile met: filename=BW8_GxE.met
    area paddock
      folder Manager folder: same as Sorghum_BW8_GxE_T2.paddock.Manager folder
      irrigation: same as Sorghum_BW8_GxE_T2.paddock.Irrigation
      fertiliser
      operations
        25/09/1996  fertiliser apply amount = 20 (kg/ha), depth = 50 (mm), type = NO3_N ()
      Soil IC_BW8: same as Sorghum_BW8_GxE_T1.paddock.IC_BW8
      sorghum
      outputfile -> /BW8_GxE/Sorghum_BW8_GxE_T1/paddock/outputfile: filename=Sorghum_BW8_GxE_T10.out; title=Sorghum_BW8_GxE_T10
        variables My Variables -> /BW8_GxE/Sorghum_BW8_GxE_T1/paddock/outputfile/My Variables
        events My Variables Events -> /BW8_GxE/Sorghum_BW8_GxE_T1/paddock/outputfile/My Variables Events
  simulation Sorghum_BW8_GxE_T11
    clock
      start_date = 26/09/1996  # Select the start date of the simulation
      end_date = 20/02/1997  # Select the end date of the simulation
    summaryfile
    metfile met: filename=BW8_GxE.met
    area paddock
      folder Manager folder: same as Sorghum_BW8_GxE_T3.paddock.Manager folder
      irrigation: same as Sorghum_BW8_GxE_T2.paddock.Irrigation
      fertiliser
      operations
        25/09/1996  fertiliser apply amount = 20 (kg/ha), depth = 50 (mm), type = NO3_N ()
      Soil IC_BW8: same as Sorghum_BW8_GxE_T1.paddock.IC_BW8
      sorghum
      outputfile -> /BW8_GxE/Sorghum_BW8_GxE_T1/paddock/outputfile: filename=Sorghum_BW8_GxE_T11.out; title=Sorghum_BW8_GxE_T11
        variables My Variables -> /BW8_GxE/Sorghum_BW8_GxE_T1/paddock/outputfile/My Variables
        events My Variables Events -> /BW8_GxE/Sorghum_BW8_GxE_T1/paddock/outputfile/My Variables Events
  simulation Sorghum_BW8_GxE_T12
    clock
      start_date = 26/09/1996  # Select the start date of the simulation
      end_date = 20/02/1997  # Select the end date of the simulation
    summaryfile
    metfile met: filename=BW8_GxE.met
    area paddock
      folder Manager folder: same as Sorghum_BW8_GxE_T4.paddock.Manager folder
      irrigation: same as Sorghum_BW8_GxE_T2.paddock.Irrigation
      fertiliser
      operations
        25/09/1996  fertiliser apply amount = 20 (kg/ha), depth = 50 (mm), type = NO3_N ()
      Soil IC_BW8: same as Sorghum_BW8_GxE_T1.paddock.IC_BW8
      sorghum
      outputfile -> /BW8_GxE/Sorghum_BW8_GxE_T1/paddock/outputfile: filename=Sorghum_BW8_GxE_T12.out; title=Sorghum_BW8_GxE_T12
        variables My Variables -> /BW8_GxE/Sorghum_BW8_GxE_T1/paddock/outputfile/My Variables
        events My Variables Events -> /BW8_GxE/Sorghum_BW8_GxE_T1/paddock/outputfile/My Variables Events
