folder Gatton_RUE: version=37; creator=Apsim 7.9-r4092
  simulation Sorghum_Gatton_RUE_1
    clock
      start_date = 22/11/1999  # Select the start date of the simulation
      end_date = 3/04/2000  # Select the end date of the simulation
    summaryfile
    metfile met: filename=Gatton_RUE.met
    area paddock
      folder Manager folder
        manager Sow SkipRow on a fixed date
          # Sowing criteria
          date = 2/12/1999  # Enter sowing date (d/m/yyyy)
          # Sowing parameters
          crop = Sorghum  # Enter name of crop to sow
          density = 10  # Enter sowing density (plants/m2)
          depth = 40  # Enter sowing depth (mm)
          cultivar = CSH13R  # Enter cultivar
          row_spacing = 0.5  # Enter row spacing (m)
          RowConfiguration = solid  # Enter skip row configuration
          ftn = 0  # Enter Fertile Tiller No.
          on start_of_day:
```
            if (paddock_is_fallow() = 1 and today = date('[date]')) then
              [crop] sow plants =[density], sowing_depth = [depth], cultivar = [cultivar], row_spacing = [row_spacing], skip = [RowConfiguration], tiller_no_fertile = [ftn] ()
            endif
```
        manager Harvesting rule
          # Harvesting criteria
          crop = Sorghum  # Enter name of crop to harvest when ripe
          on end_of_day:
```
           if [crop].StageName = 'harvest_ripe' or [crop].plant_status = 'dead' then
              [crop]  harvest
              [crop]  end_crop
           endif
```
      Soil Ian's Paddock: LocalName=Gatton RS; Site=Gatton RS; Region=Gatton
        SoilType = LawesBlackVertosol  # Soil description
        NearestTown = Unknown
        NaturalVegetation = Unknown
        InitialWater Initial water: FractionFull=1.00; PercentMethod=FilledFromTop
        Water
          Thickness  BD     AirDry  LL15   DUL    SAT
          150        1.320  0.100   0.260  0.410  0.460
          150        1.300  0.150   0.260  0.430  0.480
          300        1.230  0.250   0.260  0.460  0.510
          300        1.270  0.260   0.260  0.440  0.490
          300        1.370  0.250   0.250  0.400  0.450
          300        1.350  0.280   0.280  0.410  0.460
          300        1.350  0.310   0.310  0.380  0.430
          SoilCrop Sorghum: LL=[0.260, 0.260, 0.260, 0.260, 0.250, 0.280, 0.310]; KL=[0.080, 0.080, 0.080, 0.080, 0.060, 0.040, 0.020]; XF=[1, 1, 1, 1, 1, 1, 1]
        SoilWater: SummerCona=3.5; SummerU=6; SummerDate=1-Nov; WinterCona=3.5; WinterU=6; WinterDate=1-Apr; DiffusConst=88; DiffusSlope=35.4; Salb=0.13; CN2Bare=91; CNRed=20; CNCov=0.8; Thickness=[150, 150, 300, 300, 300, 300, 300]; SWCON=[0.500, 0.500, 0.500, 0.500, 0.500, 0.500, 0.500]
        SoilOrganicMatter: RootCN=30; RootWt=1500; SoilCN=12.5; EnrACoeff=7.4; EnrBCoeff=0.2
          Thickness  OC     FBiom  FInert
          150        1.300  0.030  0.310
          150        0.650  0.010  0.380
          300        0.320  0      0.470
          300        0.110  0      0.700
          300        0.110  0      0.900
          300        0.110  0      0.950
          300        0.110  0      0.950
        Analysis: Thickness=[150, 150, 300, 300, 300, 300, 300]; PH=[8.200, 8.700, 8.900, 8.100, 8, 8, 8]
        Sample Initial nitrogen
          Thickness  NO3    NH4
          150        9.202  0.100
          150        4.403  0.100
          300        2.239  0.100
          300        1.237  0.100
          300        1.266  0.100
          300        1.770  0.100
          300        2.064  0.100
      irrigation
        automatic_irrigation = off  # switch
        asw_depth = 600.0  # Depth to which ASW is calculated. (mm)
        crit_fr_asw = 0.5  # Fraction of ASW below which irrigation is applied (0-1.0)
        irrigation_efficiency = 1.0  # Efficiency of the irrigation. (0-1.0)
        default_no3_conc = 0.0  # Nitrate concentration (ppm N)
        default_nh4_conc = 0.0  # Ammonium concentration (ppm N)
        default_cl_conc = 0.0  # Chloride concentration (ppm Cl)
      fertiliser
      operations
        3/12/1999  Irrigation apply amount = 17
        6/12/1999  Irrigation apply amount = 20
        17/12/1999  Irrigation apply amount = 20
        7/01/2000  Irrigation apply amount = 10
        14/01/2000  Irrigation apply amount = 48
        27/01/2000  Irrigation apply amount = 21
        4/02/2000  Irrigation apply amount = 17
        11/02/2000  Irrigation apply amount = 30
        25/02/2000  Irrigation apply amount = 41
        3/03/2000  Irrigation apply amount = 15
        28/11/1999  fertiliser apply amount = 0 (kg/ha), depth = 50 (mm), type = NO3_N ()
        27/11/1999  fertiliser apply amount = 0 (kg/ha), depth = 50 (mm), type = NO3_N ()
      sorghum
      outputfile: filename=Sorghum_Gatton_RUE_1.out; title=Sorghum_Gatton_RUE_1
        variables My Variables
          variable:
            DaysAfterSowing as Das
            Stage
            Biomass units g/m^2 as BiomassWt
            GrainSize
            GrainNo
            MaxLAI as LaiAnth
            RootGreenWt
            LeafGreenWt
            StemGreenWt
            RachisGreenWt
            GrainGreenWt
            biomass_n
            RootGreenN
            LeafGreenN
            StemGreenN
            RachisGreenN
            GrainGreenN
            GrainGreenNConc
            LeafNo
            ESW
            no3() as NO3
            SLN
            sw()
            HI
            TPLA
            SPLA
            Yield
            Biomass
        events My Variables Events: event=harvesting
  simulation Sorghum_Gatton_RUE_2
    clock
      start_date = 22/11/1999  # Select the start date of the simulation
      end_date = 3/04/2000  # Select the end date of the simulation
    summaryfile
    metfile met: filename=Gatton_RUE.met
    area paddock
      folder Manager folder
        manager Sow SkipRow on a fixed date
          # Sowing criteria
          date = 2/12/1999  # Enter sowing date (d/m/yyyy)
          # Sowing parameters
          crop = Sorghum  # Enter name of crop to sow
          density = 10  # Enter sowing density (plants/m2)
          depth = 40  # Enter sowing depth (mm)
          cultivar = A35xQL36  # Enter cultivar
          row_spacing = 0.5  # Enter row spacing (m)
          RowConfiguration = solid  # Enter skip row configuration
          ftn = 0  # Enter Fertile Tiller No.
          on start_of_day:
          script: same as in Sorghum_Gatton_RUE_1.paddock.Manager folder.Sow SkipRow on a fixed date
        manager Harvesting rule
          # Harvesting criteria
          crop = Sorghum  # Enter name of crop to harvest when ripe
          on end_of_day:
          script: same as in Sorghum_Gatton_RUE_1.paddock.Manager folder.Harvesting rule
      Soil Ian's Paddock: same as Sorghum_Gatton_RUE_1.paddock.Ian's Paddock
      irrigation: same as Sorghum_Gatton_RUE_1.paddock.Irrigation
      fertiliser
      operations: same as Sorghum_Gatton_RUE_1.paddock.operations
      sorghum
      outputfile -> /Gatton_RUE/Sorghum_Gatton_RUE_1/paddock/outputfile: filename=Sorghum_Gatton_RUE_2.out; title=Sorghum_Gatton_RUE_2
        variables My Variables -> /Gatton_RUE/Sorghum_Gatton_RUE_1/paddock/outputfile/My Variables
        events My Variables Events -> /Gatton_RUE/Sorghum_Gatton_RUE_1/paddock/outputfile/My Variables Events
  simulation Sorghum_Gatton_RUE_3
    clock
      start_date = 22/11/1999  # Select the start date of the simulation
      end_date = 3/04/2000  # Select the end date of the simulation
    summaryfile
    metfile met: filename=Gatton_RUE.met
    area paddock
      folder Manager folder
        manager Sow SkipRow on a fixed date
          # Sowing criteria
          date = 2/12/1999  # Enter sowing date (d/m/yyyy)
          # Sowing parameters
          crop = sorghum  # Enter name of crop to sow
          density = 10  # Enter sowing density (plants/m2)
          depth = 40  # Enter sowing depth (mm)
          cultivar = QL39xQL36  # Enter cultivar
          row_spacing = 0.5  # Enter row spacing (m)
          RowConfiguration = solid  # Enter skip row configuration
          ftn = 0  # Enter Fertile Tiller No.
          on start_of_day:
          script: same as in Sorghum_Gatton_RUE_1.paddock.Manager folder.Sow SkipRow on a fixed date
        manager Harvesting rule
          # Harvesting criteria
          crop = Sorghum  # Enter name of crop to harvest when ripe
          on end_of_day:
          script: same as in Sorghum_Gatton_RUE_1.paddock.Manager folder.Harvesting rule
      Soil Ian's Paddock: same as Sorghum_Gatton_RUE_1.paddock.Ian's Paddock
      irrigation: same as Sorghum_Gatton_RUE_1.paddock.Irrigation
      fertiliser
      operations: same as Sorghum_Gatton_RUE_1.paddock.operations
      sorghum
      outputfile -> /Gatton_RUE/Sorghum_Gatton_RUE_1/paddock/outputfile: filename=Sorghum_Gatton_RUE_3.out; title=Sorghum_Gatton_RUE_3
        variables My Variables -> /Gatton_RUE/Sorghum_Gatton_RUE_1/paddock/outputfile/My Variables
        events My Variables Events -> /Gatton_RUE/Sorghum_Gatton_RUE_1/paddock/outputfile/My Variables Events
  simulation Sorghum_Gatton_RUE_4
    clock
      start_date = 22/11/1999  # Select the start date of the simulation
      end_date = 3/04/2000  # Select the end date of the simulation
    summaryfile
    metfile met: filename=Gatton_RUE.met
    area paddock
      folder Manager folder: same as Sorghum_Gatton_RUE_1.paddock.Manager folder
      Soil Ian's Paddock: same as Sorghum_Gatton_RUE_1.paddock.Ian's Paddock
      irrigation: same as Sorghum_Gatton_RUE_1.paddock.Irrigation
      fertiliser
      operations
        3/12/1999  Irrigation apply amount = 17
        6/12/1999  Irrigation apply amount = 20
        17/12/1999  Irrigation apply amount = 20
        7/01/2000  Irrigation apply amount = 10
        14/01/2000  Irrigation apply amount = 48
        27/01/2000  Irrigation apply amount = 21
        4/02/2000  Irrigation apply amount = 17
        11/02/2000  Irrigation apply amount = 30
        25/02/2000  Irrigation apply amount = 41
        3/03/2000  Irrigation apply amount = 15
        29/11/1999  fertiliser apply amount = 44 (kg/ha), depth = 50 (mm), type = NO3_N ()
        28/11/1999  fertiliser apply amount = 0 (kg/ha), depth = 50 (mm), type = NO3_N ()
        27/11/1999  fertiliser apply amount = 0 (kg/ha), depth = 50 (mm), type = NO3_N ()
      sorghum
      outputfile -> /Gatton_RUE/Sorghum_Gatton_RUE_1/paddock/outputfile: filename=Sorghum_Gatton_RUE_4.out; title=Sorghum_Gatton_RUE_4
        variables My Variables -> /Gatton_RUE/Sorghum_Gatton_RUE_1/paddock/outputfile/My Variables
        events My Variables Events -> /Gatton_RUE/Sorghum_Gatton_RUE_1/paddock/outputfile/My Variables Events
  simulation Sorghum_Gatton_RUE_5
    clock
      start_date = 22/11/1999  # Select the start date of the simulation
      end_date = 3/04/2000  # Select the end date of the simulation
    summaryfile
    metfile met: filename=Gatton_RUE.met
    area paddock
      folder Manager folder
        manager Sow SkipRow on a fixed date
          # Sowing criteria
          date = 2/12/1999  # Enter sowing date (d/m/yyyy)
          # Sowing parameters
          crop = Sorghum  # Enter name of crop to sow
          density = 10  # Enter sowing density (plants/m2)
          depth = 40  # Enter sowing depth (mm)
          cultivar = A35xQL36  # Enter cultivar
          row_spacing = 0.5  # Enter row spacing (m)
          RowConfiguration = solid  # Enter skip row configuration
          ftn = 0  # Enter Fertile Tiller No.
          on start_of_day:
          script: same as in Sorghum_Gatton_RUE_1.paddock.Manager folder.Sow SkipRow on a fixed date
        manager Harvesting rule
          # Harvesting criteria
          crop = Sorghum  # Enter name of crop to harvest when ripe
          on end_of_day:
          script: same as in Sorghum_Gatton_RUE_1.paddock.Manager folder.Harvesting rule
      Soil Ian's Paddock: same as Sorghum_Gatton_RUE_1.paddock.Ian's Paddock
      irrigation: same as Sorghum_Gatton_RUE_1.paddock.Irrigation
      fertiliser
      operations: same as Sorghum_Gatton_RUE_4.paddock.operations
      sorghum
      outputfile -> /Gatton_RUE/Sorghum_Gatton_RUE_1/paddock/outputfile: filename=Sorghum_Gatton_RUE_5.out; title=Sorghum_Gatton_RUE_5
        variables My Variables -> /Gatton_RUE/Sorghum_Gatton_RUE_1/paddock/outputfile/My Variables
        events My Variables Events -> /Gatton_RUE/Sorghum_Gatton_RUE_1/paddock/outputfile/My Variables Events
  simulation Sorghum_Gatton_RUE_6
    clock
      start_date = 22/11/1999  # Select the start date of the simulation
      end_date = 3/04/2000  # Select the end date of the simulation
    summaryfile
    metfile met: filename=Gatton_RUE.met
    area paddock
      folder Manager folder
        manager Sow SkipRow on a fixed date
          # Sowing criteria
          date = 2/12/1999  # Enter sowing date (d/m/yyyy)
          # Sowing parameters
          crop = Sorghum  # Enter name of crop to sow
          density = 10  # Enter sowing density (plants/m2)
          depth = 40  # Enter sowing depth (mm)
          cultivar = QL39xQL36  # Enter cultivar
          row_spacing = 0.5  # Enter row spacing (m)
          RowConfiguration = solid  # Enter skip row configuration
          ftn = 0  # Enter Fertile Tiller No.
          on start_of_day:
          script: same as in Sorghum_Gatton_RUE_1.paddock.Manager folder.Sow SkipRow on a fixed date
        manager Harvesting rule
          # Harvesting criteria
          crop = Sorghum  # Enter name of crop to harvest when ripe
          on end_of_day:
          script: same as in Sorghum_Gatton_RUE_1.paddock.Manager folder.Harvesting rule
      Soil Ian's Paddock: same as Sorghum_Gatton_RUE_1.paddock.Ian's Paddock
      irrigation: same as Sorghum_Gatton_RUE_1.paddock.Irrigation
      fertiliser
      operations: same as Sorghum_Gatton_RUE_4.paddock.operations
      sorghum
      outputfile -> /Gatton_RUE/Sorghum_Gatton_RUE_1/paddock/outputfile: filename=Sorghum_Gatton_RUE_6.out; title=Sorghum_Gatton_RUE_6
        variables My Variables -> /Gatton_RUE/Sorghum_Gatton_RUE_1/paddock/outputfile/My Variables
        events My Variables Events -> /Gatton_RUE/Sorghum_Gatton_RUE_1/paddock/outputfile/My Variables Events
  simulation Sorghum_Gatton_RUE_7
    clock
      start_date = 22/11/1999  # Select the start date of the simulation
      end_date = 3/04/2000  # Select the end date of the simulation
    summaryfile
    metfile met: filename=Gatton_RUE.met
    area paddock
      folder Manager folder
        manager Sow SkipRow on a fixed date
          # Sowing criteria
          date = 2/12/1999  # Enter sowing date (d/m/yyyy)
          # Sowing parameters
          crop = Sorghum  # Enter name of crop to sow
          density = 10  # Enter sowing density (plants/m2)
          depth = 40  # Enter sowing depth (mm)
          cultivar = CSH13R  # Enter cultivar
          row_spacing = 0.5  # Enter row spacing (m)
          RowConfiguration = solid  # Enter skip row configuration
          ftn = 0.9  # Enter Fertile Tiller No.
          on start_of_day:
          script: same as in Sorghum_Gatton_RUE_1.paddock.Manager folder.Sow SkipRow on a fixed date
        manager Harvesting rule
          # Harvesting criteria
          crop = Sorghum  # Enter name of crop to harvest when ripe
          on end_of_day:
          script: same as in Sorghum_Gatton_RUE_1.paddock.Manager folder.Harvesting rule
      Soil Ian's Paddock: same as Sorghum_Gatton_RUE_1.paddock.Ian's Paddock
      irrigation: same as Sorghum_Gatton_RUE_1.paddock.Irrigation
      fertiliser
      operations
        3/12/1999  Irrigation apply amount = 17
        6/12/1999  Irrigation apply amount = 20
        17/12/1999  Irrigation apply amount = 20
        7/01/2000  Irrigation apply amount = 10
        14/01/2000  Irrigation apply amount = 48
        27/01/2000  Irrigation apply amount = 21
        4/02/2000  Irrigation apply amount = 17
        11/02/2000  Irrigation apply amount = 30
        25/02/2000  Irrigation apply amount = 41
        3/03/2000  Irrigation apply amount = 15
        29/11/1999  fertiliser apply amount = 117 (kg/ha), depth = 50 (mm), type = NO3_N ()
        7/01/2000  fertiliser apply amount = 119 (kg/ha), depth = 50 (mm), type = NO3_N ()
        11/02/2000  fertiliser apply amount = 119 (kg/ha), depth = 50 (mm), type = NO3_N ()
        28/11/1999  fertiliser apply amount = 0 (kg/ha), depth = 50 (mm), type = NO3_N ()
        27/11/1999  fertiliser apply amount = 0 (kg/ha), depth = 50 (mm), type = NO3_N ()
      sorghum
      outputfile -> /Gatton_RUE/Sorghum_Gatton_RUE_1/paddock/outputfile: filename=Sorghum_Gatton_RUE_7.out; title=Sorghum_Gatton_RUE_7
        variables My Variables -> /Gatton_RUE/Sorghum_Gatton_RUE_1/paddock/outputfile/My Variables
        events My Variables Events -> /Gatton_RUE/Sorghum_Gatton_RUE_1/paddock/outputfile/My Variables Events
  simulation Sorghum_Gatton_RUE_8
    clock
      start_date = 22/11/1999  # Select the start date of the simulation
      end_date = 3/04/2000  # Select the end date of the simulation
    summaryfile
    metfile met: filename=Gatton_RUE.met
    area paddock
      folder Manager folder
        manager Sow SkipRow on a fixed date
          # Sowing criteria
          date = 2/12/1999  # Enter sowing date (d/m/yyyy)
          # Sowing parameters
          crop = Sorghum  # Enter name of crop to sow
          density = 10  # Enter sowing density (plants/m2)
          depth = 40  # Enter sowing depth (mm)
          cultivar = A35xQL36  # Enter cultivar
          row_spacing = 0.5  # Enter row spacing (m)
          RowConfiguration = solid  # Enter skip row configuration
          ftn = 0.2  # Enter Fertile Tiller No.
          on start_of_day:
          script: same as in Sorghum_Gatton_RUE_1.paddock.Manager folder.Sow SkipRow on a fixed date
        manager Harvesting rule
          # Harvesting criteria
          crop = Sorghum  # Enter name of crop to harvest when ripe
          on end_of_day:
          script: same as in Sorghum_Gatton_RUE_1.paddock.Manager folder.Harvesting rule
      Soil Ian's Paddock: same as Sorghum_Gatton_RUE_1.paddock.Ian's Paddock
      irrigation: same as Sorghum_Gatton_RUE_1.paddock.Irrigation
      fertiliser
      operations: same as Sorghum_Gatton_RUE_7.paddock.operations
      sorghum
      outputfile -> /Gatton_RUE/Sorghum_Gatton_RUE_1/paddock/outputfile: filename=Sorghum_Gatton_RUE_8.out; title=Sorghum_Gatton_RUE_8
        variables My Variables -> /Gatton_RUE/Sorghum_Gatton_RUE_1/paddock/outputfile/My Variables
        events My Variables Events -> /Gatton_RUE/Sorghum_Gatton_RUE_1/paddock/outputfile/My Variables Events
  simulation Sorghum_Gatton_RUE_9
    clock
      start_date = 22/11/1999  # Select the start date of the simulation
      end_date = 3/04/2000  # Select the end date of the simulation
    summaryfile
    metfile met: filename=Gatton_RUE.met
    area paddock
      folder Manager folder
        manager Sow SkipRow on a fixed date
          # Sowing criteria
          date = 2/12/1999  # Enter sowing date (d/m/yyyy)
          # Sowing parameters
          crop = sorghum  # Enter name of crop to sow
          density = 10  # Enter sowing density (plants/m2)
          depth = 40  # Enter sowing depth (mm)
          cultivar = QL39xQL36  # Enter cultivar
          row_spacing = 0.5  # Enter row spacing (m)
          RowConfiguration = solid  # Enter skip row configuration
          ftn = 0.9  # Enter Fertile Tiller No.
          on start_of_day:
          script: same as in Sorghum_Gatton_RUE_1.paddock.Manager folder.Sow SkipRow on a fixed date
        manager Harvesting rule
          # Harvesting criteria
          crop = Sorghum  # Enter name of crop to harvest when ripe
          on end_of_day:
          script: same as in Sorghum_Gatton_RUE_1.paddock.Manager folder.Harvesting rule
      Soil Ian's Paddock: same as Sorghum_Gatton_RUE_1.paddock.Ian's Paddock
      irrigation: same as Sorghum_Gatton_RUE_1.paddock.Irrigation
      fertiliser
      operations: same as Sorghum_Gatton_RUE_7.paddock.operations
      sorghum
      outputfile -> /Gatton_RUE/Sorghum_Gatton_RUE_1/paddock/outputfile: filename=Sorghum_Gatton_RUE_9.out; title=Sorghum_Gatton_RUE_9
        variables My Variables -> /Gatton_RUE/Sorghum_Gatton_RUE_1/paddock/outputfile/My Variables
        events My Variables Events -> /Gatton_RUE/Sorghum_Gatton_RUE_1/paddock/outputfile/My Variables Events
